# [reference: PipeDatabase.xmcd]
grey := [132; 132; 132]*m
ltgrey := [214; 214; 214]*m
dkgrey := [91; 91; 91]*m
blue := [0; 255; 255]*m
blue2 := [0; 191; 255]*m
blue3 := [0; 127; 255]*m
green := [0; 255; 0]*m
purple := [127; 0; 255]*m
tank_origin := [0; 0; 0]*m
tank_dim := [6; 1; 2.5]*m
tank_thick := .75 ft
channel_thick := .25 ft
acad_version := 2008
channel_dim := [tank_dim[1] + (2*tank_thick); .75 ft; 1 ft]
waterlevel := .5 ft
manifold_depth := .5 ft
num_tanks := 3
num_baffles := 40
num_bafflecols := 1
sedpipe_inr := 2/12*ft
gritpipe_inr := 2/12*ft
effluent_inr := 4/12*ft
waste_inr := 3 in
manifold_inr := 2/12*ft
manifold_outr := outerdiameter(manifold_inr)
sedpipe_outr := outerdiameter(sedpipe_inr)
gritpipe_outr := outerdiameter(gritpipe_inr)
effluent_outr := outerdiameter(effluent_inr)
waste_outr := outerdiameter(waste_inr)
wasterad_curve := ElbowRadius(waste_inr)
sedrad_curve := ElbowRadius(sedpipe_inr)
gritrad_curve := ElbowRadius(gritpipe_inr)
effluentrad_curve := ElbowRadius(effluent_inr)
manifoldrad_curve := ElbowRadius(manifold_inr)
wasterad_con := waste_outr*1.2
sedrad_con := sedpipe_outr*1.2
gritrad_con := gritpipe_outr*1.2
effluentrad_con := effluent_outr*1.2
manifoldrad_con := manifold_outr*1.2
wastecon_h := SocketDepth(waste_inr)
sedcon_h := SocketDepth(sedpipe_inr)
gritcon_h := SocketDepth(gritpipe_inr)
effluentcon_h := SocketDepth(effluent_inr)
manifoldcon_h := SocketDepth(manifold_inr)
gritTee_lengths := ShortTeeLength(gritpipe_inr)
gritTee_length := 2*gritTee_lengths
rad_orifice := .5/12*ft
orifice_dist := 4/12*ft
gritCross_length := gritTee_length
pipe9_length := .25 ft
offfloor_length := 1 ft
floc_dim := [20; 8; 2]*m
wall_dim := [3/4*floc_dim[0]; tank_thick; floc_dim[2]]
floc_inleth := 6/12*ft
sedeff_origin := [
    tank_origin[0] - tank_dim[0] - tank_thick;
    tank_origin[1] + 2.5*tank_dim[1] + 2*tank_thick;
    tank_origin[2] + tank_dim[2] - channel_dim[2] - channel_thick - (2*effluentrad_curve)
]
lvltank_dim := [5; 3; 3]*ft
lvltank_thick := .5 ft
lvltank_waterlvl := 1.5 ft
wall_disp := 3/12*ft + effluent_outr
walkway_width := 5 ft
platform_thick := 2 ft
Δz := 2*rad_curve  # error: This variable is undefined.
column_dim := [2 ft; 2 ft; tank_dim[2] + tank_thick - channel_dim[2] - channel_thick]
grit_origin := [
    tank_origin[0] - tank_dim[0] - tank_thick;
    tank_origin[1] + (num_tanks*tank_dim[1]) + (num_tanks*tank_thick) + 3*floc_dim[1]/4;
    tank_origin[2] + floc_inleth
]
grit_dim := [4; 4; 3]*ft
grit_thick := .5 ft
grit_holes := 7
gritriser_h := 30/12*ft
Δy_grit := floc_dim[1]/4 + tank_thick + walkway_width - grit_dim[1] - 2*grit_thick
r_drum := 1.5 ft
drum_disp := 8/12*ft
h_drum := 3 ft
grit_rad := .25 in
Δz_grit := tank_dim[2] - channel_dim[2] - channel_thick - floc_inleth
stockplat_thick := 1 ft
stockplatcol_dim := [6/12; 6/12; 3]*ft
stockplat_dim2 := [4*r_drum + 3*drum_disp; 2*r_drum + 2*drum_disp; stockplat_thick]
stockplat_dim1 := [
    4*r_drum + 3*drum_disp + lvltank_dim[0] + 2*lvltank_thick - grit_dim[0] - 2*grit_thick;
    2*r_drum + 2*drum_disp;
    stockplat_thick
]
stockplat1_origin := [
    tank_origin[0] - tank_dim[0] - tank_thick - walkway_width - grit_dim[0] - 2*grit_thick;
    tank_origin[1] + num_tanks*tank_dim[1] + (num_tanks + 1)*tank_thick + floc_dim[1] + walkway_width;
    tank_origin[2] + tank_dim[2] - channel_dim[2] - channel_thick + platform_thick + stockplatcol_dim[2]
]
stockplat2_origin := [
    tank_origin[0] - tank_dim[0] - tank_thick - walkway_width - lvltank_dim[0] - 2*lvltank_thick;
    tank_origin[1] + num_tanks*tank_dim[1] + (num_tanks + 1)*tank_thick + floc_dim[1] - grit_dim[1] - 2*grit_thick;
    tank_origin[2] + tank_dim[2] - channel_dim[2] - channel_thick + platform_thick + stockplatcol_dim[2]
]
factor_safety := .5 ft
offfloorlamina_dist := factor_safety + pipe_outr + pipe9_length + offfloor_length  # error: This variable is undefined.
lamina_origin := [
    (tank_origin[0] - tank_dim[0] + channel_dim[1] + channel_thick);
    tank_origin[1];
    (tank_origin[2] + offfloorlamina_dist)
]  # error: This variable is undefined.
lamina_amp := .5 in
lamina_thick := 4 mm
lamina_width := tank_dim[1]
lamina_length := 30 in
lamina_periods := 8.5
lamina_slope := 60 deg
lamina_num := 50
lamina_col := 1  # this is a constant!
lamina_x := 4 in
lamina_y := 7 cm
z_rotation := 0
rotate_angle := 90
slope_width := tank_dim[1]/2
ϕ := 45 deg
slope_height := slope_width/tan(ϕ)
