# Automated Design: AutoCAD:Sludge Drain Cover
# [reference: MasterProgram.xmcd]
# [reference: basics.xmcd]
AN_SedTopInlet = 60 deg
B_SedSludgeOrifices = 0.15 m
T_SedSludge = 0.0933013 m
N_SedSludgeOrifices = 63
H_SedSludge = 0.12 m
L_Sed = 9.52822 m
W_SedSludge = 0.12 m
W_SedDrainCover = 0.233504 m
DrainCover_origin := [Plant_Origin[0]; Plant_Origin[1] - W_Sed/2; Plant_Origin[2]] = [0; -1.0795; 0] m
# Draw a box that is T.SedSludge by W.SedDrainCover and then extend it by L.Sed
Draincoverscript :=
    viewtops ← viewtop1
    layer1 ← layer_new("draincover", red)
    box1 ← box(DrainCover_origin, [L_Sed; T_SedSludge; W_SedDrainCover])
    layerset ← layer_set("0")
    layerfreeze ← layer_freeze("draincover")
    one ← stack(viewtops, layer1, box1, layerset, layerfreeze)
    return one
DrainCover := stack(Draincoverscript)
# [component: inputs DrainCover]
