# Automated Design: AutoCAD: Plant Drawing Inputs
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# Colors
grey := [132; 132; 132]
ltgrey := [214; 214; 214]
dkgrey := [91; 91; 91]
blue := [0; 255; 255]
blue2 := [0; 191; 255]
blue3 := [0; 127; 255]
green := [0; 255; 0]
purple := [127; 0; 255]
ltpurple := [125; 0; 160]
zc := .1 m
zc_point := [0; .1; 0]*m
# Sedimentation Tank
tank_origin := [0; 0; 0]*m
tank_dim := [L_Sed; W_Sed; H_Sed]
num_tanks := N_SedTanks
channel_dim := [L_Sed + 2*T_PlantWall; W_Channel; H_Channel]
waterlevel := H_Sed - HW_Sed
manifold_depth := H_SedAbove/2
sedpipe_inr := (ND_SedPipeEntrance/2)
manifold_inr := (ND_SedLaunder/2)
manifoldorifice_rad := D_SedLaunderOrifices/2
manifoldorifice_dist := B_SedLaunderOrifices
waste_inr := (ND_SedSludge/2)
wasteorifice_rad := D_SedSludgeOrifice/2
wasteorifice_dist := B_SedSludgeOrifices
offfloorlamina_dist := H_SedBelow
offfloor_length := (1.5*(2*sedpipe_inr)) + (waste_inr*atan(AN_SedBottom))
lamina_amp := .5 in
lamina_thick := 4 mm
lamina_width := tank_dim[1]
lamina_length := L_SedPlate
lamina_periods := 8.5
lamina_slope := AN_SedPlate
lamina_num := N_SedPlates
lamina_col := 1  # this is a constant!
lamina_x := B_SedPlate
lamina_y := 7 cm
z_rotation := 0
rotate_angle := 90
ϕ := AN_SedBottom  # sedtank slope angle
# Flocculation Tank
numfloc_tanks := N_FlocChannels
floc_dim := [L_Sed; W_FlocChannel; H_Floc]
flochole_dim := [W_FlocPort; T_PlantWall; H_FlocPort]
# *check this*
baffletank1_location := [X_FlocBaffle[□], Z_FlocBaffle, L_FlocBaffles]  # error: This placeholder is empty.
baffletank1_num := rows(baffletank1_location)
baffletank2_location := [X_FlocBaffle, Z_FlocBaffle, L_FlocBaffle]
baffletank2_num := rows(baffletank2_location)
baffle_amp := .5 in
baffle_thick := 4 mm
baffle_slope := 90 deg
baffle_width := floc_dim[1]
baffle_col := 1  # this is a constant!
baffle_periods := 8.5
baffle_y := 7 cm
baffle_num := 1
baffle_x := 4 in
# Platform
column_dim := [L_MpColumn; W_MpColumn; H_SedTank + T_SedWall - H_Channel - T_ChannelWall]
# Grit Tank
grit_origin := [
    tank_origin[0] - L_SedTank - T_SedWall;
    (tank_origin[1] + N_SedTank*(W_SedTank + T_SedWall) + (N_FlocTankChannels*W_FlocTank) + (N_FlocTankChannels - 1)*T_SedWall) - W_FlocTank/2;
    tank_origin[2] + H_FlocInletPipe
]
grit_dim := [3; 3; 2]*ft
grit_thick := T_EtWall
D_GritRiser := 3 in
gritriser_h := 30/12*ft
grit_holes := 7
Δx_grit := W_MPWalkway
gritpipe_inr := □  # error: This placeholder is empty.
grit_rad := .25 in
Δy_grit := T_SedWall + W_FlocTank/2 + W_MpWalkway - grit_dim[1] - 2*T_EtWall
gritdisp1 := 8 in
gritdisp2 := 6 in
Δz_grit := H_SedTank - H_Channel - T_Mp - H_FlocInletPipe
# Plant Level Tank
lvltank_dim := [L_PltAssumed; □; H_PltWall]  # error: This placeholder is empty.
lvlpipe_inr := ND_Launder/2
effluent_inr := □  # error: This placeholder is empty.
sedeff_origin := [
    tank_origin[0] - tank_dim[0] - tank_thick;
    tank_origin[1] + (num_tanks - .5)*tank_dim[1] + (num_tanks - 1)*tank_thick;
    tank_origin[2] + tank_dim[2] - channel_dim[2] - platform_thick - ElbowRadius(2*sedpipe_inr)
]
lvltank_waterlvl := HW_Plt
wall_disp := 3/12*ft + outerradius(2*effluent_inr)
Δz_effluent := ElbowRadius(2*sedpipe_inr) + 2*T_Mp - H_Channel
Δysub_effluent := ElbowRadius(2*effluent_inr)
Δy_effluent :=
    Δysub_effluent if W_SedTank/2 + T_SedWall + N_FlocTankChannels*(W_FlocTank + T_SedWall) - grit_dim[1] - lvltank_dim[1] - 2*T_PltWall - 2*T_EtWall < ElbowRadius(2*effluent_inr)
    W_SedTank/2 + T_SedWall + N_FlocTankChannels*(W_FlocTank + T_SedWall) - grit_dim[1] - lvltank_dim[1] - 2*T_PltWall - 2*T_EtWall otherwise
# Chlorine Platform
chlorineplat_dim := [2*D_drum + 3*S_Drum; D_Drum + 2*S_Drum; T_Cp]
chlorineplat_origin := [
    tank_origin[0] - L_SedTank - T_SedWall - W_MpWalkway - grit_dim[0] - 2*T_EtWall - ShortTeeLength(2*gritpipe_inr) - walk_space;
    tank_origin[1] + (N_SedTank*W_SedTank) + ((N_SedTank + 2)*T_SedWall) + 2*W_FlocTank + W_MpWalkway;
    tank_origin[2] + H_SedTank - H_Channel + T_Cp
]
# Alum Platform
alumplat_dim := [2*D_drum + 3*S_Drum; D_Drum + 2*S_Drum; T_Ap]
alumplat_origin := [
    sedeff_origin[0] - W_MpWalkway - L_PltAssumes - 2*T_PltWall;
    sedeff_origin[1] + Δy_effluent + lvltank_dim[1] + 2*T_PltWall;
    tank_origin[2] + H_SedTank - H_Channel + T_Ap
]
