# AguaClara Water Treatment Plants -- 4 Communities
# Automated Design
# User Inputs:
HW_Sed := 2.8 m
# Design References
# [reference: UserInputs- 4 Communities.xmcd]
# [reference: DesignAssumptions- 4 Communities.xmcd]
# [reference: MathFunctions.xmcd]
# [reference: PipeDatabase.xmcd]
# [reference: MinorLossCoefficients.xmcd]
# [reference: FluidsFunctions.xmcd]
# Inlet Channel:
# [reference: Inlet Channel.xmcd]
W_InletChannel = 0.36385 m
L_Channel = 2.459 m
ND_SedPipeEntrance = 12 in
N_SedInletPipes = 2
H_InletChannel = 1.63893 m
Q_Plant = 100.385 gal/min
# Sedimentation Tanks:
# [reference: Sedimentation 4 comm,.xmcd]
N_SedTanks = 2
H_SedBelowSlope = 1.03487 m
H_SedBetween = 0.0762 m
HW_Sed = 2.8 m
H_Sed = 2.9 m
H_SedBelow = 1.1714 m
L_Sed = 3.62072 m
ND_SedPipeEntrance = 12 in
# Sedimentation Tank Sludge Drain:
# [reference: SludgeDrain.xmcd]
N_SedSludgeOrifices = 36
ND_SedSludge = 3 in
Q_SludgeDrainInitial = 729.6 L/min
D_SedSludgeOrifice = 0.1875 in
# Sedimentation Tank Inlet Slopes:
# [reference: Sed. Inlet Slopes- minV.xmcd]
B_SedInlet = 3.80249 cm
L_SedTopFilled = 0.546862 m
H_SedInlet = 11.1177 cm
W_SlopesFilled = 0.273431 m
L_SedBottomFilled = 0.356939 m
AN_SedTopInlet = 60 deg
L_SedTopInlet = 1.0795 m
A_SedInletTotal = 1300.72 cm^2
AN_SedBottom = 40 deg
A_SedInlet = 316.667 cm^2
H_SedTopSlope = 0.934874 m
A_SedInletActual = 308.973 cm^2
A_Inlet = 4025.42 cm^2
L_SedBottom = 0.704594 m
Z_SedSlopes = 1.12377 m
H_SedBottomSlope = 0.452904 m
L_SedTopInlet = 1.0795 m
W_SlopesOpen = 0.266319 m
# Sedimentation Tank Effluent Launder:
# [reference: Launder.xmcd]
N_SedLaunderOrifices = 54
Q_SedLaunderOrifices = 1.75926 L/min
# Exit Channel:
# [reference: Exit Channel.xmcd]
W_ExitChannel = 0.36385 m
ND_SedLaunder = 3 in
H_ExitChannel = 1.63893 m
L_SedLaunder = 2.74302 m
L_ExitChannel = 2.459 m
D_SedLaunderOrifice = 0.3125 in
H_PltWeir = 1.46114 m
Z_SedLaunder = 2.71555 m
HW_ExitChannel = 1.49893 m
ZW_ExitChannel = 2.76 m
# Lamella:
# [reference: Lamella.xmcd]
L_SedPlate = 1.45585 m
B_SedPlate = 4.98367 cm
S_SedPlate = 4.68367 cm
N_SedPlates = 34
AN_SedPlate = 60 deg
V_SedC = 10.0315 m/day
V_SedUp = 70 m/day
H_SedPlate = 1.2608 m
H_SedAbove = 0.1289 m
# Flow Controller:
# [reference: FCM.xmcd]
N_Fcm = 1
ID_FcmTube = 3.175 mm
ID_FcmTube = 0.125 in
L_FcmTube = 99.0625 cm
Q_FcmTubeMax = 285 mL/min
HL_FcmValve = 15.0907 cm
# Flocculator:
# [reference: Flocculation.xmcd]
W_FlocChannel = 0.53975 m
S_FlocBaffle = [0.0814312; 0.0974128; 0.129144; 0.331776] m
B_FlocBaffle = [0.0854312; 0.101413; 0.133144; 0.335776] m
N_FlocBafflesMin = 53
HL_Floc = 8.92315 cm
X_FlocBaffles = [
    0.68975, 3.27395, 0.346776;
    0.775181, 3.1408, 0.682552;
    0.860612, 3.00766, 1.01833;
    0.946044, 2.87452, 1.3541;
    1.03147, 2.74137, 1.68988;
    1.11691, 2.60823, 2.02566;
    1.20234, 2.47509, 2.36143;
    1.28777, 2.34194, 2.69721;
    1.3732, 2.2088, 3.03298;
    1.45863, 2.07565, 0;
    1.54406, 1.94251, 0;
    1.62949, 1.60674, 0;
    1.71492, 1.27096, 0;
    1.81634, 0.935183, 0;
    1.91775, 0.599407, 0;
    2.01916, 0, 0;
    2.12058, 0, 0;
    2.22199, 0, 0;
    2.3234, 0, 0;
    2.42481, 0, 0;
    2.52623, 0, 0;
    2.62764, 0, 0;
    2.72905, 0, 0;
    2.83047, 0, 0;
    2.93188, 0, 0;
    3.06502, 0, 0;
    3.19817, 0, 0
] m
HW_FlocStart = 2.88923 m
L_FlocBaffles = [
    2.71857, 2.67086, 2.46822;
    2.81857, 2.77086, 2.56822;
    2.71857, 2.67086, 2.46822;
    2.81857, 2.77086, 2.56822;
    2.71857, 2.67086, 2.46822;
    2.81857, 2.77086, 2.56822;
    2.71857, 2.67086, 2.46822;
    2.81857, 2.77086, 2.56822;
    2.71857, 2.67086, 2.46822;
    2.81857, 2.77086, 0;
    2.71857, 2.67086, 0;
    2.81857, 2.56822, 0;
    2.71857, 2.46822, 0;
    2.80259, 2.56822, 0;
    2.70259, 2.46822, 0;
    2.80259, 0, 0;
    2.70259, 0, 0;
    2.80259, 0, 0;
    2.70259, 0, 0;
    2.80259, 0, 0;
    2.70259, 0, 0;
    2.80259, 0, 0;
    2.70259, 0, 0;
    2.80259, 0, 0;
    2.70259, 0, 0;
    2.77086, 0, 0;
    2.67086, 0, 0
] m
W_FlocPort = 0.331776 m
H_FlocPort = 0.53975 m
N_FlocBaffles = 51
Z_FlocBaffles = [
    0, 0, 0;
    0.0814312, 0.129144, 0.331776;
    0, 0, 0;
    0.0814312, 0.129144, 0.331776;
    0, 0, 0;
    0.0814312, 0.129144, 0.331776;
    0, 0, 0;
    0.0814312, 0.129144, 0.331776;
    0, 0, 0;
    0.0814312, 0.129144, 0;
    0, 0, 0;
    0.0814312, 0.331776, 0;
    0, 0, 0;
    0.0974128, 0.331776, 0;
    0, 0, 0;
    0.0974128, 0, 0;
    0, 0, 0;
    0.0974128, 0, 0;
    0, 0, 0;
    0.0974128, 0, 0;
    0, 0, 0;
    0.0974128, 0, 0;
    0, 0, 0;
    0.0974128, 0, 0;
    0, 0, 0;
    0.129144, 0, 0;
    0, 0, 0
] m
Gt_FlocMinFlow = 6766.06
N_FlocChannels = 3
# Entrance Tank:
# [reference: EntranceTank.xmcd]
ND_Lfom = 6 in
HL_Rm = 0.911511 cm
N_Lfom = 1
D_LfomOrifices = 19.05 mm
Q_LfomErrorMax = 1.3255 %
N_LfomOrifices = [5; 4; 2; 2; 2; 2; 1; 2; 1; 1]
L_Et = 3 m
W_Et = 1.5 m
HW_EtMin = 0.2 m
HW_EtMax = 0.4 m
H_Et = 3.23923 m
ZW_Et = 3.13923 m
# Any additional needed elevations should be calculated in the files above.
# Elevations:
ZW_ExitChannel = 2.76 m  # Water Level at the end of the plant in the exit channel and exit channel box
HW_Sed = 2.8 m
HW_FlocStart = 2.88923 m  # Water level at the beginning of the floc tank
HL_Floc = 8.92315 cm  # just for ref. the head loss throught the floc tank
ZW_Et = 3.13923 m  # the height of the water in the entrance tank.
# AutoCAD References
# [reference: basics.xmcd]
# [reference: pipe.xmcd]
# [reference: tank.xmcd]
# [reference: lamina.xmcd]
# [reference: cross.xmcd]
# [reference: Tee.xmcd]
# [reference: elbow.xmcd]
# [reference: Sludge.xmcd]
# [reference: Channel.xmcd]
# [reference: Manifold.xmcd]
# [reference: SedTankslopes.xmcd]
# [reference: Sed Tank Inlet Slope.xmcd]
# [reference: chemicalstock.xmcd]
# [reference: Sedimentation Tank.xmcd]
# [component: inputs SedTank]
# [reference: Flocculation Tank.xmcd]
# [component: inputs FlocTank]
# [reference: Entrance Tank.xmcd]
# [component: inputs EntranceTank]
