# Flocculation Function
# References:
# Need these calculations from RapidMix design to get the size of the elbow located at the entrance to the floc tank
K_Rm := K_sum(0, N_RmEl, 0, N_RmTee, 0, 0, 0, 0, 0)
ND_Lfom := D_pipeschedule(Q_Plant, EN_PipeSpec, HL_RmDesign, L_RmPipe, NU, E_Pvc, K_Rm) = 6 in
# The length of one channel of the flocculator is equal to the length of a sed tank . Therefore the total length is equal to the number of channels times the length of a sed tank. The width of a flocculator is equal to the width of a sed tank divided by the number of channels (to make "upward velocity" equal in the two tanks. The water depth at the end of the flocculaor must be the same as the water depth in the sed tank.
W_FlocChannel := W_SedTank/N_FlocTankChannels = 0.5 m
# This is the maximum flow rate that can be accomodated with this width and depth of channel. If the flow rate is greater than this value there will be short circuiting in the flocculator. This should somehow be implemented as a check in LabVIEW to guide the designer in setting the plant dimensions. Or maybe we need to develop an algorithm to set the channel width.
Q_FlocMax := W_FlocChannel*(HW_Sed/(2*Pi_FlocBaffle))^(4/3)*G_Floc[last(G_Floc)]^(2/3)*(2*NU*Pi_FlocDissipation/K_FlocBaffle180)^(1/3) = 1396.17 L/min
S_FlocBaffle := (1/G_Floc)^(1/2)*(K_FlocBaffle180*Q_Plant^3/(2*Pi_FlocDissipation*NU*W_FlocChannel^3))^(1/4) = [12.8245; 18.1366; 37.9068] cm
# calculates the baffle spacing based on desired G value
G_FlocMin := G_Floc*Pi_QPlant^(3/2) = [58.6899; 29.3449; 6.71751] 1/s  # calculates the min G value based on the velocity at low flow
# This divides the minumum allowable value of Gθ for the entire tank by the number of baffle spacings. Each baffle spacing will be responsible for a certain amount of the Gθ.
Gθ_persection := Gt_FlocMin/length(G_Floc) = 1666.67
# Calculates the Gθ per baffle under low flow conditions
Gt_FlocBaffleMin := sqrt(Pi_FlocDissipation*Pi_QPlant*Q_Plant*K_FlocBaffle180/(2*NU*W_FlocChannel)) = 179.583
# Total number of baffles required to get the minimum Gθ.
N_FlocBaffle := ceil(Gt_FlocMin/Gt_FlocBaffleMin) = 28
N_FlocBaffleSection :=
    for i ∈ 0 .. last(G_Floc) - 1
        N[i] ← floor(N_FlocBaffle/length(G_Floc))
    N[last(G_Floc)] ← N_FlocBaffle - sum(N)
    return N
    = [9; 9; 10]
# Calculates the number of baffles in each section
# Not used, but for interest, here are the velocities at max flow
V_Floc := Q_Plant/(W_FlocChannel*S_FlocBaffle) = [0.167648; 0.118545; 0.056718] m/s
# calculates the head loss per baffle and then finds the total headloss
HL_FlocBaffle := h_erect(Q_Plant, W_FlocChannel, S_FlocBaffle, K_FlocBaffle180) = [0.4299; 0.21495; 0.0492054] cm
HL_Floc := sum(vectorize(N_FlocBaffleSection*HL_FlocBaffle)) = 6.2957 cm
# Calculate the water level at the entrance to the floc tank
HW_FlocStart := HW_Sed + HL_Floc = 2.09238 m
# Length of each section of the flocculator
L_FlocSection := vectorize(N_FlocBaffleSection*S_FlocBaffle) = [1.1542; 1.63229; 3.79068] m
L_FlocIdeal := sum(L_FlocSection) = 6.57718 m  # not including port!
# G at the port is based on the G at the end of the flocculator because the low G region of the flocculator is so long.
W_FlocPort := S_FlocBaffle[last(G_Floc)] = 0.379068 m
H_FlocPort := W_FlocChannel*S_FlocBaffle[last(G_Floc)]*Pi_FlocBaffle/W_FlocPort = 0.75 m
# Now we need to assign positions, lengths and elevations to floc baffles
L_FlocBaffleLower := HW_Sed - S_FlocBaffle*Pi_FlocBaffle = [1.83706; 1.75737; 1.46082] m
L_FlocBaffleUpper := HW_FlocStart + H_PlantFreeboard - S_FlocBaffle*Pi_FlocBaffle = [2.00001; 1.92033; 1.62378] m
# First baffle is a lower baffle because rapid mix pipe enters low
# Ideally have odd number of baffles in first channel (enter low, exit low)
# Ideally have even number of baffles in 2nd channel (enter low, exit high), but I haven't done any coding to get the right number of baffles (odd or even). The fit of the baffles could potentially be improved by
FlocBaffle :=
    X[0, N_FlocTankChannels - 1] ← 0 m
    L[0, N_FlocTankChannels - 1] ← 0 m
    Z[0, N_FlocTankChannels - 1] ← 0 m
    section ← 0
    BafflesInSection ← 0
    X[0, 0] ← ElbowRadius(ND_Lfom)
    for Channel ∈ 0 .. N_FlocTankChannels - 1
        i ← 0
        X_FirstBaffleInChannel ← ElbowRadius(ND_Lfom) if Channel == 0
        X_FirstBaffleInChannel ← W_FlocPort + S_FlocPort otherwise
        X[i, Channel] ← X_FirstBaffleInChannel
        L[i, Channel] ← L_FlocBaffleLower[section]
        Z[i, Channel] ← 0 m
        X_LastBaffleInChannel ← L_SedTank - (W_Channel + S_FlocPort) if Channel == N_FlocTankChannels - 1
        X_LastBaffleInChannel ← L_SedTank - (W_FlocPort + S_FlocPort) otherwise
        while X[i, Channel] + S_FlocBaffle[section] < X_LastBaffleInChannel
            i ← i + 1
            BafflesInSection ← BafflesInSection + 1
            if BafflesInSection == N_FlocBaffleSection[section] and section < last(G_Floc)
                section ← section + 1
                BafflesInSection ← 1
            X[i, Channel] ← X[i - 1, Channel] + S_FlocBaffle[section]
            if mod(i, 2) == 1
                L[i, Channel] ← L_FlocBaffleUpper[section]
                Z[i, Channel] ← S_FlocBaffle[section]*Pi_FlocBaffle
            otherwise
                L[i, Channel] ← L_FlocBaffleLower[section]
                Z[i, Channel] ← 0 m
        for k ∈ 0 .. last(X[:, 0])
            X[k, Channel] ← L_SedTank - X[k, Channel] if mod(Channel, 2) == 1 and X[k, Channel] ≠ 0
    return [X, L, Z]
# section is index of the spacing of baffles
# First baffle is away from wall to allow elbow to deflect water downward
# This code works with any number of flocculator channels
# i is the number of baffles in a channel
# Each channel starts with a lower baffle
# Move to the next spacing if baffles in section equals target number of baffles in section and if the section isn't the last section
# Mod handles the odd and even baffles
# Reverse the direction of odd numbered channels
X_FlocBaffle := FlocBaffle[0, 0]
L_FlocBaffle := FlocBaffle[0, 1]
Z_FlocBaffle := FlocBaffle[0, 2]
