# AguaClara Water Treatment Plants
# Automated Design
# User Inputs:
HW_Sed := 2.55 m
# Design References
# [reference: PipeDatabase.xmcd]
# [reference: UserInputs- Gracias.xmcd]
# [reference: DesignAssumptions- Gracias.xmcd]
# [reference: MathFunctions.xmcd]
# [reference: MinorLossCoefficients.xmcd]
# [reference: FluidsFunctions.xmcd]
# Sedimentation Tanks:
# [reference: Sedimentation - Gracias.xmcd]
N_SedTanks = 3
H_SedBetween = 0.060325 m
HW_Sed = 2.55 m
H_Sed = 2.65 m
L_Sed = 9.6182 m
# Sedimentation Tank Sludge Drain:
# [reference: SludgeDrain.xmcd]
N_SedSludgeOrifices = 96
ND_SedSludge = 6 in
Q_SludgeDrainInitial = 3530.17 L/min
D_SedSludgeOrifice = 0.3125 in
# Height Dimensions within Sedtank
H_SedBelowSlope := .5*W_Sed/N_SlopePairs*tan(AN_SedTopInlet) + T_SedInletSlope/cos(AN_SedTopInlet) + outerdiameter(ND_SedSludge) = 1.20315 m
# This depth of the sloped bottom
H_SedBelow := H_SedBelowSlope + H_SedBetween = 1.26347 m  # the entire area under the lamella will be a part of the sloped bottom
# Inlet Channel:
# [reference: Inlet Channel.xmcd]
W_InletChannel = 0.640921 m
L_Channel = 6.927 m
ND_SedPipeEntrance = 20 in
N_SedInletPipes = 4
H_InletChannel = 1.29685 m
Q_Plant = 800 gal/min
# Sedimentation Tank Inlet Slopes:
# [reference: Sed. Inlet Slopes- minV.xmcd]
B_SedInlet = 3.80249 cm
L_SedTopFilled = -5.11086 m
H_SedInlet = 11.1177 cm
W_SlopesFilled = -2.55543 m
L_SedBottomFilled = -3.33588 m
AN_SedTopInlet = 60 deg
L_SedTopInlet = 1.0795 m
AN_SedBottom = 40 deg
A_SedInletTotal = 1300.72 cm^2
A_SedInlet = 42773 cm^2
H_SedTopSlope = 0.934874 m
A_SedInletActual = 42765.3 cm^2
A_Inlet = 10693.3 cm^2
L_SedBottom = 0.704594 m
Z_SedSlopes = 1.20315 m
H_SedBottomSlope = 0.452904 m
L_SedTopInlet = 1.0795 m
W_SlopesOpen = 3.09518 m
# Sedimentation Tank Effluent Launder:
# [reference: Launder.xmcd]
N_SedLaunderOrifices = 162
Q_SedLaunderOrifices = 1.55778 L/min
# Exit Channel:
# [reference: Exit Channel.xmcd]
W_ExitChannel = 0.640921 m
ND_SedLaunder = 6 in
H_ExitChannel = 1.29685 m
L_SedLaunder = 8.18636 m
L_ExitChannel = 6.927 m
D_SedLaunderOrifice = 0.375 in
H_PltWeir = 1.06188 m
Z_SedLaunder = 2.42586 m
HW_ExitChannel = 1.15685 m
ZW_ExitChannel = 2.51 m
# Lamella:
# [reference: Lamella.xmcd]
L_SedPlate = 1.24506 m
B_SedPlate = 6.63412 cm
S_SedPlate = 6.33412 cm
N_SedPlates = 98
AN_SedPlate = 60 deg
V_SedC = 10.006 m/day
V_SedUp = 70 m/day
H_SedPlate = 1.07825 m
H_SedAbove = 0.208275 m
# Flow Controller:
# [reference: FCM.xmcd]
N_Fcm = 6
ID_FcmTube = 4.318 mm
ID_FcmTube = 0.17 in
L_FcmTube = 255.151 cm
Q_FcmTubeMax = 378.541 mL/min
HL_FcmValve = 26.6223 cm
# Flocculator:
# [reference: Flocculation.xmcd]
W_FlocChannel = 1.0795 m
S_FlocBaffle = [0.229659; 0.274731; 0.364221; 0.935701] m
B_FlocBaffle = [0.233659; 0.278731; 0.368221; 0.939701] m
N_FlocBafflesMin = 27
HL_Floc = 8.31788 cm
Z_FlocBaffles = [
    0, 0;
    0.229659, 0.935701;
    0, 0;
    0.229659, 0.935701;
    0, 0;
    0.229659, 0.935701;
    0, 0;
    0.274731, 0.935701;
    0, 0;
    0.274731, 0;
    0, 0;
    0.364221, 0;
    0, 0;
    0.364221, 0;
    0, 0;
    0.364221, 0;
    0, 0;
    0.935701, 0;
    0, 0
] m
X_FlocBaffles = [
    1.2295, 8.6675;
    1.46316, 7.72779;
    1.69682, 6.78809;
    1.93048, 5.84839;
    2.16414, 4.90869;
    2.39779, 3.96899;
    2.67653, 3.02929;
    2.95526, 2.08959;
    3.23399, 1.14989;
    3.51272, 0;
    3.79145, 0;
    4.15967, 0;
    4.52789, 0;
    4.89611, 0;
    5.26434, 0;
    5.63256, 0;
    6.57226, 0;
    7.51196, 0;
    8.45166, 0
] m
L_FlocBaffles = [
    2.32034, 1.6143;
    2.42034, 1.7143;
    2.32034, 1.6143;
    2.42034, 1.7143;
    2.32034, 1.6143;
    2.42034, 1.7143;
    2.27527, 1.6143;
    2.37527, 1.7143;
    2.27527, 1.6143;
    2.37527, 0;
    2.27527, 0;
    2.28578, 0;
    2.18578, 0;
    2.28578, 0;
    2.18578, 0;
    2.28578, 0;
    1.6143, 0;
    1.7143, 0;
    1.6143, 0
] m
HW_FlocStart = 2.63318 m
W_FlocPort = 0.935701 m
H_FlocPort = 1.0795 m
N_FlocBaffles = 28
Gt_FlocMinFlow = 7415.12
N_FlocChannels = 2
# Entrance Tank:
# [reference: EntranceTank.xmcd]
ND_Lfom = 20 in
HL_Rm = 0.890191 cm
N_Lfom = 1
D_LfomOrifices = 52.3875 mm
Q_LfomErrorMax = 0.74575 %
N_LfomOrifices = [5; 4; 3; 2; 2; 2; 1; 2; 1; 1]
L_Et = 3 m
W_Et = 1.5 m
HW_EtMin = 0.2 m
HW_EtMax = 0.4 m
H_Et = 3.03318 m
ZW_Et = 2.93318 m
# Any additional needed elevations should be calculated in the files above.
# Elevations:
ZW_ExitChannel = 2.51 m  # Water Level at the end of the plant in the exit channel and exit channel box
HW_Sed = 2.55 m
HW_FlocStart = 2.63318 m  # Water level at the beginning of the floc tank
HL_Floc = 8.31788 cm  # just for ref. the head loss throught the floc tank
ZW_Et = 2.93318 m  # the height of the water in the entrance tank.
Z_Mp := (HW_Sed - HW_InletChannel)
# AutoCAD References
# [reference: basics.xmcd]
# [reference: pipe.xmcd]
# [reference: tank.xmcd]
# [reference: lamina.xmcd]
# [reference: cross.xmcd]
# [reference: Tee.xmcd]
# [reference: elbow.xmcd]
# [reference: Sludge.xmcd]
# [reference: Channel.xmcd]
# [reference: Manifold.xmcd]
# [reference: SedTankslopes.xmcd]
# [reference: Sed Tank Inlet Slope.xmcd]
# [reference: chemicalstock.xmcd]
# [reference: Sedimentation Tank.xmcd]
# [component: inputs SedTank]
# [reference: Flocculation Tank.xmcd]
# [component: inputs FlocTank]
# [reference: Entrance Tank.xmcd]
# [component: inputs EntranceTank]
