# AguaClara Water Treatment Plants -- Gracias
# Automated Design
# User Inputs:
HW_Sed := 2 m
# Design References
# [reference: UserInputs- Gracias.xmcd]
# [reference: DesignAssumptions- Gracias.xmcd]
# [reference: MathFunctions -Gracias.xmcd]
# [reference: PipeDatabase.xmcd]
# [reference: MinorLossCoefficients - Gracias.xmcd]
# [reference: FluidsFunctions - Gracias.xmcd]
# Sed Tanks and Slopes:
# [reference: Influent Sed Manifold - Gracias.xmcd]
N_SedTanks = 3
B_SedPort = 5.85864 cm
H_SedBetween = 0.0762 m
W_SedPort = 5.85864 cm
L_Sed = 9.52822 m
N_SedPorts = 45
.
N_SlopePairs = 2
L_SedPort = 6.76498 cm
L_SedPort = 6.76498 cm
L_SedPort*B_SedPort = 39.6336 cm^2
W_SedSlopePlate = 30 cm
W_SedSludgeFlat = 5 cm
# Sedimentation Tank Sludge Drain:
# [reference: SludgeDrain-Gracias.xmcd]
N_SedSludge = 2
N_SedSludgeOrifices = 127
W_SedSludge = 9.12073 cm
Time_SludgeDrain = 43.2087 min
H_SedSludge = 5 cm
B_SedSludgeOrifices = 7.5 cm
T_SedSludge = 9.33013 cm
D_SedSludgeOrifice = 0.25 in
# Sedimentation Tank Dimensions:
# [reference: Sedimentation Dimensions - Gracias.xmcd]
Z_SedSludge = 14.3301 cm
H_SedBottomSlope = 0.0831291 m
H_SedTopSlope = 0.773272 m
Z_SedSlopes = 1.01657 m
H_Sed = 2.1 m
W_Sed = 2.159 m
# Inlet Channel:
# [reference: Inlet Channel - Gracias.xmcd]
W_InletChannel = 0.634364 m
L_Channel = 6.927 m
ND_SedPipeEntrance = 20 in
N_SedInletPipes = 2
H_InletChannel = 0.857227 m
# Sedimentation Tank Effluent Launder:
# [reference: Launder - Gracias.xmcd]
N_SedLaunderOrifices = 162
Q_SedLaunderOrifices = 3.08642 L/min
# Exit Channel:
# [reference: Exit Channel - Gracias.xmcd]
W_ExitChannel = 0.634364 m
ND_SedLaunder = 8 in
H_ExitChannel = 0.857227 m
L_SedLaunder = 8.10949 m
L_ExitChannel = 6.927 m
D_SedLaunderOrifice = 0.4375 in
H_PltWeir = 0.622851 m
Z_SedLaunder = 1.85046 m
HW_ExitChannel = 0.717227 m
ZW_ExitChannel = 1.96 m
# Lamella:
# [reference: Lamella - Gracias.xmcd]
L_SedPlate = 0.748421 m
B_SedPlate = 4.12004 cm
S_SedPlate = 3.82004 cm
N_SedPlates = 161
AN_SedPlate = 60 deg
V_SedC = 10.0077 m/day
V_SedUp = 70 m/day
H_SedPlate = 0.648152 m
H_SedAbove = 0.259075 m
# Sedimentation Tank Floc Hopper:
# [reference: Floc Hopper - Gracias.xmcd]
A_FlocHopper = 0.98496 m^2
L_FlocHopper = 0.912422 m
L_FlocHopperOffset = 0.374211 m
# Flow Controller:
# [reference: FCM - Gracias.xmcd]
N_Fcm = 1
ID_FcmTube = 3.175 mm
ID_FcmTube = 0.125 in
L_FcmTube = 99.0625 cm
Q_FcmTubeMax = 285 mL/min
HL_FcmValve = 15.0907 cm
# Flocculator:
# [reference: Flocculation - Gracias -Energy Dissapation.xmcd]
W_FlocChannel = 0.45 m
L_Sed = 9.52822 m
ED_Floc = [6.4; 1.6; 0.4] mW/kg
# Check the residence time of the flocculator should be at least 20minutes
S_FlocBaffle = [8.03403; 12.7532; 20.2445] cm
B_FlocBaffle = [8.43403; 13.1532; 20.6445] cm
HW_FlocEnd = 2 m
X_FlocBaffles = [
    9.32178; 9.23744; 9.1531; 9.06876; 8.98441; 8.90007; 8.81573; 8.73139; 8.64705; 8.56271
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] m
L_FlocBaffles = [
    1.91966; 2.22395; 1.91966; 2.22395; 1.91966; 2.22395; 1.91966; 2.22395; 1.91966; 2.22395
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] m
N_FlocChannels = 1
L_FlocTank = 9.52822 m
N_FlocBaffleSection = [21; 21; 21]
HL_Floc = 20.429 cm
HW_FlocStart = 2.20429 m
Z_FlocBaffles = [
    0; 0.0803403; 0; 0.0803403; 0; 0.0803403; 0; 0.0803403; 0; 0.0803403
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] m
W_FlocPort = 0.202445 m
H_FlocPort = 0.528265 m
# Entrance Tank:
C_d := 0.62
# [reference: EntranceTankDim- Gracias.xmcd]
L_Et = 9.52822 m
W_Et = 0.45 m
HW_EtMin = 0.2 m
HW_EtMax = 0.4 m
H_Et = 2.60429 m
ZW_Et = 2.50429 m
# Any additional needed elevations should be calculated in the files above.
# Elevations:
ZW_ExitChannel = 1.96 m  # Water Level at the end of the plant in the exit channel and exit channel box
HW_Sed = 2 m
HW_FlocStart = 2.20429 m  # Water level at the beginning of the floc tank
HL_Floc = 20.429 cm  # just for ref. the head loss throught the floc tank
ZW_Et = 2.50429 m  # the height of the water in the entrance tank.
# AutoCAD References
# [reference: basics.xmcd]
# [reference: pipe.xmcd]
# [reference: tank.xmcd]
# [reference: lamina.xmcd]
# [reference: laminaplain.xmcd]
# [reference: cross.xmcd]
# [reference: Tee.xmcd]
# [reference: elbow.xmcd]
# [reference: Sludge.xmcd]
# [reference: Channel.xmcd]
# [reference: Manifold.xmcd]
# [reference: SedTankslopes.xmcd]
# [reference: inletslope.xmcd]
# [reference: inletslopetrapezoid.xmcd]
# [reference: chemicalstock.xmcd]
# [reference: Sedimentation Tank.xmcd]
# [component: inputs SedTank]
# [reference: Flocculation Tank.xmcd]
# [component: inputs FlocTank]
# [reference: Entrance Tank.xmcd]
# [component: inputs EntranceTank]
