# [reference: userinputs.xmcd]
Q_plant := 2000*L/min
# [reference: DesignAssumptions.xmcd]
# [reference: PipeDatabase.xmcd]
# [reference: FluidsFunctions.xmcd]
# Solution steps
# calculate diameter of rapid mix pipe. All riser pipes then take on this value to make connections easier
# Calculate number of riser pipes based on some sort of flow max for a given riser pipe diameter. Currently we are using the notion that an orifice at 20 cm carrying all of the water into the riser pipe must be less than 1/3 the area of the riser pipe.
# Design the orifice pattern for each riser pipe (note that an alternate solution would be to design standard riser pipe designs and then simply pick one of those designs. Thus a 3" pipe might be a 100 L/min Linear Flow Orifice Meter.
# Meet the target flows as closely as possible when the water level is at the bottom of each row of orifices
# Rapid mix pipe diameter
nomD_GritRiser := D_pipeschedule(Q_plant, PipeSpecification, HL_RapidMix, L_rmpipe, ν, ε_pvc, K_sum(0, n_elbowsrapid, 0, n_trapid, 0, 0, 0, 0, 0)) = 12 in
# returns nominal pipe size
# Number of risers
totalorificearea := A_orifice(HL_LFOM, K_orifice, Q_plant)
ID_GritRiser := innerdiameter(nomD_GritRiser, PipeSpecification) = 11.938 in  # Returns ID given nomal size
n_GritRisers := ceil(Π_LFOMarea*A_orifice(HL_LFOM, K_orifice, Q_plant)/A_circle(ID_GritRiser)) = 2
## Design LFOM
ramp(start, interval, range) :=
    for i ∈ 0 .. range/interval - 1
        ramp[i] ← start + i*interval
    return ramp
# ok
H_ramp(ΔH_LFOMorifice, HL_LFOM) := ramp(ΔH_LFOMorifice/2, ΔH_LFOMorifice, HL_LFOM)
# locations where we will try to get the target flows is midway between orifices
H_ramp(ΔH_LFOMorifice, HL_LFOM) = [1; 3; 5; 7; 9; 11; 13; 15; 17; 19] cm
Q_ramp(ΔH_LFOMorifice, HL_LFOM) := H_ramp(ΔH_LFOMorifice, HL_LFOM)/HL_LFOM*Q_plant/n_GritRisers  # Target riser flows
# Calculate the flow for a given number of submerged rows of orifices
Q_LFOMactual(RowIndexSubmerged, n_LFOMorifices, ΔH_LFOMorifice, D_LFOMorifice, HL_LFOM) :=
    Q ← 0*L/min
    for i ∈ 0 .. RowIndexSubmerged
        Q ← Q + n_LFOMorifices[i]*Q_orifice(D_LFOMorifice, H_ramp(ΔH_LFOMorifice, HL_LFOM)[RowIndexSubmerged - i], K_orifice)
    return Q
Q_LFOMactual(0, [10; 3; 2; 1], ΔH_LFOMorifice, HL_LFOM) =  # error: This value must be a scalar.
# Calculate number of orifices at each level given a diameter
calculaten_LFOMorifices(ΔH_LFOMorifice, D_LFOMorifice, HL_LFOM) :=
    Q_ramplocal ← Q_ramp(ΔH_LFOMorifice, HL_LFOM)
    H_ramplocal ← H_ramp(ΔH_LFOMorifice, HL_LFOM)
    n[last(H_ramplocal)] ← 0
    for i ∈ 0 .. last(H_ramplocal)
        n[i] ← max(0, round((Q_ramplocal[i] - Q_LFOMactual(i, n, ΔH_LFOMorifice, D_LFOMorifice, HL_LFOM))/Q_orifice(D_LFOMorifice, ΔH_LFOMorifice - D_LFOMorifice/2, K_orifice)))
    return n
D_LFOMorifice :=
    D_LFOMorificelocal ← D_circle(A_orifice(ΔH_LFOMorifice/2, K_orifice, Q_ramp(ΔH_LFOMorifice, HL_LFOM)[0])/5)
    i ← 0
    while D_LFOMorificelocal > D_drill[i]
        i ← i + 1
    return D_drill[i - 1]
# This selects an orifice size that will put approximately 5 holes in the bottom row. I selected this based on the observation that with 5 holes in the bottom row the error was very small. We should reevaluate this algorithm.
D_LFOMorifice = 26 mm
n_LFOMorifices := calculaten_LFOMorifices(ΔH_LFOMorifice, D_LFOMorifice, HL_LFOM)
n_LFOMorifices = [7; 6; 2; 5; 1; 3; 2; 1; 3; 1]
j := 0 .. 9
totaln_LFOMorifices := sum(n_LFOMorifices) = 31
Qactual[1] := Q_LFOMactual(1, n_LFOMorifices, ΔH_LFOMorifice, D_LFOMorifice, HL_LFOM) = 0.00268482 m^3/s
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# n orifices is the number of orifices at each vertical spacing
# Q.actual is the actual flowrate
# Q.error is calculating the error between actual and desired flowrates
# why is the error term divided by Q.plant rather than Q.ideal?
# how would i ever by equal to its initial value after going though this loop. what does this line do since it never actually assigns anything a value?
# You are right it won't. I have made this change.
# this function could use some simple sketches uploaded to the wiki to make sure everyone is on the same page about which dimensions we are discussing...
# I have updated the wiki with a sketch for determing the water level and therefore the depth of the grit chamber.
# so are all those connections really inside the grit chamber? I don't really understand how everything is connected?
# Nominal Pipe Size of each riser. This will also be the size of rapid mix pipe.
# I made the mistake in including the connections in the grit chamber in the head loss calculations. You only need to consider the headloss in the rapid mix pipe which results from 3 elbows. I have made this updated to the K.sum inputs.
# Are we sure that they won't want to put the chem strorage drums side by side?
D_GritRiser := NominalDiameter(ID_riser, PipeSpecification)
# so is length really just going to be a design assumption? At some point doesn't the grit chamber design need to account for the capacity we need based on flowrate and what not?
# These are like design assumptions but did not include in the diseign assumptions file to prevent cluttering. This may need to be changed.
# have the master program send the grit chamber the water level in the sed tank
# I have updated the length based on the new configuration.
n_elbowsgritdim := 2  # The number of elbows needed to calculate the width and length of the grit chamber.
n_risersgritdim := 2  # The number of pipe diameters needed to calculate the width and length of the grit chamber.
n_tgritdim := 1  # The number of tees needed to calculate the width and length of the grit chamber.
# The length of the grit chamber is calculated as the length of the tees and elbows needed for the risers in addition to some extra space (grit extra length) to allow for the riser to be assembled into the grit chamber.
grit_length := (n_tgritdim + grit_extralength)*TeeLength(NominalDiameter(ID_riser, PipeSpecification)) + n_elbowsgritdim*ElbowRadius(NominalDiameter(ID_riser, PipeSpecification)) + n_risersgritdim*D_riser
# Caluculates the width of the grit chamber as the larger of the width of the chemical feed platform and the width of the riser pipes.
grit_width :=
    return 2*r_drum + chemplatform_addwidth if (n_tgritdim + grit_extralength)*TeeLength(NominalDiameter(ID_riser, PipeSpecification)) + n_elbowsgritdim*ElbowRadius(NominalDiameter(ID_riser, PipeSpecification)) < 2*r_drum + chemplatform_addwidth
    (n_tgritdim + grit_extralength)*TeeLength(NominalDiameter(ID_riser, PipeSpecification)) + n_elbowsgritdim*ElbowRadius(NominalDiameter(ID_riser, PipeSpecification)) otherwise
# changed h.grit to h.lmax to output max. headloss through orifices
# instead of an array of orifice heights.
# The depth of the grit chamber is calculated starting from the depth of the sed tank plus the headloss through flocculator plus headloss through rapid mix pipe, plus the height of a tee, the height of half an orifice diameter, plus the height of the riser itself, and freeboard
grit_depth(floc_headloss, sedwater_level, Z_platform) := sedwater_level + floc_headloss + h_e(Q_plant, ID_riser, K_sum(0, n_elbowsrapid, 0, n_trapid, 0, 0, 0, 0, 0)) + TeeLength(NominalDiameter(ID_riser, PipeSpecification)) + .5*Riser_orifices[:, 0]*m + h_lrapidmix + freeboard_grit - Z_platform
grit_dim := [grit_length; grit_width; grit_depth(floc_headloss, sedwater_level, Z_platform)]
# The height of the riser is the same as the depth of the grit chamber
h_riser := grit_depth(floc_headloss, sedwater_level, Z_platform)
# didn't you already make this assignment above?
# didn't you already assign D.riser() to this. it would be simpler to now just assign D.riser to D.riser() as you did with n.risers
# I have made this change.
