nu := 10^-6*m^2/s
A_circle(D_circle) := π*D_circle^2/4
# Plant Flow Rate:
Q := 1000*L/min
# Width of sed tank:
w := 1 m
# Flow rate through each manifold:
Q_man := Q/6
Q_man = 2777.78 cm^3/s
# Angle of ferrocement:
An_ferro := 60 deg
# Number of port holes:
n := 50
# Angle of bottom:
An_bottom := 10 deg
D_port := 1.5 in
# Size of each port hole:
# Height of ferrocement:
H_ferro := .5*w*tan(An_ferro)
H_ferro = 0.866025 m
D_eff := .6*D_port
# Effective size of port holes:
# Height of bottom:
H_bottom := .5*w*tan(An_bottom)
H_bottom = 0.0881635 m
# Area of manifold
A_man := w*(H_ferro - H_bottom)
A_man = 0.777862 m^2
# Target G
G_avg := 10*1/sec
# Initial velocity in manifold:
V_man := Q_man/A_man
V_man = 0.357104 cm/s
Q_port := Q_man/n
Q_port = 55.5556 cm^3/s  # Flow through port given n and Deff
V_port := Q_port/A_circle(D_eff)
V_port = 13.5358 cm/s  # Velocity through port given n and Deff
V_v := (10*G_avg^2*D_eff*nu)^(1/3)
V_v = 2.83809 cm/s  # Velocity needed to get target G
h_orifice(D, K_orifice, Q) := (Q/(K_orifice*A_circle(D)))^2*1/(2*g)
H_man := h_orifice(D_eff, 0.62, Q_port)
H_man = 0.243017 cm
