# AguaClara Water Treatment Plants
# Automated Design
# User Inputs:
# Design References
# [reference: UserInputs- 1m deep.xmcd]
# [reference: DesignAssumptions-1m deep.xmcd]
# [reference: MathFunctions.xmcd]
# [reference: PipeDatabase.xmcd]
# [reference: MinorLossCoefficients.xmcd]
# [reference: FluidsFunctions.xmcd]
# Inlet Channel:
# [reference: Inlet Channel.xmcd]
W_InletChannel = 0.36385 m
L_Channel = 2.4336 m
ND_SedPipeEntrance = 12 in
# Sedimentation Tanks:
# [reference: Sedimentation.xmcd]
N_SedTanks = 2
H_SedBelowSlope = 0.6 m
H_SedBelowStraight = 0 m
H_SedPlate = 0.48 m
HW_Sed = 1.2 m
H_Sed = 1.3 m
H_SedAbove = 0.12 m
L_Sed = 3.66383 m
# Sedimentation Tank Sludge Drain:
# [reference: SludgeDrain.xmcd]
N_SedSludgeOrifices = 36
ND_SedSludge = 3 in
Q_SludgeDrainInitial = 312.686 L/min
D_SedSludgeOrifice = 0.25 in
# Sedimentation Tank Inlet Slopes:
# [reference: Sed. Inlet Slopes.xmcd]
B_SedInlet = 3.76905 cm
H_SedInlet = 7.56303 cm
AN_SedTopInlet = 39.891 deg
AN_SedBottom = 10 deg
L_SedTopInlet = 0.695326 m
A_SedInlet = 938.595 cm^2
H_SedTopInlet = 44.5934 cm
H_SedBottom = 0.0940704 m
# Sedimentation Tank Effluent Launder:
# [reference: Launder.xmcd]
N_SedLaunderOrifices = 54
Q_SedLaunderOrifices = 3.51889 L/min
Z_SedLaunder = 1.14 m
# Exit Channel:
# [reference: Exit Channel.xmcd]
W_ExitChannel = 0.36385 m
ND_SedLaunder = 4 in
H_ExitChannel = 0.55 m
L_SedLaunder = 2.7863 m
L_ExitChannel = 2.434 m
D_SedLaunderOrifice = 0.375 in
H_PltWeir = 0.312215 m
HW_ExitChannel =  # no stored result
# Lamella:
# [reference: Lamella.xmcd]
L_SedPlate = 0.554256 m
B_SedPlate = 2.40076 cm
S_SedPlate = 2.10076 cm
N_SedPlates = 87
AN_SedPlate = 60 deg
V_SedC = 10.032 m/day
V_SedUp = 70 m/day
# Flow Controller:
# [reference: FCM.xmcd]
N_Fcm = 1
ID_FcmTube = 3.175 mm
ID_FcmTube = 0.125 in
L_FcmTube = 99.0625 cm
Q_FcmTubeMax = 285 mL/min
HL_FcmValve = 15.0907 cm
# Flocculator:
# [reference: Flocculation.xmcd]
W_FlocChannel = 0.5335 m
S_FlocBaffle = [0.0821457; 0.0982675; 0.130277; 0.334687] m
B_FlocBaffle = [0.0861457; 0.102267; 0.134277; 0.338687] m
N_FlocBafflesMin = 53
HL_Floc = 8.97527 cm
X_FlocBaffles = [
    0.6835, 3.31431, 0.349687;
    0.769646, 3.18004, 0.688374;
    0.855791, 3.04576, 1.02706;
    0.941937, 2.91148, 1.36575;
    1.02808, 2.77721, 1.70443;
    1.11423, 2.64293, 2.04312;
    1.20037, 2.50865, 2.38181;
    1.28652, 2.37438, 2.7205;
    1.37267, 2.2401, 3.05918;
    1.45881, 2.10582, 0;
    1.54496, 1.97155, 0;
    1.6311, 1.63286, 0;
    1.71725, 1.29417, 0;
    1.81952, 0.955485, 0;
    1.92178, 0.616798, 0;
    2.02405, 0, 0;
    2.12632, 0, 0;
    2.22859, 0, 0;
    2.33085, 0, 0;
    2.43312, 0, 0;
    2.53539, 0, 0;
    2.63766, 0, 0;
    2.73992, 0, 0;
    2.84219, 0, 0;
    2.94446, 0, 0;
    3.07873, 0, 0;
    3.21301, 0, 0
] m
HW_FlocStart = 1.28975 m
W_FlocPort = 0.334687 m
L_FlocBaffles = [
    1.11785, 1.06972, 0.865313;
    1.30761, 1.25948, 1.05507;
    1.11785, 1.06972, 0.865313;
    1.30761, 1.25948, 1.05507;
    1.11785, 1.06972, 0.865313;
    1.30761, 1.25948, 1.05507;
    1.11785, 1.06972, 0.865313;
    1.30761, 1.25948, 1.05507;
    1.11785, 1.06972, 0.865313;
    1.30761, 1.25948, 0;
    1.11785, 1.06972, 0;
    1.30761, 1.05507, 0;
    1.11785, 0.865313, 0;
    1.29149, 1.05507, 0;
    1.10173, 0.865313, 0;
    1.29149, 0, 0;
    1.10173, 0, 0;
    1.29149, 0, 0;
    1.10173, 0, 0;
    1.29149, 0, 0;
    1.10173, 0, 0;
    1.29149, 0, 0;
    1.10173, 0, 0;
    1.29149, 0, 0;
    1.10173, 0, 0;
    1.25948, 0, 0;
    1.06972, 0, 0
] m
H_FlocPort = 0.5335 m
N_FlocBaffles = 51
Z_FlocBaffles = [
    0, 0, 0;
    0.0821457, 0.130277, 0.334687;
    0, 0, 0;
    0.0821457, 0.130277, 0.334687;
    0, 0, 0;
    0.0821457, 0.130277, 0.334687;
    0, 0, 0;
    0.0821457, 0.130277, 0.334687;
    0, 0, 0;
    0.0821457, 0.130277, 0;
    0, 0, 0;
    0.0821457, 0.334687, 0;
    0, 0, 0;
    0.0982675, 0.334687, 0;
    0, 0, 0;
    0.0982675, 0, 0;
    0, 0, 0;
    0.0982675, 0, 0;
    0, 0, 0;
    0.0982675, 0, 0;
    0, 0, 0;
    0.0982675, 0, 0;
    0, 0, 0;
    0.0982675, 0, 0;
    0, 0, 0;
    0.130277, 0, 0;
    0, 0, 0
] m
Gt_FlocMinFlow = 6805.57
N_FlocChannels = 3
# Entrance Tank:
# [reference: EntranceTank.xmcd]
ND_Lfom = 2 in
HL_Rm = 7.03971 cm
N_Lfom = 9
D_LfomOrifices = 6.35 mm
Q_LfomErrorMax = 1.3255 %
N_LfomOrifices =  # no stored result
L_Et = 0.5335 m
W_Et = 0.5335 m
HW_EtMin = 0.2 m
HW_EtMax = 0.4 m
H_Et = 0.5 m
ZW_Et = 1.53975 m
# Any additional needed elevations should be calculated in the files above.
# AutoCAD References
# [reference: basics.xmcd]
# [reference: pipe.xmcd]
# [reference: tank.xmcd]
# [reference: lamina.xmcd]
# [reference: cross.xmcd]
# [reference: Tee.xmcd]
# [reference: elbow.xmcd]
# [reference: Sludge.xmcd]
# [reference: Channel.xmcd]
# [reference: Manifold.xmcd]
# [reference: SedTankslopes.xmcd]
# [reference: Sed Tank Inlet Slope.xmcd]
# [reference: chemicalstock.xmcd]
# [reference: Sedimentation Tank.xmcd]
# [component: inputs SedTank]
# [reference: Flocculation Tank.xmcd]
# [component: inputs FlocTank]
# [reference: Entrance Tank.xmcd]
# [component: inputs EntranceTank]
