# AguaClara Water Treatment Plants
# Automated Design
# [reference: userinputs.xmcd]
# User Inputs:
# Engineer Entered Values: | Values used to Draw Plant:
tank_thick = 0.15 m
Q_plant := 350*gal/min
lvltank_thick = 0.15 m
# sed tank parameters
stockplat_thick := lvltank_thick
beta = 0.959931
grit_thick := lvltank_thick
SedTank_width = 1 m  # Width of the lamella
platform_thick = 0.3 m
L_lamella = 0.9 m  # length of the lamella
channel_thick = 0.15 m
lamella_spacing = 0.05 m  # lamella spacing
walkway_width = 1 m
PipeSpecification = 4
DrillSeries = 0
# Design References
# [reference: DesignAssumptions.xmcd]
# [reference: PipeDatabase.xmcd]
# [reference: FluidsFunctions.xmcd]
# [reference: Pipe Design and minor loss coefficients.xmcd]
# [reference: Channel design.xmcd]
# [reference: Chemical Feed.xmcd]
# [reference: Flocculation Function.xmcd]
# [reference: GritChamber.xmcd]
# [reference: Plant Elevation Design.xmcd]
# [reference: plantleveltank.xmcd]
# [reference: Sedimentation Function.xmcd]
# [reference: Sludge Drain Design Program.xmcd]
# [reference: Launder.xmcd]
r_drum = 0.3 m
# Calls Functions Here:
# Chemical Feed Design
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Q_alum := ChemicalFeed(Q_plant) = 662.447 mL/min
# Channel Design
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Channel_dim := Channel(Q_plant, SedTank_width, tank_thick) = [3.3; 0.687358; 0.7] m
# Sedimentation Tank Design
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pipediameter := 6 in
SedTank := SedTankDesign(Q_plant, SedTank_width, lamella_spacing, L_lamella, beta, Channel_dim) = [[6.80949; 1; 2.12942], 98, 2.02942, 1.42942, 0.00013161, 0.25, 0.285926]
[sedtank_dim, N_lamella, water_depth, z_plat, v_c, spaceabove] := SedTank
SedTank = [[6.80949; 1; 2.12942], 98, 2.02942, 1.42942, 0.00013161, 0.25, 0.285926]
sedtank_dim := SedTank[:, 0][0]*m = [6.80949; 1; 2.12942] m
N_lamella := SedTank[0, 1] = 98
sedwater_level := SedTank[0, 2]*m = 2.02942 m
z_plat := SedTank[0, 3]*m = 1.42942 m
v_c := SedTank[0, 4]*m/s = 11.3711 m/day
spaceabove := SedTank[0, 5]*m = 0.25 m
# Flocculator Design
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# The baffle positions are reported in the following way:
# There is one matrix for each channel. The first column is the x position
# of the baffle. The 2nd column is the starting y position of a baffle (ie top of the tank (0),
# or bottom of tank), the 3rd column is the final position of the baffle.
# Therefore a baffle at position x extends between the two y coordinates.
Flocculator := flocculator(Q_plant, sedtank_dim) = [[13.619; 0.5; 2.17497], [0.22; 0.31; 0.65], 23, 0.0455455, [0.295; 1.10169], [[
    0.22, 2.17497, 0.475545;
    0.44, 0, 1.84497;
    0.66, 2.17497, 0.475545;
    0.88, 0, 1.84497;
    1.19, 2.17497, 0.610545;
    1.5, 0, 1.70997;
    1.81, 2.17497, 0.610545;
    2.12, 0, 1.70997;
    2.77, 2.17497, 1.12055;
    3.42, 0, 1.19997;
    4.07, 2.17497, 1.12055;
    4.72, 0, 1.19997;
    5.37, 2.17497, 1.12055;
    6.02, 0, 1.19997
], [
    6.15949, 2.17497, 1.12055;
    5.50949, 0, 1.19997;
    4.85949, 2.17497, 1.12055;
    4.20949, 0, 1.19997;
    3.55949, 2.17497, 1.12055;
    2.90949, 0, 1.19997;
    2.25949, 2.17497, 1.12055;
    1.60949, 0, 1.19997;
    0.959492, 2.17497, 1.12055
]], 5919.75, [4; 4; 15], 9.92]
floc_dim := Flocculator[0, 0]*m = [13.619; 0.5; 2.17497] m
baffle_spacing := Flocculator[0, 1]*m = [22; 31; 65] cm
tot_baffle := Flocculator[0, 2] = 23
floctotal_hl := Flocculator[0, 3]*m = 4.55455 cm
uturnhole_dim := Flocculator[0, 4]*m = [0.295; 1.10169] m
baffle_positions := Flocculator[0, 5]*m
[floc_dim/m, baffle_spacing/m, tot_baffle, total_hl/m, uturnhole_dim/m, baffle_positions, Gθ_newmin, n_bafflesnew, length_duetobaffles/m]  # disabled
# Grit Chamber Design
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Grit := gritchamber(Q_plant, PipeSpecification, DrillSeries, lamella_spacing, L_lamella, beta, Channel_dim, sedtank_dim, sedwater_level, floctotal_hl, z_plat) = [[1.9812; 0.9048; 1.40052], 3, [823; 420; 356; 290; 252; 225; 205; 191; 178; 167], 0.2032, [0.003], 1.40052]
Grit = [[1.9812; 0.9048; 1.40052], 3, [823; 420; 356; 290; 252; 225; 205; 191; 178; 167], 0.2032, [0.003], 1.40052]
# Launderer Design
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Laund := Launder(Q_plant, PipeSpecification, SedTank[:, 0][0][0]*m, SedTank[:, 2][0]*m, SedTank[:, 5][0]*m, Channel_dim[1], SedTank[:, 0][0][1]*m, platform_thick, walkway_width, n_sedtanks, Orifice_dist, hl_launder, Q_ratioLaunderOrf, ν, ε_pvc, Q_ratioLaunders, spacebelow_total) = [6.80949, 2.88522 + 2.88522i, 10, 1.90442, 0.389729, 136, -0.0220067, 0.409575, 0.158688, 12]
# Sludge Pipe Design
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SludgePipe := Sludge(Q_plant, PipeSpecification, SedTank[:, 0][0][0]*m, SedTank_width, SedTank[:, 2][0]*m) = [3, 0.635911, 10, 6.80949, 68]
[D_sludgedrain/m, D_orifice/m, L_sludgeports/m]
# Plant Leveling Tank
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PLT := PlantLevelingTank(Q_plant, PipeSpecification, Laund[:, 4][0]*cm, Laund[:, 6][0]*cm) = [[0.664092; 0.603897; 0.7], 8, 50.022, 60.022]
# Plant Elevation Design
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L_sedExitPipes := L_sedexits(channel_thick, tank_thick, Channel_dim[1], walkway_width, PLT[:, 0][0][0]*m, platform_thick, SedTank_width) = [3.45872; 4.68009; 5.90145] m
Z_elevation := PlantElevations(Q_plant, Grit, Laund, SedTank, Q_alum, PLT[:, 2][0], PLT[:, 1][0]*m, Flocculator[:, 3][0]*m, L_lamella, Laund[:, 4]*cm, L_sedExitPipes) = [3.57541; 2.97541; 2.87541; 1.67541; 2.77541; 2.72541; 2.52541; 2.82541; 2.72541; 2.52541; 2.21911; 2.21911; 2.17497; 2.07497; 2.12942; 2.02942; -1.83971; -5.70885; -6.48827; 1.42942; 2.02219; 2.02839; 2.12942] m
# Constructing Tables of Parameters:
# Defining components of Output Arrays:
[sedtank_dim, N_lamella, water_depth, z_plat, v_c, spaceabove] := SedTank
[floc_dim, baffle_spacing, tot_baffle, total_hl, uturnhole_dim, baffle_positions, Gθ_newmin, n_bafflesnew, length_duetobaffles] := Flocculator
[SedPipe_length, D_laundOrf, laundOrf_dist, manifold_elevation, HL_laundertotal, n_laundOrf, h_laundOrf, offfloor_length, Pipe9_length, D_launder] := Laund
[D_sludgedrain, D_sludgeOrf, sludgeOrf_dist, L_sludgePipe, n_sludgeports] := SludgePipe
[lvltank_dim, D_weir, H_weir, HW_plantleveling] := PLT
[grit_dim, n_GritRisers, n_GritOrf, D_GritRiser, D_GritOrf] := Grit
D_GritOrf := D_GritOrf[0]
# Defining components of Table Arrays:
headerrow := ["Parameter"; "Value"; "Units"]
Parameters := [
    "Number of lamella in sedimentation tanks", N_lamella, " ";
    "critical velocity in sed tank", v_c, " meter per day";
    "number of baffles in flocculator", tot_baffle, " ";
    "total headloss through flocculator", floctotal_hl*1/cm, "centimeters";
    "length of the sedimentation inlet launder", SedPipe_length, "meters";
    "diameter of orifices in the launder", D_laundOrf, "centimeters";
    "distance between orifices in the launder", laundOrf_dist, "centimeters";
    "manifold elevation", manifold_elevation, "meters";
    "diameter of the sedimentation inlet launder", D_launder, "inches";
    "number of orifices in the launder", n_laundOrf, " ";
    "diameter of sedimentation outlet sludge pipe", D_sludgedrain, "inches";
    "diameter of orifices in sludge pipe", D_sludgeOrf*m/cm, "centimeters";
    "distance between orifices in sludge pipe", sludgeOrf_dist, "meters";
    "Diameter of weir in Plant Leveling Tank", D_weir, "inches";
    "Height of weir in PLT", H_weir, "centimeters";
    "Height of the Water in the PLT", HW_plantleveling, "centimeters";
    "number of risers in grit chamber", n_GritRisers, " ";
    "diameter of risers in grit chamber", D_GritRiser*m/in, "inches";
    "diameter of orifices in grit chamber", D_GritOrf*m/cm, "centimeters"
]
headercolumn
Units := Parameters[:, 2]
headercolumn := Parameters[:, 0]
Z := Parameters[:, 1]
table(headerrow, headercolumn, Z) :=
    for i ∈ 0 .. length(headercolumn)
        for j ∈ 0 .. last(headerrow)
            table[i, j] ← headerrow[j] if i == 0
            otherwise
                table[i, j] ← headercolumn[i - 1] if j == 0
                table[i, j] ← Z[i - 1] if j == 1
                table[i, j] ← Units[i - 1] if j == 2
    return table
headercolumn_Dim := [" Sedimentation Tank"; "Dimensions of Flocculator"; "Dimensions of Grit Chamber"; "Dimensions of Leveling Tank"; "Dimensions of Channel"]
headerrow_Dim := ["Component"; "Length"; "Width"; "Height"; "Units"]
Dim_y := [sedtank_dim[1]; floc_dim[1]; grit_dim[1]; lvltank_dim[1]; Channel_dim[1]/m]
Dim_z := [sedtank_dim[2]; floc_dim[1]; grit_dim[2]; lvltank_dim[2]; Channel_dim[2]/m]
Dim_x := [sedtank_dim[0]; floc_dim[0]; grit_dim[0]; lvltank_dim[0]; Channel_dim[0]/m]
Units2 := ["meter"; "meter"; "meter"; "meter"; "meter"]
tableDim(headerrow_Dim, headercolumn_Dim, Dim_x, Dim_y, Dim_z, Units2) :=
    for i ∈ 0 .. length(headercolumn_Dim)
        for j ∈ 0 .. last(headerrow_Dim)
            tableDim[i, j] ← headerrow_Dim[j] if i == 0
            otherwise
                tableDim[i, j] ← headercolumn_Dim[i - 1] if j == 0
                tableDim[i, j] ← Dim_x[i - 1] if j == 1
                tableDim[i, j] ← Dim_y[i - 1] if j == 2
                tableDim[i, j] ← Dim_z[i - 1] if j == 3
                tableDim[i, j] ← Units2[i - 1] if j == 4
    return tableDim
# Constructing Plant Elevation Tables:
headerrow_elevation := ["Element"; "Elevation from bottom of the sed tank (m)"; "Elevation from platform (m)"]
# top of alum stock tank
# port on alum stock tank
# bottom of alum stock tank
# alum platform height
# valve level in the FCM
# water level in the FCM
# end of the FCM tube at maximum alum dose
# grit chamber wall
# grit chamber maximum water level
# orifice elevation in the grit chamber
# horizontal pipe centerline where it leaves the grit chamber
# water level in rapid mix
# wall height for beginning of flocculator
# water level at beginning of flocculator
# wall height for the sedimentation tank
# water level in the sedimentation tank and channel
# top of the effluent launder
# top of the plate settlers
# bottom of the plate settlers
# platform height
# weir height
# level control water height
headercolumn_elevation := [
    "top of alum stock tank";
    "port on alum stock tank";
    "bottom of alum stock tank";
    "alum platform height";
    "valve level in the FCM";
    "water level in the FCM";
    "end of the FCM tube at maximum alum dose";
    "grit chamber wall";
    "grit chamber maximum water level";
    "orifice elevation in the grit chamber";
    "horizontal pipe centerline where it leaves the grit chamber";
    "water level in rapid mix";
    "wall height for beginning of flocculator";
    "water level at beginning of flocculator";
    "wall height for the sedimentation tank";
    "water level in the sedimentation tank and channel";
    "centerline of the effluent launder";
    "top of the plate settlers";
    "bottom of the plate settlers";
    "platform height";
    "weir height";
    "level control water height";
    "level control wall height"
]
tableElevation(headerrow_elevation, headercolumn_elevation, Z_elevation) :=
    for i ∈ 0 .. length(headercolumn_elevation)
        for j ∈ 0 .. last(headerrow_elevation)
            table[i, j] ← headerrow_elevation[j] if i == 0
            otherwise
                table[i, j] ← headercolumn_elevation[i - 1] if j == 0
                table[i, j] ← Z_elevation[i - 1] if j == 1
                table[i, j] ← Z_elevation[i - 1] - Z_elevation[22] if j == 2
    return table
# Tables:
# top
# [component: inputs table(headerrow, headercolumn, Z)]
# [component: inputs tableDim(headerrow_Dim, headercolumn_Dim, Dim_x, Dim_y, Dim_z, Units2)]
# [component: inputs tableElevation(headerrow_elevation, headercolumn_elevation, Z_elevation)]
# the negative sign here for alum platform height shows that the height chosen
# for the height of the chemical platform column is larger than
# that calculated based on the headloss through the FCM and
# Grit Chamber, so that from the platform the height of the platform
# is actually below the platform to make up for the shorter height needed
