# [reference: UserInputs- 4 Communities.xmcd]
# [reference: DesignAssumptions- 4 Communities.xmcd]
# [reference: MathFunctions.xmcd]
# [reference: PipeDatabase.xmcd]
# [reference: MinorLossCoefficients.xmcd]
# [reference: FluidsFunctions.xmcd]
# This program produces the critical parameters for a single sed tank. All sed tanks are built identically.
# Each tank should have the same flowrate. The total space below the tank is 1 m (design assumption). Part of this space will have sloped walls (to help with draining) and part might have
# straight walls. The length of the sloped walls is determined by the tank width and the
# slope of the walls (they should be between 45 and 60 deg). The space between the top
# of the plate settlers and the water surface is equal to .25*spacing between adjacent launders.
# Since each tank has 1 launderer, the space between adjacent ones is equal to the tank width.
# This should ensure equal flow of effluent through these pipes. The depth of the middle section of
# the tank is determined by the length and slope of the plate settlers. The total depth of the tank is
# equal to the sum of these three depths, plus a freeboard depth. Freeboard space is empty space between the top of the tank and the water surface
Q_Sed := Q_Plant/N_SedTanks = 190 L/min
ED_Slope = 0.0004 m^2/s^3
B_SedPort :=
    error ← 1
    minerror ← 0.001
    B_SedPortPrev ← 0 m
    while error > minerror
        W_Trapezoid ← W_SedSingle/2 - B_SedPortPrev - T_SedInletSlope
        B_SedPort ← (K_SlopeExit*(V_SedUpBod*W_Trapezoid*Π_SedPort)^3/(2*Π_SedCell*ED_Slope))^(1/4)
        error ← |B_SedPortPrev - B_SedPort|/mean(B_SedPortPrev, B_SedPort)
        B_SedPortPrev ← B_SedPort
    return B_SedPort
Π_SedCell = 2
# I assume square ports here
W_Trapezoid := 20 in
(K_SlopeExit*(V_SedUpBod*W_Trapezoid*Π_SedPort)^3/(2*Π_SedCell*ED_Slope))^(1/4) = 0.0574501 m
B_SedPort = 0.0514292 m
W_Trapezoid := W_SedSingle/2 - B_SedPort - T_SedInletSlope
V_SedPort := V_SedUpBod*W_Trapezoid*Π_SedPort*B_SedPort/B_SedPort^2 = 3.45253 cm/s
V_Trapezoid := V_SedPort/3 = 1.15084 cm/s
A_Trapezoid := 1/2*W_Trapezoid^2*(tan(AN_SedTopInlet) - tan(AN_SedBottom)) + H_SlopeRectangle*W_Trapezoid = 0.13261 m^2
L_SedMax := V_Trapezoid*A_Trapezoid/(V_SedUpBod*W_SedSingle/2) = 3.48992 m
Q_SedInlet := V_Trapezoid*A_Trapezoid
L_Sed := Q_SedInlet/(V_SedUpBod*W_SedSingle/2) = 3.48992 m
L_SedTotal := Q_Plant/(V_SedUpBod*W_SedSingle/2) = 14.4829 m
N_Slopes := L_SedTotal/L_Sed = 4.14992
N_TrianglesperTank :=
    slopes ← ceil(N_Slopes/N_SedTanks) if N_Slopes/N_SedTanks - trunc(N_Slopes/N_SedTanks) > 0.2
    slopes ← floor(N_Slopes/N_SedTanks) otherwise
    slopes ← slopes + 1 if round(round(slopes/2) - (slopes/2)) == 1
    return slopes
N_SlopePairs := N_TrianglesperTank/2
H_SedPort := B_SedPort/cos(AN_SedBottom)
W_SedPort := H_SedPort = 0.0522225 m
B_SedPortOpenings := Π_SedPort*W_SedPort = 0.261113 m
N_SedPorts := ceil(L_Sed/B_SedPortOpenings)
W_Sed := W_SedSingle*N_SlopePairs
ND_SedPipeEntrance :=
    ND_SedPipeEntrance ← ND_SedInlet(K_El90, Q_Plant/(N_SedInletPipes*N_SedTanks), Nu_Water, G_FlocBod[last(G_FlocBod)], EN_PipeSpec) if sedlayout == 1
    ND_SedPipeEntrance ← ND_SedInlet(K_PipeExit, Q_Plant/(N_SedTanks*N_SedInletPipes), Nu_Water, G_FlocMin, EN_PipeSpec) if sedlayout == 3 or 2
    return ND_SedPipeEntrance
