# This program produces the critical parameters for a single sed tank. All sed tanks are built identically.
Q_SedTank := Q_Plant/N_SedTank = 215 L/min
# Each tank should have the same flowrate. The total space below the tank is 1 m (design assumption). Part of this space will have sloped walls (to help with draining) and part might have
# straight walls. The length of the sloped walls is determined by the tank width and the
# slope of the walls (they should be between 45 and 60 deg). The space between the top
# of the plate settlers and the water surface is equal to .25*spacing between adjacent launders.
# Since each tank has 1 launderer, the space between adjacent ones is equal to the tank width.
# This should ensure equal flow of effluent through these pipes. The depth of the middle section of
# the tank is determined by the length and slope of the plate settlers. The total depth of the tank is
# equal to the sum of these three depths, plus a freeboard depth. Freeboard space is empty space between the top of the tank and the water surface
H_SedBelowSlope := (W_SedTank/2)*tan(AN_SedBottom) = 0.866025 m
H_SedBelowStraight := (H_SedBelow - H_SedBelowSlope) = 0.133975 m
H_SedAbove := Pi_SedAboveW*W_SedTank = 0.25 m
H_SedPlate := L_SedPlate*sin(AN_SedPlate) = 0.779423 m
HW_Sed := (H_SedPlate + H_SedAbove + H_SedBelow) = 2.02942 m
H_SedTank := (HW_Sed + H_PlantFreeboard)
Z_Mp := (HW_Sed - HW_Channel)
# The critical velocity is calculated and verfied against a max value. If the critical
# velocity is too large, some of the particles will not settle out in the sed tank.
# We need to make sure that both design constraints are met.
# VSedUp is based on the entire area in the bottom of the sed tank
# VSedC is based on the plate settlers.
# Calculate the inactive Length of the tank
L_SedVUp := Q_SedTank/(V_SedUpBod*W_SedTank) = 4.42286 m
ND_LaunderEstimated := ND_Manifold(Q_SedTank, HL_SedLaunderBod, L_SedVUp, Pi_QLaunderOrifices, EN_PipeSpec, NU, E_Pvc, 0, L_SedVUp/B_SedLaunderOrifices)
L_SedTankInactive := L_SedPlate*cos(AN_SedPlate) + W_Channel + T_Channel + ND_LaunderEstimated = 0.901386 m
# Calculate minimum number of plate settlers
V_SedUpActiveMax := V_SedCBod*(1 + L_SedPlate/(B_SedPlate - T_SedPlate)*cos(AN_SedPlate)*sin(AN_SedPlate)) = 92.9173 m/day
L_SedActiveMin := Q_SedTank/(V_SedUpActiveMax*W_SedTank) = 3.33199 m  # Note this doesn't include the area occupies by the thickness of the plate settlers
# Number of spaces where water is traveling is one less than the number of plates used to create those spaces
N_SedPlatesMin := ceil(L_SedActiveMin*sin(AN_SedPlate)/(B_SedPlate - T_SedPlate)) + 1 = 63
L_SedTank := max(L_SedVUp, L_SedTankInactive + ((N_SedPlatesMin*T_SedPlate + (N_SedPlatesMin - 1)*(B_SedPlate - T_SedPlate))/sin(AN_SedPlate))) = 4.48442 m
# Now calculate actual values of all parameters!
L_SedTankPlates := L_SedTank - L_SedTankInactive = 3.58304 m
N_SedPlates := (L_SedTankPlates - T_SedPlate/sin(AN_SedPlate))*sin(AN_SedPlate)/B_SedPlate + 1 = 63
L_SedActive := L_SedTankPlates - N_SedPlates*T_SedPlate/sin(AN_SedPlate) = 3.3648 m
V_SedUp := Q_SedTank/(L_SedTank*W_SedTank) = 69.039 m/day
V_SedUpActive := Q_SedTank/(L_SedActive*W_SedTank) = 92.0115 m/day
V_SedC := V_SedUpActive/(1 + L_SedPlate/(B_SedPlate - T_SedPlate)*cos(AN_SedPlate)*sin(AN_SedPlate)) = 9.90251 m/day
