# Engineer Entered Values: | Values used to Draw Plant:
tank_thick := 15 cm
Q_plant := 645*L/min
lvltank_thick := 15 cm
# sed tank parameters
stockplat_thick := lvltank_thick
beta := 55 deg
grit_thick := lvltank_thick
SedTank_width := 1 m  # Width of the lamella
platform_thick := 30 cm
L_lamella := 90 cm  # length of the lamella
channel_thick := 15 cm
lamella_spacing := 5 cm  # lamella spacing
walkway_width := 1 m
PipeSpecification := 2
DrillSeries := 0
