# Flocculator Modular Design
Floc_Origin := [Plant_Origin[0]; Plant_Origin[1] + N_SedTanks*(W_Sed + T_PlantWall); Plant_Origin[2] + Z_FlocTank]  # error: This variable is undefined.
# User Inputs
Q_Plant := 20*L/s  # To be left undefined and inputed online by the user
# Length of the Flocculator, defined by user
method := "Flocculator"
L_Sed := 7.55 m
HW_Sed := 1.961 m  # Height of Flocculator, defined by user
Z_FlocBafflesMin := 1.899 m
W_FlocChannelOpening := .4 m  # Needed from outside code/Possible User Inputs
Z_FlocChannelBottom := 1.665 m
H_FlocLF := 1.65 m
# From Expert Inputs
N_SedBays :=
    1 if Q_Plant ≤ 29*L/s
    2 otherwise
N_SedTanks :=
    1 if Q_Plant ≤ 3*L/s
    2 if Q_Plant ≤ 6*L/s and Q_Plant > 3*L/s
    3 if Q_Plant ≤ 58*L/s and Q_Plant > 6*L/s
    4 if Q_Plant ≤ 78*L/s and Q_Plant > 58*L/s
    5 if Q_Plant ≤ 97*L/s and Q_Plant > 78*L/s
    6 if Q_Plant ≤ 117*L/s and Q_Plant > 97*L/s
    7 if Q_Plant ≤ 136*L/s and Q_Plant > 117*L/s
    8 if Q_Plant ≤ 156*L/s and Q_Plant > 136*L/s
    9 if Q_Plant ≤ 175*L/s and Q_Plant > 156*L/s
    10 if Q_Plant ≤ 195*L/s and Q_Plant > 175*L/s
    11 if Q_Plant ≤ 214*L/s and Q_Plant > 195*L/s
# Redefined for this modular code!
ND_RMPipe :=
    (.102 m) if Q_Plant ≤ 4*L/s
    (.152 m) if Q_Plant ≤ 10*L/s and Q_Plant > 4*L/s
    (.203 m) if Q_Plant ≤ 17*L/s and Q_Plant > 10*L/s
    (.254 m) if Q_Plant ≤ 27*L/s and Q_Plant > 17*L/s
    (.305 m) if Q_Plant ≤ 38*L/s and Q_Plant > 27*L/s
    (.381 m) if Q_Plant ≤ 54*L/s and Q_Plant > 38*L/s
    (.508 m) if Q_Plant ≤ 96*L/s and Q_Plant > 54*L/s
    .61 m otherwise
W_Sed :=
    (1.067 m) if Q_Plant ≤ 29*L/s
    (2.134 m) otherwise
Q_PlantMaxLF := 5*L/s
Country := 0
Language := 0
# Tabulated Constants
E_Pvc := 0.12 mm
Nu_Water := 1*10^-6*m^2/s  # The kinematic viscosity of water.
Pi_Jet := 0.4
Pi_VenaContractaOrifice := 0.63
E_Concrete := 2 mm
# General Assumptions and Constants
T_PlantWall := 15 cm
W_HumanMin := 0.54 m
S_Fitting := 5 cm  # minimum space between fittings in a tank or fittings and the wall of the tank.
W_ChannelMin := 15 cm  # Minimum channel width for constructability
HL_ChannelMax := 5 cm
H_PlantFreeboard := 0.1*m
T_ConcreteMin := 5 cm
USD := ¤
Lem := USD/19.06
ND_SpacerPipe := 3/4*in
# Entrance Tank
L_FlocCouplingExt := 5 cm
T_RMOrificePlate := 2 cm
E_MaxRM := 1*W/kg
# Flocculator
Pi_JSOptimal := 3
Pi_JSMin := 2
ED_Floc := 10.5*mW/kg
# Increased from 6 to 10 on 7/14/2011 to compensate for increase in Pi.Jet from 0.38 (in flocculator) and 0.34 (in ports, pipes, channels) to a new value of 0.4.
Pi_FlocBaffleMin := 1
Pi_FlocBaffleMax := 1.5
# increased to 100 at the request of Dan and Sarah
CP_Floc := 75 m^(2/3)  # value decreased 1/26/12
T_FlocBaffleRigidH := 15 cm
T_FlocBaffleRigidV := 5 cm
H_FlocOption := 0
# The minor loss coefficient is 2. According to measurements at Agalteca and according to
# https://confluence.cornell.edu/display/AGUACLARA/PAHO+Water+Treatment+Publications (page 100 in chapter on flocculation)
K_FlocBaffle := 2.5
# Increased both to provide a safety margin on flocculator head loss and to simultaneously scale back on the actual collision potential we are trying to achieve.
Ti_FlocDrain := 30 min
S_FlocBaffleSetBackPlastic := 2 cm
ND_FlocModulesMain := 1/2*in
ND_FlocModulesLarge := 1.5 in
# Sedimentation Tank
B_SedLaunderOrificesEst := 10 cm
ED_SedInlet := ED_Floc
T_SedWeir := 4 cm
HL_SedLaunderBod := 4 cm
V_SedUpBod := 1*mm/s
W_SedPlate := 42 in
W_SedBay := W_SedPlate
W_Plastic := W_SedPlate
T_SedPlate := 0.2 cm
Pi_QLaunderOrifices := 0.80
HL_SedWeirMax := 5 cm
Perpendicular_Weir := 0
Parallel_Weir := 1
L_SedLaunderCapExcess := 3 cm
S_SedPlateMin := 2.5 cm
AN_SedPlate := 60 deg
L_SedPlateCantilevered := 20 cm
# Stacked Rapid Sand Filter
HL_FiEntrancePipeMax := 10 cm
# Minor Loss Coefficients
# Individual K Values
K_PipeExit := 1
K_PipeEnt := 0.5
K_El90 := 0.9
K_GateValve := 0.39
K_Exp := 1
# Wall Thicknesses
T_ChannelWall := T_PlantWall
# Operator Access
W_DCWalkway := 1 m
# Design References
# [reference: MathFunctions.xmcd]
# [reference: PipeDatabase.xmcd]
# [reference: FluidsFunctions.xmcd]
# From Flocculator Design Code
Floc_Origin := [0 m; 0 m; 0 m]
# Redefined for this modular code!
Plant_Origin[0] := Floc_Origin[0]
Plant_Origin[1] := Floc_Origin[1] - N_SedTanks*(W_Sed + T_PlantWall) = -3.651 m
# [reference: FlocculatorMod.xmcd]
# From Flocculator Drawing Code
# [reference: MtoATranslators.xmcd]
# [reference: MtoATranslatorsWrapped.xmcd]
# [reference: PlumbingF.xmcd]
# [reference: TankF.xmcd]
Plant_Origin[2] := Floc_Origin[2] - Z_FlocTank  # Redefined for this modular code!
# [reference: FlocculatorACMod.xmcd]
AC_FlocTank :=
    stack(FlocTankScript, FlocTankBaffleScriptH, FlocTankDrainCouplingScript, FlocTankDrainPipeScript, FlocTankDrainAdapterScript, FlocTankDrainValveScript, FlocRMScript) if EN_FlocHoriz == 1 and N_FlocChannels ≤ 2
    stack(FlocTankScript, FlocTankBaffleScriptH, FlocTankDrainCouplingScript, FlocTankDrainPipeScript, FlocTankDrainAdapterScript, FlocTankDrainValveScript, FlocDrainArray, FlocRMScript) if EN_FlocHoriz == 1 and N_FlocChannels > 2
    stack(FlocTankScript, FlocTankBaffleScriptV, FlocModules, FlocTankDrainCouplingScript, FlocTankDrainPipeScript, FlocTankDrainAdapterScript, FlocTankDrainValveScript, FlocRMScript) if EN_FlocHoriz == 0 and N_FlocChannels ≤ 2
    stack(FlocTankScript, FlocTankBaffleScriptV, FlocModules, FlocTankDrainCouplingScript, FlocTankDrainPipeScript, FlocTankDrainAdapterScript, FlocTankDrainValveScript, FlocDrainArray, FlocRMScript) otherwise
# Previews
# [reference: LayoutsAC.xmcd]
# Display Variables
L_Sed = 7.55 m
HW_Sed = 1.961 m
Q_Plant = 0.02 m^3/s
AC_FlocTank =  # no stored result
# [component: inputs AC_FlocTank]
AI_Preview =  # error: This variable is undefined.
