# Code created by Heidi Rausch (her28@cornell.edu)
# LFOM Modular Design
# User Inputs
Q_Plant := □*L/s  # error: This placeholder is empty.
# To be left undefined and inputed online by the user
# From Expert Inputs
# [reference: ExpertInputs.xmcd]
# Design References
# [reference: MathFunctions.xmcd]
# [reference: PipeDatabase.xmcd]
# [reference: MaterialsDatabase.xmcd]
# [reference: FluidsFunctions.xmcd]
# [reference: LFOM.xmcd]
# LFOM Code
# [reference: MtoATranslators.xmcd]
# [reference: MtoATranslatorsWrapped.xmcd]
# [reference: PlumbingF.xmcd]
LFOM_Origin := [0 m; 0 m; 0 m]
# LFOM Orifices Template
L_Paper := 11 in
W_Paper := 8.5 in
L_Border := L_Paper - 0.5 in
W_Border := W_Paper - 0.5 in
XStartPoint := LFOM_Origin[0]
Labels := ["A"; "B"; "C"; "D"; "E"; "F"; "G"; "H"; "I"; "J"; "K"; "L"; "M"; "O"; "P"]
YStartPoint := LFOM_Origin[1]
OrificeCenterDist := D_LfomOrifices + S_LfomOrificesMin
L_Temp := max(N_LfomOrifices)*D_LfomOrifices + (max(N_LfomOrifices) - 1)*S_LfomOrificesMin
H_Temp := H_LfomOrifices[last(H_LfomOrifices)] + D_LfomOrifices/2
N_HLayouts := ceil(L_Temp/L_Border) + 1
N_VLayouts :=
    0 if H_Temp/W_Border ≤ 1
    ceil(H_Temp/W_Border) if H_Temp/W_Border > 1
N_TLayouts :=
    0 if N_VLayouts == 0
    N_HLayouts if N_VLayouts ≠ 0
SetUpHLayouts(N_Layout) :=
    Num ← 1 m
    Layout ← CreateLayout(Num)
    for a ∈ 1 .. N_Layout
        Layout ← stack(Layout, SetLayout(Num), VPortErase([0; 0]*m, [11; 8.5]*m), VPortNew([0; 0]*m, 39.37*[L_Border; W_Border]), ChangeView([XStartPoint + (L_Border*(a - 1)); YStartPoint], [XStartPoint + L_Border*a; YStartPoint + W_Border])) if a == 1
        Layout ← stack(Layout, CreateLayout(Num), SetLayout(Num), VPortErase([0; 0]*m, [11; 8.5]*m), VPortNew([0; 0]*m, 39.37*[L_Border; W_Border]), ChangeView([XStartPoint + L_Border*(a - 1); YStartPoint], [XStartPoint + L_Border*a; YStartPoint + W_Border])) if a > 1
        Num ← Num + 1 m
    return Layout
SetUpTLayouts(N_Layout) :=
    Num ← (N_HLayouts + 2)*m
    Layout ← CreateLayout(Num)
    for c ∈ 2 .. N_Layout
        Layout ← stack(Layout, SetLayout(Num), VPortErase([0; 0]*m, [11; 8.5]*m), VPortNew([0; 0]*m, 39.37*[L_Border; W_Border]), ChangeView([XStartPoint + (L_Border*(c - 1)); YStartPoint + W_Border], [XStartPoint + L_Border*c; YStartPoint + 2*W_Border])) if c == 1
        Layout ← stack(Layout, CreateLayout(Num), SetLayout(Num), VPortErase([0; 0]*m, [11; 8.5]*m), VPortNew([0; 0]*m, 39.37*[L_Border; W_Border]), ChangeView([XStartPoint + (L_Border*(c - 1)); YStartPoint + W_Border], [XStartPoint + L_Border*c; YStartPoint + 2*W_Border])) if c > 1
        Num ← Num + 1 m
    return Layout
SetUpVLayouts(N_Layout) :=
    "" if N_VLayouts == 0
    if N_VLayouts ≠ 0
        Num ← N_HLayouts*m + 1 m
        Layout ← CreateLayout(Num)
        for b ∈ 1 .. N_Layout
            Layout ← stack(Layout, SetLayout(Num), VPortErase([0; 0]*m, [11; 8.5]*m), VPortNew([0; 0]*m, 39.37*[L_Border; W_Border]), ChangeView([XStartPoint + (L_Border*(b - 1)); YStartPoint + W_Border*b], [XStartPoint + (L_Border*b); YStartPoint + W_Border*(b + 1)])) if b == 1
            Layout ← stack(Layout, CreateLayout(Num), SetLayout(Num), VPortErase([0; 0]*m, [11; 8.5]*m), VPortNew([0; 0]*m, 39.37*[L_Border; W_Border]), ChangeView([XStartPoint + (L_Border*(b - 1)); YStartPoint + W_Border*b], [XStartPoint + (L_Border*b); YStartPoint + W_Border*(b + 1)])) if b > 1
            Num ← Num + N_TLayouts*m + 1 m
        Layout ← stack(Layout, SetUpTLayouts(N_TLayouts)) if N_TLayouts > 1
        return Layout
Boundary := concat("_line ", point([XStartPoint; YStartPoint]), sp, point([XStartPoint; YStartPoint + W_Border*(N_VLayouts + 1)]), sp, "_line ", point([XStartPoint; YStartPoint]), sp, point([(XStartPoint + N_HLayouts*L_Border); YStartPoint]), sp)
Zoom := concat("z ", "e")
CreateLabel(Str1, Str2) := concat("Page ", Str1, Str2)
CopyText(Object, BasePt, DisPt) := concat("copy ", point(Object), sp, point(BasePt), sp, sp, "mode ", "single ", sp, point(DisPt))
DelineateL(XStartPoint, YStartPoint) := concat("_line ", point([XStartPoint + L_Border; YStartPoint]), sp, point([XStartPoint + L_Border; YStartPoint + W_Border*(N_VLayouts + 1)]), sp)
LabelT(XStartPoint) :=
    TempX ← XStartPoint
    Line ← Boundary
    c ← 0
    while XStartPoint < TempX + ((N_TLayouts - 1)*L_Border)
        Label_MiddleS ← [XStartPoint + L_Border - 1 cm; YStartPoint + (3/2*W_Border) - 1 cm]
        Label_MiddleE ← [XStartPoint + L_Border - 1 cm; YStartPoint + (3/2*W_Border) + 2 cm]
        Label_TopS ← [XStartPoint + L_Border - 1 cm; YStartPoint + 2*W_Border - 2 cm]
        Label_TopE ← [XStartPoint + L_Border - .5 cm; YStartPoint + 2*W_Border - .5 cm]
        Label_BottS ← [XStartPoint + L_Border - 5 cm; YStartPoint + W_Border - 1 cm]
        Label_BottE ← [XStartPoint + L_Border - 2 cm; YStartPoint + W_Border - .5 cm]
        Line ← stack(Line, Zoom, LabelLayout(CreateLabel(Labels[:, 0][c + N_HLayouts], Labels[:, 0][c + N_HLayouts + 1]), .005 m, Label_MiddleS, Label_MiddleE, 90 m), "", MirrorLast([XStartPoint + L_Border; YStartPoint], [XStartPoint + L_Border; YStartPoint + 2*W_Border], "n"), LabelLayout(Labels[:, 0][c + N_HLayouts], .005 m, Label_TopS, Label_TopE, 0 m), "", LabelLayout(CreateLabel(Labels[:, 0][c], Labels[:, 0][c + N_HLayouts]), .005 m, Label_BottS, Label_BottE, 0 m), "", MirrorLast([(XStartPoint + L_Border)/2; YStartPoint + W_Border], [XStartPoint + L_Border; YStartPoint + W_Border], "n"), Zoom)
        XStartPoint ← XStartPoint + L_Border
        c ← c + 1
    Label_TopS ← [XStartPoint + L_Border - 1 cm; YStartPoint + 2*W_Border - 2 cm]
    Label_TopE ← [XStartPoint + L_Border - .5 cm; YStartPoint + 2*W_Border - .5 cm]
    Label_BottS ← [XStartPoint + L_Border - 5 cm; YStartPoint + W_Border - 1 cm]
    Label_BottE ← [XStartPoint + L_Border - 2 cm; YStartPoint + W_Border - .5 cm]
    Line ← stack(Line, Zoom, LabelLayout(Labels[:, 0][c + N_HLayouts], .005 m, Label_TopS, Label_TopE, 0 m), "", LabelLayout(CreateLabel(Labels[:, 0][c], Labels[:, 0][c + N_HLayouts]), .005 m, Label_BottS, Label_BottE, 0 m), "", MirrorLast([(XStartPoint + L_Border)/2; YStartPoint + W_Border], [XStartPoint + L_Border; YStartPoint + W_Border], "n"), Zoom) if XStartPoint < TempX + (N_TLayouts*L_Border)
    return Line
DelineateLMultiple(XStartPoint, YStartPoint) :=
    TempX ← XStartPoint
    Line ← Boundary
    b ← 0
    while XStartPoint < TempX + ((N_HLayouts - 1)*L_Border)
        Label_MiddleS ← [XStartPoint + L_Border - 1 cm; (YStartPoint + W_Border)/2 - 1 cm]
        Label_MiddleE ← [XStartPoint + L_Border - 1 cm; (YStartPoint + W_Border)/2 + 2 cm]
        Label_TopS ← [XStartPoint + L_Border - 1 cm; YStartPoint + W_Border - 2 cm]
        Label_TopE ← [XStartPoint + L_Border - .5 cm; YStartPoint + W_Border - .5 cm]
        Line ← stack(Line, DelineateL(XStartPoint, YStartPoint), Zoom, LabelLayout(CreateLabel(Labels[:, 0][b], Labels[:, 0][b + 1]), .005 m, Label_MiddleS, Label_MiddleE, 90 m), "", MirrorLast([XStartPoint + L_Border; YStartPoint], [XStartPoint + L_Border; H_LfomOrifices[0] + W_Border*(N_VLayouts + 1) - D_LfomOrifices/2], "n"), LabelLayout(Labels[:, 0][b], .005 m, Label_TopS, Label_TopE, 0 m), "", Zoom)
        XStartPoint ← (XStartPoint + L_Border)
        b ← b + 1
    Label_TopS ← [XStartPoint + L_Border - 1 cm; YStartPoint + W_Border - 2 cm]
    Label_TopE ← [XStartPoint + L_Border - .5 cm; YStartPoint + W_Border - .5 cm]
    Line ← stack(Line, DelineateL(XStartPoint, YStartPoint), Zoom, LabelLayout(Labels[:, 0][b], .005 m, Label_TopS, Label_TopE, 0 m), "", Zoom) if XStartPoint < TempX + (N_HLayouts*L_Border)
    return Line
DelineateW(XStartPoint, YStartPoint) := concat("_line ", point([XStartPoint; YStartPoint + W_Border]), sp, point([XStartPoint + N_HLayouts*L_Border; YStartPoint + W_Border]), sp)
DelineateWMultiple(XStartPoint, YStartPoint) :=
    TempY ← YStartPoint
    Line ← Boundary
    a ← 0
    while YStartPoint ≤ TempY + N_VLayouts*W_Border
        Line ← stack(Line, DelineateW(XStartPoint, YStartPoint))
        YStartPoint ← YStartPoint + W_Border
        a ← a + 1
    return Line
N_LfomOrificesTemp := N_LfomOrifices
N_LfomOrificesTemp[0] := 0
row2 := N_LfomOrificesTemp[1]  # error: This array index is invalid for this array.
maxOrifices := max(N_LfomOrificesTemp)
LfomOrificesTemplate :=
    Local ← view("t")
    for h ∈ 0 .. last(H_LfomOrifices)
        origin ← [XStartPoint + D_LfomOrifices/2; YStartPoint + H_LfomOrifices[h]] if h == 0
        if (h ≠ 0 and mod(N_LfomOrifices[0], 2) == 0)
            origin ← [
                (XStartPoint + OrificeCenterDist/2*(mod(h, 2) == 0) + L_Temp/2 - OrificeCenterDist*floor(maxOrifices/2));
                YStartPoint + H_LfomOrifices[h]
            ]
        if (h ≠ 0 and mod(N_LfomOrifices[0], 2) ≠ 0 and mod(maxOrifices, 2) ≠ 0)
            origin ← [
                (XStartPoint + OrificeCenterDist/2*(mod(h, 2) == 0) + L_Temp/2 - OrificeCenterDist/2*floor(maxOrifices/2) - 3/2*OrificeCenterDist);
                YStartPoint + H_LfomOrifices[h]
            ]
        if (h ≠ 0 and mod(N_LfomOrifices[0], 2) ≠ 0 and mod(row2, 2) ≠ 0 and mod(maxOrifices, 2) ≠ 0)
            origin ← [
                (XStartPoint + OrificeCenterDist/2*(mod(h, 2) == 0) + L_Temp/2 - OrificeCenterDist/2*floor(maxOrifices/2) - OrificeCenterDist);
                YStartPoint + H_LfomOrifices[h]
            ]
        if (h ≠ 0 and mod(N_LfomOrifices[0], 2) ≠ 0 and mod(row2, 2) == 0 and mod(maxOrifices, 2) == 0)
            origin ← [
                (XStartPoint + OrificeCenterDist/2*(mod(h, 2) == 0) + L_Temp/2 - OrificeCenterDist/2*floor(maxOrifices/2) + OrificeCenterDist/2);
                YStartPoint + H_LfomOrifices[h]
            ]
        if (h ≠ 0 and mod(N_LfomOrifices[0], 2) ≠ 0 and mod(row2, 2) ≠ 0 and (mod(maxOrifices, 2) == 0))
            origin ← [
                (XStartPoint + OrificeCenterDist/2*(mod(h, 2) == 0) + L_Temp/2 - OrificeCenterDist*floor(maxOrifices/2) + OrificeCenterDist/2);
                YStartPoint + H_LfomOrifices[h]
            ]
        Crosshair ← concat("z ", "e ", "_line ", point(origin[:, 0] - [D_LfomOrifices/4; 0 m]), sp, point(origin[:, 0] + [D_LfomOrifices/4; 0 m]), sp, sp, "_line ", point(origin[:, 0] - [0 m; D_LfomOrifices/4]), sp, point(origin[:, 0] + [0 m; D_LfomOrifices/4]), sp)
        PointArray ← [
            [origin[0] - D_LfomOrifices/3; origin[1]];
            [origin[0]; origin[1] - D_LfomOrifices/3];
            [origin[0] + (D_LfomOrifices/2*sqrt(2)/2); origin[1]];
            [origin[0]; origin[1] + (D_LfomOrifices/2*sqrt(2)/2)]
        ]
        Local ← stack(Local, circle(origin, D_LfomOrifices/20), circle(origin, D_LfomOrifices/2), Crosshair) if N_LfomOrifices[h] ≠ 0
        Local ← stack(Local, ArrayMultiple(PointArray, 1, N_LfomOrifices[h], 0, OrificeCenterDist)) if N_LfomOrifices[h] > 1
    Local ← stack(Local, DelineateLMultiple(XStartPoint, YStartPoint), DelineateWMultiple(XStartPoint, YStartPoint), LabelT(XStartPoint), SetUpHLayouts(N_HLayouts), SetUpVLayouts(N_VLayouts))
    return Local
AC_LfomOrificesTemplate := LfomOrificesTemplate
# LFOM Model
LfomLayer := layer_new("EtLfomPlu", blue)
SubtractFromEtRMPipe := SubtractF(["EtLfomPlu"], "DeleteMe")
EtRMPipe := PipeF(LFOM_Origin, H_LfomOrifices[last(H_LfomOrifices)] + H_PlantFreeboard + H_LfomFreefall, [0; 90]*deg, ND_RMPipe, SDR_41)
LfomFrz := FreezeLayer("EtLfomPlu")
OrifClusterLayer := layer_new("OrifCluster", red)
OrifCluster :=
    Local ← OrifClusterLayer
    for h ∈ 1 .. last(H_LfomOrifices)
        Xorigin ← LFOM_Origin[0] + L_Temp/2 - OrificeCenterDist*floor(maxOrifices/2) + S_LfomOrificesMin/2 if mod(N_LfomOrifices[0], 2) == 0
        Xorigin ← LFOM_Origin[0] + L_Temp/2 - OrificeCenterDist*floor(maxOrifices/2) + S_LfomOrificesMin/2 - OrificeCenterDist/2 if (mod(N_LfomOrifices[0], 2) ≠ 0 and mod(maxOrifices, 2) ≠ 0)
        Xorigin ← LFOM_Origin[0] + L_Temp/2 - OrificeCenterDist*floor(maxOrifices/2) + S_LfomOrificesMin/2 + OrificeCenterDist/2 if (mod(N_LfomOrifices[0], 2) ≠ 0 and mod(row2, 2) ≠ 0 and (mod(maxOrifices, 2) == 0))
        Xorigin ← LFOM_Origin[0] + L_Temp/2 - OrificeCenterDist*floor(maxOrifices/2) + S_LfomOrificesMin/2 + 3*OrificeCenterDist/2 if (mod(N_LfomOrifices[0], 2) ≠ 0 and mod(row2, 2) == 0 and mod(maxOrifices, 2) == 0)
        Local ← stack(Local, CylinderF([LFOM_Origin[0]; LFOM_Origin[1]; LFOM_Origin[2] + H_LfomFreefall + H_LfomOrifices[h]], D_LfomOrifices/2, OR(ND_RMPipe) + zc, [90 deg + asin(OrificeCenterDist/OD(ND_RMPipe))*(mod(h, 2) == 0); 0 deg])) if N_LfomOrifices[h] ≠ 0
        Local ← stack(Local, Rotate3DLast([LFOM_Origin[0]; LFOM_Origin[1]; LFOM_Origin[2] + H_LfomFreefall + H_LfomOrifices[h]], "z", Xorigin/(0.5*OD(ND_RMPipe))))
        Local ← stack(Local, ArrayLastPolar([LFOM_Origin[0]; LFOM_Origin[1]; LFOM_Origin[2] + H_LfomFreefall + H_LfomOrifices[h]], N_LfomOrifices[h], (N_LfomOrifices[h] - 1)*(OrificeCenterDist/(0.5*OD(ND_RMPipe))))) if N_LfomOrifices[h] > 1
    return Local
h := 2
LfomOrifices :=
    Local ← LfomFrz
    h ← 0
    Local ← stack(Local, CylinderF([LFOM_Origin[0]; LFOM_Origin[1]; LFOM_Origin[2] + H_LfomFreefall + H_LfomOrifices[h]], D_LfomOrifices/2, OR(ND_RMPipe) + zc, [90 deg + asin(OrificeCenterDist/OD(ND_RMPipe))*(mod(h, 2) == 0); 0 deg])) if N_LfomOrifices[h] ≠ 0
    Local ← stack(Local, ArrayLastPolar([LFOM_Origin[0]; LFOM_Origin[1]; LFOM_Origin[2] + H_LfomFreefall + H_LfomOrifices[h]], N_LfomOrifices[h], (N_LfomOrifices[h] - 1)*(OrificeCenterDist/(0.5*OD(ND_RMPipe))))) if N_LfomOrifices[h] > 1
    return Local
AC_Lfom := stack(LfomLayer, EtRMPipe, LfomFrz, LfomOrifices, OrifClusterLayer, OrifCluster, GroupDelete, SubtractFromEtRMPipe)
# Display Variables
HL_Lfom =  # error: This variable is undefined.
Q_Plant =  # error
ND_RMPipe =  # error
D_LfomOrifices =  # error
B_LfomRows =  # error
H_LfomOrifices =  # error
N_LfomOrifices =  # error
AC_Lfom =  # error
# [component: inputs AC_Lfom]
# [component: inputs AC_LfomOrificesTemplate]
AC_LfomOrificesTemplate =  # error
# Previews
# [reference: LayoutsAC.xmcd]
AI_LfomTemplate = ["laythw"; "_-view o t"; "-plot y "; "PublishToWeb PNG.pc3"; "VGA (480.00 x 640.00 Pixels)"; "l n e F"; ""; " ."; "y  [FILEPATH]LFOMTemplate_t"; "n y"; "shademode x -view swiso"]
AI_Lfom = ["laythw"; "_-view o f"; "-plot y "; "PublishToWeb PNG.pc3"; "VGA (640.00 x 480.00 Pixels)"; "l n e F"; ""; " ."; "y  [FILEPATH]LFOM_f"; "n y"; "shademode x -view swiso"]
