# SRSF Modular Code
# User Inputs
# To be left undefined and inputed online by the user
Q_Plant := 20*L/s
H_WaterEntering := 4 m
W_EntranceChannel := 1 m
ND_PipeSizeMax := 20 in
Z_InletChannelBottom := 4.2 m
L_ConnectingPipe := .4 m
# From Expert Inputs
# [reference: ExpertInputs.xmcd]
# Design References
# [reference: MathFunctions.xmcd]
# [reference: PipeDatabase.xmcd]
# [reference: MaterialsDatabase.xmcd]
# [reference: FluidsFunctions.xmcd]
# From SRSF Design Code
Z_SedWeirExit := H_WaterEntering
W_SedInletChannel := W_EntranceChannel
ND_SedManifold := ND_PipeSizeMax
Z_SedChannelBottom := Z_InletChannelBottom
# [reference: StackedRapidSandFilter.xmcd]
# From SRSF Drawing Code
L_Sed := 1 m
N_SedTanks := 1
W_Sed := 1 m
N_SedBays := 1
L_SedOutletVertPipe := L_ConnectingPipe
# [reference: MtoATranslators.xmcd]
# [reference: MtoATranslatorsWrapped.xmcd]
# [reference: ChannelF.xmcd]
# [reference: PlumbingF.xmcd]
# [reference: TankF.xmcd]
# [reference: StairsF.xmcd]
# [reference: DrainChannelF.xmcd]
# [reference: StackedRapidSandFilterAC.xmcd]
# Filter Modular Script Outputs
AC_FilterMod := □  # error: This placeholder is empty.
# Previews
# [reference: LayoutsAC.xmcd]
# Display Variables
Z_FiWaterSource =  # error: This variable is undefined.
Q_Plant = 0.02 m^3/s
HL_FiEntranceWater =  # error
Z_FiSourceBottom =  # error
AC_Filter =  # error
