# AguaClara Design Tool
Country = 96
C_ChlorineDoseMax := 2*mg/L
C_ChlorineStock := 50*gm/L
Ti_ChlorineStock := 30 hr
Language = 1
Country := 0
## References
# Design References
# MathCAD dimension calculations:
# [reference: BasicClientInputs.xmcd]
# [reference: ExpertInputs.xmcd]
# [reference: MathFunctions.xmcd]
# [reference: PipeDatabase.xmcd]
# [reference: MinorLossCoefficients.xmcd]
# [reference: FluidsFunctions.xmcd]
# [reference: Sedimentation Tank.xmcd]
# [reference: Flocculator.xmcd]
# [reference: LFOM.xmcd]
# [reference: LinearCdc.xmcd]
# [reference: ChemStorageCylinders.xmcd]
# [reference: EntranceTankDim.xmcd]
# [reference: Stacked Rapid Sand Filter.xmcd]
# [reference: Materials List.xmcd]
# [reference: Drain Channel Design.xmcd]
# AutoCAD drawing programs:
# Translators:
# These are the codes that take MathCAD outputs and create AutoCAD scripts that are used to draw the plant (formerly Basics)
# [reference: MtoATranslators.xmcd]
# The wrapped MtoA translator contains the functions that the user will want to access. These functions will draw pieces with full functionality - specifying the location, dimension, and orientation of the object. Also, it contains layer control and subtraction capabilities for grouped objects.
# [reference: MtoATranslators Wrapped.xmcd]
# Plant Elements:
# These are all of the files that draw the fundamental parts of the plants (tees, elbows, tanks, pipes, etc)
# [reference: Channel.xmcd]
# [reference: cross.xmcd]
# [reference: Sludge.xmcd]
# [reference: Manifold.xmcd]
# [reference: pipe.xmcd]
# [reference: elbow.xmcd]
# [reference: tank.xmcd]
# [reference: adapter.xmcd]
# [reference: Tee.xmcd]
# [reference: pvccap.xmcd]
# [reference: LaunderCap.xmcd]
# [reference: ChimneyStops.xmcd]
# [reference: Lamina.xmcd]
# [reference: Stairs.xmcd]
# [reference: DrainChannel.xmcd]
# [reference: Manifold.xmcd]
# Specific Pieces:
# These are the codes that draw the bigger pieces of the plant (the sed tank, floc tank, etc)
# [reference: floctank.xmcd]
# [reference: SedTank.xmcd]
# [reference: Entrance Tank.xmcd]
# [reference: SRSF.xmcd]
# [reference: Operator Access.xmcd]
# [reference: PlantDrainChannel.xmcd]
# Layouts:
# This file will execute at the very end to create multiple views of the entire plant in paperspace
# [reference: Layouts.xmcd]
## All variables displayed must have the standard SI units. They may not have units attached by the user.
# General:
Q_Plant = 0.015 m^3/s
Pi_VenaContractaOrifice = 0.63
T_PlantWall = 0.15 m
W_SedPlate = 0.92 m
T_ConcreteMin = 0.05 m
L_SedPlateSheet = 3.658 m
C_CoagStock = 120 kg/m^3
T_SedPlate = 0.002 m
Ti_CoagStock = 108000 s
T_SedWeir = 0.04 m
C_ChlorineStock = 50 kg/m^3
W_SedBay = 0.92 m
Ti_ChlorineStock = 108000 s
EN_FcmTube = 0
H_PlantFreeboard = 0.1 m
EN_DrillSeries = 0
# Entrance Tank
V_EtUp = 0.008 m/s
H_Et = 1.86519 m
H_EtTop = 0.2 m  # height of the top part of the entrance tank above the hoppers
W_Et = 1.3744 m
L_Et = 4.11865 m
ND_EtDrain = 0.0762 m
ZW_Et = 2.34135 m
Z_EtTop = 2.44135 m
ND_EtOverflow = 0.3048 m
Z_Et = 0.576164 m  # elevation of top of slab.
ND_RMPipe = 0.3048 m
Z_EtHopper = 2.14135 m
H_EtHopper = 1.56519 m
N_EtHoppers = 2
AN_EtSlope = 0.785398
L_EtHopper = 2.00892 m
W_EtDC = 0.424535 m  # drain channel under entrance tank dimensions
L_EtDC = 4.11865 m
H_EtDC =  # error: This variable is undefined.
# Flow measurement
D_LfomOrifices = 0.01905 m
S_LfomRows = 0.02 m
H_LfomOrifice = [0.009525; 0.029525; 0.049525; 0.069525; 0.089525; 0.109525; 0.129525; 0.149525; 0.169525; 0.189525] m
Q_LfomScale = [0; 0.0015; 0.003; 0.0045; 0.006; 0.0075; 0.009; 0.0105; 0.012; 0.0135; 0.015] m^3/s
N_LfomOrifices = [18; 6; 6; 4; 4; 3; 4; 3; 3; 3]
ND_Lfom = 0.3048 m
HL_Lfom = 0.2 m
# Rapid Mix
ED_Tee = 0.0109083 m^2/s^3
Z_LfomOrifices = 2.15088 m  # elevation of the center of
Z_EtExit = 1.55815 m  # elevation of center of pipe exiting the entrance tank and heading toward the flocculator
# Plant Drain Channel:
W_DC =  # error
H_DC =  # error
L_DC = 13.9794 m
# Coag Dose Controller:
Z_CoagTank =  # error
Z_CoagTankOutlet =  # error
L_CdcFloatArm = 0.41275 m
Q_CdcMax = 7.5e-6 m^3/s
L_CdcScaleArm = 0.50165 m
H_StockTankPort =  # error  # Distance between base of stock tanks and outlet
# Flocculator:
H_Floc = 2.12965 m
Z_FlocTank = 0 m  # Look at Flocculator Positioning arrays
N_FlocValves = 2
W_FlocChannel = 0.6 m
Ti_Floc = 1147.21 s  # Fill last channel with bafffles from last channel
H_FlocSlope = 0.04445 m  # Fix port width to be based on energy dissipation in that channel
ED_Floc = 0.01 m^2/s^3
# Adjust spacing after the number of baffles per channel is known.
V_Floc = 0.144642 m/s  # Check the residence time of the flocculator should be at least 20minutes
HW_FlocEnd = 1.84581 m
ND_FlocValve = 0.0762 m
CP_Floc = 100 m^(2/3)
Ti_FlocDrain = 1800 s
CP_FlocTotal = 111.237 m^(2/3)
N_FlocChannels = 4
G_Floc = 39.6425 1/s
L_FlocTank = 15.538 m
HL_Floc = 0.183842 m
ED_FlocChannelFirst = 0.00711299 m^2/s^3
HW_FlocStart = 2.02965 m
S_FlocBaffle = [0.172841; 0.172841; 0.172841; 0.176343] m
B_FlocBaffle = [0.174841; 0.174841; 0.174841; 0.178343] m
N_FlocChannelBaffles = [21; 21; 21; 20]
W_FlocPort = [0.172841; 0.172841; 0.172841; 0.183071] m
S_FlocBaffleFirst = 0.172841 m
HL_FlocChannels = [0.0469342; 0.0469342; 0.0469342; 0.0430392] m
L_FlocBaffleLower = 1.58655 m
L_FlocBaffleUpper = 1.82039 m
H_FlocPort = [0.6; 0.6; 0.6; 0.577947] m
Ti_Floc = 1147.21 s  # residence time of the flocculator
N_FlocBaffles = 83
ND_FlocValve = 3 in
EN_FlocBaffle = 1
# Sed Tanks:
N_SedTanks = 5
H_SedBetween =  # error  # Distance from the top of the inlet manifold to the bottom of the ledge supporting the lamella frame
L_Sed = 3.8845 m
N_SedBays = 1  # Number of bays of inlet manifolds in each sed tank
Q_SedBay = 0.003 m^3/s
V_SedUpBod = 0.001 m/s  # design constraints
V_SedCBod = 0.00012 m/s
V_SedUp =  # error  # Actual values from this design
V_SedC =  # error
W_SedSlope =  # error
AN_SedSlope = 0.872665
H_SedBayDivider =  # error
Ti_Sed =  # error
# Sedimentation Tank Sludge Drain:
N_SedSludgeOrifices = 27  # per cell
Ti_SludgeDrain = 1800 s  # Tank Drain time
W_SedSludge = 0.0676664 m  # Width of the sludge channel
B_SedSludgeOrifices = 0.104711 m  # Distance center to center between drain orifices
H_SedSludge = 0.0676664 m  # Depth of the sludge channel
T_SedSludge =  # error
# Thickness of the plate topping the sludge channel
# through which drain holes are formed
W_SedDrainCover = 0.107666 m
D_SedSludgeOrifice = 0.0092434 m  # Diameter of drain orifices
W_SedInletBottom =  # error
N_SedSludgeOrifices = 27
ND_SedSludgeValve =  # error
# Sedimentation Tank Dimensions:
Z_SedSludge = 0.0676664 m  # Height from 0 of the top of the sludge drain
Z_SedSlopes =  # error  # Height from 0 of the top of the inlet manifold
W_Sed = 0.92 m  # Total tank wall height
L_Sed = 3.8845 m  # Total tank length
H_Sed = 1.95724 m
# Sedimentation Tank Inlet Channel:
HW_InletChannel =  # error
EN_InletChannelGeom = 1
W_InletChannel =  # error
L_Channel =  # error
N_SedInletPipes =  # error  # per sed bay
H_InletChannel =  # error
HL_SedWeirInlet = 0.0133981 m
W_SedInletchannelPreweir =  # error
H_SedWeirInlet = 0.300588 m
W_SedWeirInlet = 5.2 m
# Sedimentation Tank Effluent Launder:
N_SedLaunderOrifices = 54  # Number of orifices per launder
N_SedLaunderOrificesRow =  # error  # Number of orifices per row
Z_SedLaunder = 1.74651 m
Q_SedLaunderOrifices = 5.55556e-5 m^3/s
B_SedLaunderOrifices = 0.1 m  # Center to center launder spacing
# More Launder Dimensions
ND_SedLaunder = 0.1016 m
D_SedLaunderOrifice = 0.0111125 m
L_SedLaunder = 2.86541 m
HL_SedLaunderOrifice = 0.0421499 m
# Sedimentation Tank Inlet Manifold:
ND_SedManifold = 0.1524 m
L_Diffuser =  # error
Z_SedManifoldLift =  # error
D_Diffuser =  # error
D_SedManifoldPort = 0.0381 m
B_SedManifoldPort = 0.0806982 m
N_SedManifoldPorts = 35
L_SedManifoldPipe = 2.88226 m
S_SedManifoldBetween =  # error
ND_SedManifoldDiffuser =  # error
L_SedManifoldDiffuser = 0.631725 m
ED_SedInlet = 0.01 m^2/s^3
Q_SedManifoldPort = 8.57143e-5 m^3/s
# Exit Channel:
W_ExitChannel =  # error
H_ExitChannel =  # error
L_ExitChannel =  # error
HW_ExitChannel =  # error  # water height in exit channel from base of channel
H_SedWeirExit = 0.227012 m
# Lamella:
L_SedPlate = 0.609667 m
B_SedPlate = 0.027 m  # center to center distance between lamella
S_SedPlate = 0.025 m  # spacing between lamella
N_SedPlates = 91  # Number of Sed Plates per Sedimentation Tank Bay.
N_SedModules = 7  # Number of modules per bay
N_SedModulePlates = 13  # Number of plates per module
AN_SedPlate = 1.0472
V_SedC =  # error
L_SedActive = 2.83479 m
V_SedUp =  # error
Z_SedLaunder = 1.74651 m
H_SedPlate =  # error
H_SedAbove =  # error  # Height of water needed above the lamella
HW_Sed = 1.84581 m
H_Sed = 1.95724 m
Z_Mp =  # error
H_SedBayDivider =  # error
# SRSF:
H_Fi = 3.71591 m
L_Fi = 0.9 m
W_Fi = 0.944101 m
B_FiManifoldBranch = 0.1 m
ND_FiTrunk = 0.0762 m
ND_FiManBranch = 0.0254 m
ND_FiBwTrunk = 0.1524 m
ND_FiBwManBranch = 0.0381 m
ND_FiExitWaste = 0.0762 m
ND_FiBwWeirDrain = 0.1524 m
ND_FiBwDrain = 0.0762 m  # For the box that holds keeps the end of the siphon submerged
ND_FiSandOutlet = 0.0508 m
Ti_FiSand = 378.172 s  # This is the time required to empty the filter of the sand.
ND_FiSiphonAirValve = 0.0508 m
ND_FiSiphon = 0.1524 m
Q_FiSiphonMax = 0.0563969 m^3/s
B_FiSiphonManOrifices = 0.1 m
N_FiSiphonManOrifices = 8
D_FiSiphonManOrifices = 0.0546269 m
Ti_FiBwInitiation = 46.5189 s
H_FiSand = 1.2 m
N_FiLayer = 6
H_FiLayer = 0.2 m
V_FiLayer = 0.00183333 m/s
HL_FiTerminal = 0.451428 m
V_FiBw = 0.011 m/s
HL_FiBwInitiation = 1.588 m
HL_FiBwSS = 1.188 m
D_FiSand = 0.0005 m
N_Fi = 2
Q_Fi = 0.0075 m^3/s
W_Slots = 0.0002032 m
B_FiBwManSlot = 0.0047625 m
L_FiBwManSlot = 0.0203263 m
B_FiManSlot = 0.003175 m
L_FiManSlot = 0.0271017 m
N_FiSlotRows = 2
Z_FiBottom = -1.94379 m
Z_FiTop = 1.77212 m
# Weirs
HL_FiWeir = 0.0315386 m
L_FiWeir = 0.7199 m
Z_FiEntranceWeir = 1.67212 m
Z_FiBwWeir = -0.0552115 m
Z_FiSiphonInlet = -0.155211 m  # This is the centerline elevation of the siphon orifices
Z_FiExitWeir = 1.13138 m
Z_FiExitBottom = 1.03138 m  # bottom of the filtered water box
Z_FiEntranceBottom = 1.03138 m  # bottom of the entrance box
Z_FiSiphonCoupling = 1.04725 m
Z_FiBwTop = 0.165841 m
W_FiBwDrain = 0.344531 m
H_FiBwDrain = 0.329699 m
# Materials List:
N_Launders =  # error
L_LaunderPipeTotal =  # error
N_LaunderCouplings =  # error
N_ValveCouplings = 5
N_SedPlatesTotal = 455
N_SedPlatesPerSheet = 6
N_SedPlateSheets = 76
N_Valves = 5
A_EtFloor = 7.39859 m^2
W_FlocWithWalls = 3 m
L_FlocWithWalls = 4.1845 m
Vol_FlocFloor = 1977.18 L
A_FlocFloor = 13.1812 m^2
Vol_SedSlopes =  # error
A_SedWalls =  # error
A_SedFloor = 23.0147 m^2
# Plant Summary Calculations:
HL_PlantTotal := Z_EtTop - H_PlantFreeboard - Z_FiExitWeir
HL_PlantTotal = 1.20997 m
AC_SedTankA :=
    AC_SedTank if last(AC_SedTank) < 598
    submatrix(AC_SedTank, 0, 598, 0, 0) otherwise
AC_FilterA :=
    AC_Filter if last(AC_Filter) < 598
    submatrix(AC_Filter, 0, 598, 0, 0) otherwise
AC_SedTankB :=
    submatrix(AC_SedTank, 599, last(AC_SedTank), 0, 0) if last(AC_SedTank) < 1197
    submatrix(AC_SedTank, 599, 1197, 0, 0) otherwise
AC_FilterB :=
    submatrix(AC_Filter, 599, last(AC_Filter), 0, 0) if last(AC_Filter) < 1197
    submatrix(AC_Filter, 599, 1197, 0, 0) otherwise
AC_SedTankC :=
    submatrix(AC_SedTank, 1198, last(AC_SedTank), 0, 0) if last(AC_SedTank) < 1796
    submatrix(AC_SedTank, 1198, 1796, 0, 0) otherwise
AC_FilterC :=
    submatrix(AC_Filter, 1198, last(AC_Filter), 0, 0) if last(AC_Filter) < 1796
    submatrix(AC_Filter, 1198, 1796, 0, 0) otherwise
AC_ChemTanksA :=
    AC_ChemTanks if last(AC_ChemTanks) < 598
    submatrix(AC_ChemTanks, 0, 598, 0, 0) otherwise
AC_FilterD :=
    submatrix(AC_Filter, 1797, last(AC_Filter), 0, 0) if last(AC_Filter) < 2395
    submatrix(AC_Filter, 1797, 2395, 0, 0) otherwise
AC_FlocTankA :=
    AC_FlocTank if last(AC_FlocTank) < 598
    submatrix(AC_FlocTank, 0, 598, 0, 0) otherwise
AC_ChemTanksB :=
    submatrix(AC_ChemTanks, 1198, last(AC_ChemTanks), 0, 0) if last(AC_ChemTanks) < 1197
    submatrix(AC_ChemTanks, 1198, 1796, 0, 0) otherwise
AC_FlocTankB :=
    submatrix(AC_FlocTank, 599, last(AC_Filter), 0, 0) if last(AC_Filter) < 1197
    submatrix(AC_FlocTank, 599, 1197, 0, 0) otherwise
AC_ChemTanksC :=
    submatrix(AC_ChemTanks, 1198, last(AC_ChemTanks), 0, 0) if last(AC_ChemTanks) < 1796
    submatrix(AC_ChemTanks, 1198, 1796, 0, 0) otherwise
AC_FlocTankC :=
    submatrix(AC_FlocTank, 1198, last(AC_FlocTank), 0, 0) if last(AC_FlocTank) < 1796
    submatrix(AC_FlocTank, 1198, 1796, 0, 0) otherwise
AC_DrainChannelA :=
    AC_DrainChannel if last(AC_DrainChannel) < 598
    submatrix(AC_DrainChannel, 0, 598, 0, 0) otherwise
AC_EntranceTankA :=
    AC_EntranceTank if last(AC_EntranceTank) < 598
    submatrix(AC_EntranceTank, 0, 598, 0, 0) otherwise
AC_DrainChannelB :=
    submatrix(AC_DrainChannel, 1198, last(AC_DrainChannel), 0, 0) if last(AC_DrainChannel) < 1197
    submatrix(AC_DrainChannel, 1198, 1796, 0, 0) otherwise
AC_EntranceTankB :=
    submatrix(AC_EntranceTank, 599, last(AC_EntranceTank), 0, 0) if last(AC_EntranceTank) < 1197
    submatrix(AC_EntranceTank, 599, 1197, 0, 0) otherwise
AC_DrainChannelC :=
    submatrix(AC_DrainChannel, 1198, last(AC_DrainChannel), 0, 0) if last(AC_DrainChannel) < 1796
    submatrix(AC_DrainChannel, 1198, 1796, 0, 0) otherwise
AC_EntranceTankC :=
    submatrix(AC_EntranceTank, 1198, last(AC_EntranceTank), 0, 0) if last(AC_EntranceTank) < 1796
    submatrix(AC_EntranceTank, 1198, 1796, 0, 0) otherwise
AC_OperatorAccessA :=
    AC_OperatorAccess if last(AC_OperatorAccess) < 598
    submatrix(AC_OperatorAccess, 0, 598, 0, 0) otherwise
AC_OperatorAccessB :=
    submatrix(AC_OperatorAccess, 599, last(AC_OperatorAccess), 0, 0) if last(AC_OperatorAccess) < 1197
    submatrix(AC_OperatorAccess, 599, 1197, 0, 0) otherwise
AC_OperatorAccessC :=
    submatrix(AC_OperatorAccess, 1198, last(AC_OperatorAccess), 0, 0) if last(AC_OperatorAccess) < 1796
    submatrix(AC_OperatorAccess, 1198, 1796, 0, 0) otherwise
AC_ZLayoutA :=
    AC_Layout if last(AC_Layout) < 598
    submatrix(AC_Layout, 0, 598, 0, 0) otherwise
AC_ZLayoutB :=
    submatrix(AC_Layout, 1198, last(AC_Layout), 0, 0) if last(AC_Layout) < 1197
    submatrix(AC_Layout, 1198, 1796, 0, 0) otherwise
AC_ZLayoutC :=
    submatrix(AC_Layout, 1198, last(AC_Layout), 0, 0) if last(AC_Layout) < 1796
    submatrix(AC_Layout, 1198, 1796, 0, 0) otherwise
## Make AC variables that are shorter than 598 lines
## Display AC variables
AC_EntranceTankB =  # error
AC_EntranceTankA = [
    "-layer m Cdc"; "c t 129,0,129"; "Cdc"; "  "; "-insert CdcLeverArm.dwg"; "-3.99085,11.07569,2.46625 x 1 1  0"; "-insert CdcLeverArmBracket.dwg"; "-3.95885,10.66294,2.44135 x 1 1  0"; "-insert CdcCht.dwg"; "-4.72105,10.57884,2.55905 x 1 1  0"
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]
AC_EntranceTankC =  # error
AC_FlocTankB =  # error
AC_FlocTankA = [
    "-layer m FlocTank"; "c t 132,132,132"; "FlocTank"; "  "; "_-view o t _zoom w 0.16,5.19,0 -4.0445,8.36,2.12965 _box 0,5.35,0 -3.8845,8.2,2.12965 _box 0.15,5.2,-0.15 -4.0345,8.35,2.12965 _subtract 0.15,5.2,-0.15  0,5.35,0 "; "_box -4.0345,5.95,0 0.15,6.1,2.12965"; "-array l  R 3 1 0.75"; "-group c FlocTank y "; "all "; "-layer s 0"
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]
AC_FlocTankC =  # error
AC_OperatorAccessA =  # error
AC_OperatorAccessB =  # error
AC_OperatorAccessC =  # error
AC_SedTankA = [
    "-layer m SedTankCon"; "c t 132,132,132"; "SedTankCon"; "  "; "_-view o r"; "_pline"; "0.97,0"; "0.49383,0"; "0.49383,0.06767"; "0.51383,0.06767"
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]
AC_SedTankB = [
    "SedLamina";
    "  ";
    "_zoom w -0.69132,0.07778,1.1332 -0.64124,0.05,1.1332";
    "_cylinder -0.65191,0.06389,1.1332 0.01389 c -0.6781,0.06389,1.1332";
    "_cylinder -0.65513,0.06389,1.1332 0.01067 c -0.6881,0.06389,1.1332";
    "_subtract -0.65191,0.05,1.1332  -0.6881,0.05856,1.1332 ";
    "rotate3d l  y -0.65513,0.06389,1.1332 30";
    "_cylinder -0.65513,0.06389,1.1332 0.01067 c -1.02707,0.06389,1.1332";
    "_cylinder -0.64513,0.06389,1.1332 0.00966 c -1.03707,0.06389,1.1332";
    "_zoom w -1.03707,0.04322,1.1332 -1.01707,0.08456,1.1332"
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]
AC_SedTankC =  # error
AC_ChemTanksA =  # error
AC_ChemTanksB =  # error
AC_ChemTanksC =  # error
AC_DrainChannelA = [
    "-layer m DrainChannel2"; "c t 214,214,214"; "DrainChannel2"; "  "; "3dpoly"; "0,-1.65,-0.15"; "0,-1.65,-0.58089"; "0,-0.35,-0.58089"; "0,-0.35,-0.15"; "0,-1.65,-0.15 "
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]
AC_DrainChannelB =  # error
AC_DrainChannelC =  # error
AC_ZLayoutA = [
    "laythw"; "-layout t AguaClara 1"; "View"; "layout d Layout1"; " d Layout2"; "layout r View"; "TopView"; "layout s TopView"; ".ms"; "z o all "
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]
AC_ZLayoutC =  # error
AC_ZLayoutB =  # error
AC_ZALayoutStart =  # error  # these two lines of code will ensure that the drawing is thawed and given a 3D view even if the layouts don't execute
AC_ZZEnd =  # error
AC_FilterA = [
    "-layer m FiInletchannelCon"; "c t 214,214,214"; "FiInletchannelCon"; "  "; "_zoom w -0.11,-0.31,1.42308 -0.09,0,1.42308"; "_box -0.11,-0.15,1.42308 2.3232,-0.05,1.80366"; "_box -0.1,-0.3,1.27308 2.3132,0.1,1.80366"; "_subtract -0.1,-0.3,1.27308  -0.11,-0.15,1.42308 "; "rotate3d l  z -0.1,-0.15,1.42308 270"; "_box -0.25,-2.4132,1.27308 0.15,-2.5632,1.80366"
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]
AC_FilterD = [
    "_subtract";
    "g FiTankCon";
    " g DeleteMe ";
    "-layer f FiTankCon";
    "  ";
    "_cylinder -4.1718,-1.14053,-1.86521 0.02858 c -4.1398,-1.14053,-1.86521";
    "_cylinder -4.1818,-1.14053,-1.86521 0.02413 c -4.1298,-1.14053,-1.86521";
    "_subtract -4.1718,-1.1691,-1.86521  -4.1298,-1.16466,-1.86521 ";
    "_cylinder -4.21203,-1.14053,-1.86521 0.02858 c -4.18003,-1.14053,-1.86521";
    "_cylinder -4.22203,-1.14053,-1.86521 0.02413 c -4.17003,-1.14053,-1.86521"
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]
AC_FilterB = [
    "-layer f FiTankCon";
    "  ";
    "_cylinder -3.18579,-0.36708,-1.71521 0.0508 c -3.13979,-0.36708,-1.71521";
    "_cylinder -3.19579,-0.36708,-1.71521 0.04445 c -3.12979,-0.36708,-1.71521";
    "_subtract -3.18579,-0.41788,-1.71521  -3.12979,-0.41153,-1.71521 ";
    "_cylinder -3.2398,-0.36708,-1.71521 0.0508 c -3.1938,-0.36708,-1.71521";
    "_cylinder -3.2498,-0.36708,-1.71521 0.04445 c -3.1838,-0.36708,-1.71521";
    "_subtract -3.2398,-0.41788,-1.71521  -3.2498,-0.41153,-1.71521 ";
    "_cylinder -3.1938,-0.36708,-1.71521 0.04445 c -3.18579,-0.36708,-1.71521";
    "_cylinder -3.2038,-0.36708,-1.71521 0.04077 c -3.17579,-0.36708,-1.71521"
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]
AC_FilterC = [
    "_cylinder -1.27471,-0.95123,0.97737 0.0508 c -1.22871,-0.95123,0.97737"; "_cylinder -1.22871,-0.95123,0.97737 0.04445 c -1.2207,-0.95123,0.97737"; "_union -1.1747,-1.00203,0.97737 -1.27471,-1.00203,0.97737 -1.2207,-0.99568,0.97737 "; "rotate3d l  y -1.2207,-0.95123,0.97737 90"; "-group c DeleteMe y "; "l "; "-layer t FiEntexitboxesCon"; "  "; "_subtract"; "g FiEntexitboxesCon"
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]
HW_Sed = 1.84581 m
# this variable is displayed to ensure that LabView can read AC.ZZEnd (error in LabView "read mathcad file" code that it misses the last variable)
