# [reference: MasterProgram.xmcd]
Et_Origin := Et_origin
W_EtWalkway := 1.5 m  # should we make this a standard (design assumption) for all walkways?
L_RMPipeHorizLower := W_EtWalkway + 2*SocketDepth(ND_RMPipe)  # this length will change when I see the rest of the entrance tank
L_RMPipeVertLower := Z_EtExit - ShortTeeLength(ND_RMPipe) - RMFlocCoupling_Origin[2] - ElbowRadius(ND_RMPipe)
L_RMPipeVertPipeUpper := ZW_RMPipe - Z_EtExit  # should overestimate the needed length of this pipe
L_EtExitOuter := W_EtWalkway  # this length will also probably change when I see the rest of the entrance tank
L_CdcLever := 0.45 m  # assumed from Drew's drawing for now
L_EtExitInner := L_CdcLever + S_Elbow + outerradius(ND_RMPipe) - CouplingLength(ND_RMPipe) - ElbowRadius(ND_RMPipe) + 2*SocketDepth(ND_RMPipe)
# might need to add a constraint to lever arm length to ensure
# that the float isn't obstructed by the hopper in the min flow
# situation
L_EtWeir := ZW_Et - (Et_Origin[2] + ConRadius(ND_EtOverflow)*tan(AN_EtSlope)) + SocketDepth(ND_EtOverflow)
L_EtDrainPipe :=
    (ConRadius(ND_RMPipe)*tan(AN_EtSlope) - CouplingLength(ND_RMPipe) + SocketDepth(ND_RMPipe) - T_PlantWall) if ConRadius(ND_RMPipe)*tan(AN_EtSlope) < CouplingLength(ND_RMPipe) + T_PlantWall
    2*SocketDepth(ND_RMPipe)
# Origin Points
Elbow1_Origin := [0 m; L_RMPipeHorizLower + CouplingLength(ND_RMPipe) - 2*SocketDepth(ND_RMPipe); 0 m] + RMFlocCoupling_Origin
PipeHorizLower_Origin := [0 m; CouplingLength(ND_RMPipe) - 2*SocketDepth(ND_RMPipe); 0 m] + RMFlocCoupling_Origin
PipeVertLower_Origin := [0 m; ElbowRadius(ND_RMPipe); ElbowRadius(ND_RMPipe)] + Elbow1_Origin
RMTee_Origin := [0 m; ShortTeeLength(ND_RMPipe); L_RMPipeVertLower + ShortTeeLength(ND_RMPipe)] + PipeVertLower_Origin
PipeVertUpper_Origin := [0 m; -ShortTeeLength(ND_RMPipe); ShortTeeLength(ND_RMPipe)] + RMTee_Origin
WeirPipe_Origin := [□; □; □]  # error: This placeholder is empty.
# don't forget micromix plate!!!
RMScriptEvenChannels :=
    RMPipeLayer ← layer_new("RMPipe", blue)
    PipeHorizLower ← PipeF(PipeHorizLower_Origin, L_RMPipeHorizLower, [270; 0]*deg, ND_RMPipe, EN_PipeSpec)
    PipeVertLower ← PipeF(PipeVertLower_Origin, L_RMPipeVertLower, [0; 90]*deg, ND_RMPipe, EN_PipeSpec)
    FreezeRMPipe ← FreezeLayer("RMPipe")
    RMTeePipeLayer ← layer_new("RMTeePipe", blue)
    PipeVertUpper ← PipeF(PipeVertUpper_Origin, L_RMPipeVertPipeUpper, [0; 90]*deg, ND_RMPipe, EN_PipeSpec)
    FreezeRMTeePipe ← FreezeLayer("RMTeePipe")
    RMElbowLayer ← layer_new("RMElbow", green)
    Elbow ← ElbowF(Elbow1_Origin, [0; 90; 0]*deg, ND_RMPipe, EN_PipeSpec)
    FreezeRMElbow ← FreezeLayer("RMElbow")
    RMTeeLayer ← layer_new("RMTee", green)
    RMTee ← TeeF(RMTee_Origin, [0; 270; 0]*deg, ND_RMPipe, EN_PipeSpec)
    FreezeRMTee ← FreezeLayer("RMTee")
    return stack(RMPipeLayer, PipeHorizLower, PipeVertLower, FreezeRMPipe, RMTeePipeLayer, PipeVertUpper, FreezeRMTeePipe, RMElbowLayer, Elbow, FreezeRMElbow, RMTeeLayer, RMTee, FreezeRMTee)
# Change ExitCoupling and ExitPipeInner to SUBF functions after getting Akta's code!
# did not add (N)LFOM yet!!!
EtWaterExitScript :=
    EtExitPipeLayer ← layer_new("EtExitPipe", blue)
    ExitPipeOuter ← PipeF(RMTee_Origin, L_EtExitOuter, [270; 0]*deg, ND_RMPipe, EN_PipeSpec)
    ExitPipeInner ← PipeF(RMTee_Origin + [0 m; L_EtExitOuter + CouplingLength(ND_RMPipe) - 2*SocketDepth(ND_RMPipe); 0 m], L_EtExitInner, [270; 0]*deg, ND_RMPipe, EN_PipeSpec)
    FreezeEtExitPipes ← FreezeLayer("EtExitPipe")
    ExitCouplingLayer ← layer_new("EtExitCoupling", green)
    ExitCoupling ← CouplingF(RMTee_Origin + [0 m; L_EtExitOuter + CouplingLength(ND_RMPipe) - 2*SocketDepth(ND_RMPipe); 0 m], [90; 0]*deg, ND_RMPipe, EN_PipeSpec)
    FreezeExitCoupling ← FreezeLayer("EtExitCoupling")
    ExitElbowLayer ← layer_new("EtExitElbow", green)
    ExitElbow ← ElbowF(RMTee_Origin + [0 m; L_EtExitOuter + L_EtExitInner + CouplingLength(ND_RMPipe) - 2*SocketDepth(ND_RMPipe); 0 m], [0; 90; 0]*deg, ND_RMPipe, EN_PipeSpec)
    FreezeExitElbow ← FreezeLayer("EtExitCoupling")
    return stack(EtExitPipeLayer, ExitPipeOuter, ExitPipeInner, FreezeEtExitPipes, ExitCouplingLayer, ExitCoupling, FreezeExitCoupling, ExitElbowLayer, ExitElbow, FreezeExitElbow)
# Must change coupling and pipe to "SUBF" when possible!!!
EtWeirScript :=
    ElbowLayer ← layer_new("EtWeirElbow", green)
    WeirElbow ← ElbowF([-L_EtHopper/2; ConRadius(ND_RMPipe) + S_Elbow; ConRadius(ND_EtOverflow)*tan(AN_EtSlope)] + Et_Origin, [0; 270; 270]*deg, ND_EtOverflow, EN_PipeSpec)
    FreezeElbow ← FreezeLayer("EtWeirCoupling")
    WeirLayer ← layer_new("EtWeirPipe", blue)
    WeirPipe ← PipeF([-L_EtHopper/2; ConRadius(ND_RMPipe) + S_Elbow; ConRadius(ND_EtOverflow)*tan(AN_EtSlope)] + Et_Origin, L_EtWeir, [0; 90]*deg, ND_EtOverflow, EN_PipeSpec)
    FreezeWeir ← FreezeLayer("EtWeirPipe")
    return stack(ElbowLayer, WeirElbow, FreezeElbow, WeirLayer, WeirPipe, FreezeWeir)
# need SUBFs here too!!!
# add chimney stops when possible
EtDrainScript :=
    LocalElbow ← layer_new("EtDrainElbow", green)
    for i ∈ 1 .. N_EtHoppers - 1
        LocalElbow ← stack(LocalElbow, ElbowF([-L_EtHopper/2 - L_EtHopper*i; ConRadius(ND_RMPipe) + S_Elbow; ConRadius(ND_RMPipe)*tan(AN_EtSlope)] + Et_Origin, [0; 270; 270]*deg, ND_RMPipe, EN_PipeSpec))
    FreezeElbow ← FreezeLayer("EtDrainElbow")
    LocalPipe ← layer_new("EtDrainPipe", blue)
    for i ∈ 1 .. N_EtHoppers - 1
        LocalPipe ← stack(LocalPipe, PipeF([
            -L_EtHopper/2 - L_EtHopper*i;
            W_Et/2;
            ConRadius(ND_RMPipe)*tan(AN_EtSlope) - CouplingLength(ND_RMPipe) + 2*SocketDepth(ND_RMPipe)
        ] + Et_Origin, L_EtDrainPipe, [0; 270]*deg, ND_RMPipe, EN_PipeSpec))
    FreezePipe ← FreezeLayer("EtDrainPipe")
    return stack(LocalElbow, FreezeElbow)
# will this loop work if we only have two hoppers?
# [component: inputs stack(RMScriptEvenChannels, EtWaterExitScript, EtWeirScript, EtDrainScript)]
