# Automated Design: AutoCAD: Entrance Tank
# References
# [reference: MasterProgram.xmcd]
H_EtFlocConnect := 5 cm  # Dimensions of connection between entrance tank and floc tank
W_EtFlocConnect := S_FlocBaffle[0] = 0.155277 m
B_EtFlocConnect := T_PlantWall = 0.15 m
# z.et = h sed tank wall + hl through entire plant
HW_EtMax := HW_EtMin + HL_Lfom
EtFlocConnect_Dim := [W_EtFlocConnect; B_EtFlocConnect; H_EtFlocConnect] = [0.155277; 0.15; 0.05] m
mod(N_FlocChannels, 2) = 1
ZW_Et := HW_FlocStart + HL_Lfom + H_LfomFreefall + HL_EtFloc = 2.19095 m
W_Sed = 2 m
Z_Et := H_Sed + HL_PlantTotal = 2.21807 m
H_Et := Z_Et - H_Sed - H_InletChannel + H_SedWeirExit + 2*ND_RMPipe
# Inputs
Et_origin[0] :=
    Plant_Origin[0] if mod(N_FlocChannels, 2) == 1
    (Plant_Origin[0] - L_Sed) otherwise
H_SedWeirExit = 0.0774128 m
Et_origin :=
    origin ← [
        Et_origin[0];
        Plant_Origin[1] + (N_SedTanks*(W_Sed + T_PlantWall)) + (N_FlocChannels*(W_FlocChannel + T_PlantWall));
        Plant_Origin[2]
    ]
    return origin
    = [0; 7.55; 0] m
Et_dim := [L_Et; W_Et; H_Et] = [1.11098; 1.11098; 0.151996] m
EtFlocConnect_origin :=
    origin ← [Et_origin[0] - L_Et; Et_origin[1] - T_PlantWall; Et_origin[2] + H_Et - H_EtFlocConnect] if mod(N_FlocChannels, 2) == 0
    origin ← [Et_origin[0] - W_EtFlocConnect; Et_origin[1] - T_PlantWall; Et_origin[2] + H_Et - H_EtFlocConnect] if mod(N_FlocChannels, 2) == 1
    return origin
    = [-0.155277; 7.4; 0.101996] m
RM_origin := [Et_origin[0] - L_Et/2; (Et_origin[1] + W_Et) - T_PlantWall - ND_RMPipe; H_Et]
# Scripts
EtTankScript :=
    layernewt ← layer_new("entrancetank", ltgrey)
    tank ← Tank(Et_origin, Et_dim, T_EtWall)
    layersett ← layer_set("0")
    layerfreezet ← layer_freeze("entrancetank")
    one ← stack(layernewt, tank, layersett, layerfreezet)
    layer3 ← layer_set("entrancetank")
    box3 ← box(EtFlocConnect_origin, EtFlocConnect_origin + EtFlocConnect_Dim)
    layerset3 ← layer_set("0")
    layerthaw3 ← layer_thaw("entrancetank")
    viewtop ← viewtop1
    subtract3 ← subtractD([Et_origin[0] + T_PlantWall; Et_origin[1]; Et_origin[2]], [EtFlocConnect_origin[0]; EtFlocConnect_origin[1]; EtFlocConnect_origin[2]])
    layerfreeze3 ← layer_freeze("entrancetank")
    two ← stack(layer3, box3, layerset3, layerthaw3, viewtop, subtract3, layerfreeze3)
    three ← stack(one, two)
    return three
# Top of pipe starts at the height of the weir at the end
RMScript :=
    layernewr ← layer_new("rapidmixer", blue)
    pipe ← Pipe(RM_origin, ND_RMPipe, (-H_Floc + ConRadius(ND_PltWeir)) + outerradius(ND_PltWeir) + T_ConcreteMin, EN_PipeSpec)
    layersetr ← layer_set("0")
    layerfreezer ← layer_freeze("rapidmixer")
    layer4 ← layer_set("rapidmixer")
    layerthaw4 ← layer_thaw("rapidmixer")
    viewtop ← viewtop1
    layerfreeze4 ← layer_freeze("rapidmixer")
    one ← stack(layernewr, pipe, layersetr, layerfreezer, layer4, layerthaw4, viewtop, layerfreeze4)
    return one
H_Sed - H_InletChannel + HW_InletChannel = 1.62141 m
# First orifice is a cap on the top of the pipe
AC_EntranceTank := stack(EtTankScript, RMScript)
# [component: inputs AC_EntranceTank]
