# Entrance Tank AutoCAD
# Entrance Tank Concrete
Et_Origin := [
    Plant_Origin[0];
    Floc_Origin[1] + (N_FlocChannels*(W_FlocChannel + T_PlantWall)) + W_EtWalkway + T_PlantWall;
    Z_Et
]
Et_Dim := [L_Et; W_Et; H_Et]
EtHopper_Origin := [Et_Origin[0]; Et_Origin[1] + W_Et; Et_Origin[2]]
EtHopper3_Origin := [Et_Origin[0] - L_EtHopperFirst; Et_Origin[1] + W_Et; Et_Origin[2]]
Hopper1_Farcorner := [Et_Origin[0] - 1/2*L_EtHopperFirst + ConRadius(ND_EtDrain) + S_Fitting; Et_Origin[1]; Z_EtHopper]
Hopper2_Farcorner := [
    Et_Origin[0] - W_Et + max(2*(ConRadius(ND_EtDrain) + S_Fitting), W_Et - H_EtHopperBack/tan(AN_EtSlope));
    Et_Origin[1] + W_Et + L_EtHopperFirst;
    H_EtHopperBack + Z_Et
]
Hopper3_Farcorner := [Et_Origin[0] - 1/2*L_EtHopperFirst - ConRadius(ND_EtDrain) - S_Fitting; Et_Origin[1]; Z_EtHopper]
EtHopper_CopyPoints :=
    for i ∈ 0 .. N_EtHoppers - 2
        Et_Hopper.Array[i] ← [Et_Origin[0] - T_EtTrashLedge - (i + 1)*L_EtHopperFirst; Et_Origin[1]; Et_Origin[2]]
    return Et_Hopper.Array
EntTankLayer := layer_new("EtTankCon", ltgrey)
EntTank := Tank(Et_Origin, Et_Dim + [0 m; W_EtOverflowChannel + T_EtWeir; 0 m], T_PlantWall)
EtOverflowChannelBase := BoxF(Et_Origin + [0 m; W_Et; 0 m], Et_Origin + [
    -L_Et;
    W_Et + W_EtOverflowChannel + T_EtWeir;
    H_Et - HW_EtOverflowChannel - H_PlantFreeboard - H_EtWeirFreefall
], [0; 0; 0]*deg)
EtOverflowWeir := BoxF(Et_Origin + [0 m; W_Et; H_Et - HW_EtOverflowChannel - H_PlantFreeboard - H_EtWeirFreefall], Et_Origin + [-L_Et; W_Et + T_EtWeir; HW_Et], [0; 0; 0]*deg)
UnionEntTankPieces := Union_All
FreezeEntTank := FreezeLayer("EtTankCon")
HopperLayer := layer_new("EtHopperCon", blue)
Hopper3 := WedgeF(EtHopper3_Origin, Hopper3_Farcorner, [0; 0; 0]*deg)
Hopper2 := WedgeF(EtHopper_Origin, Hopper2_Farcorner, [90; 0; 0]*deg)
GroupHopper := GroupAll("EtHopperCon")
CopyEtHopper := CopyGroup("EtHopperCon", Et_Origin, submatrix(EtHopper_CopyPoints, 0, N_EtHoppers - 3, 0, 0))
Hopper1 := WedgeF(EtHopper_Origin, Hopper1_Farcorner, [0; 0; 0]*deg)
GroupRightHopper := GroupLast("EtHopperLeft")
CopyRightHopper := CopyGroup("EtHopperLeft", Et_Origin, EtHopper_CopyPoints)
LastHopper := WedgeF([Et_Origin[0] - L_Et; Et_Origin[1]; Et_Origin[2]], [L_EtHopperMin/2 - ConRadius(ND_EtDrain) - S_Fitting; Et_Origin[1]; H_EtHopperLast] + [Et_Origin[0] - L_Et; W_Et; Et_Origin[2]], [0; 0; 0]*deg)
LastBackHopper := WedgeF([Et_Origin[0] - L_Et; Et_Origin[1] + W_Et; Et_Origin[2]], [
    Et_Origin[0] - L_Et - W_Et + max(2*(ConRadius(ND_EtDrain) + S_Fitting), W_Et - H_EtHopperBack/tan(AN_EtSlope));
    Et_Origin[1] + W_Et - L_EtHopperLast;
    Et_Origin[2] + H_EtHopperBack
], [90; 0; 0]*deg)
Ledge := BoxF(EtHopper3_Origin, EtHopper3_Origin - [T_EtTrashLedge; W_Et; -H_EtHopperFirst], [0; 0; 0]*deg)
FreezeHopper := FreezeLayer("EtHopperCon")
TrashRackSlot1 := BoxF(EtHopper3_Origin + [0 m; 2*D_Rebar; H_EtHopperFirst - 2*D_Rebar], EtHopper3_Origin + [-2*D_Rebar; -W_Et - 2*D_Rebar; H_EtHopperFirst + H_EtTop + H_PlantFreeboard + zc], [0; 0; 0]*deg)
TrashRackSlot2 := BoxF(EtHopper3_Origin + [-2*D_Rebar - T_ConcreteMin; 2*D_Rebar; H_EtHopperFirst - 2*D_Rebar], EtHopper3_Origin + [-4*D_Rebar - T_ConcreteMin; -W_Et - 2*D_Rebar; H_EtHopperFirst + H_EtTop + H_PlantFreeboard + zc], [0; 0; 0]*deg)
GroupSlots := GroupAll("DeleteMe")
SubtractSlots := SubtractF(["EtTankCon"; "EtHopperCon"], "DeleteMe")
EtTankScript := stack(EntTankLayer, EntTank, EtOverflowChannelBase, EtOverflowWeir, UnionEntTankPieces, FreezeEntTank, HopperLayer, Hopper3, Hopper2, GroupHopper, CopyEtHopper, Hopper1, GroupRightHopper, CopyRightHopper, LastHopper, LastBackHopper, Ledge, FreezeHopper, TrashRackSlot1, TrashRackSlot2, GroupSlots, SubtractSlots)
# Trash Rack
TRLayer := layer_new("EtTrashrack", yellow)
HorizCylinder := CylinderF(EtHopper3_Origin + [-(1/2*D_Rebar); 2*D_Rebar; H_EtHopperFirst - 3/2*D_Rebar], D_Rebar/2, W_Et + 4*D_Rebar, [90; 0]*deg)
ViewRight := view("r")
ArrayHorizCylinder := ArrayLast(N_TRSpacesH + 1, 1, B_EtRebar)
ViewTop := view("t")
VertCylinder := CylinderF(EtHopper3_Origin + [-3/2*D_Rebar; 3/2*D_Rebar; H_EtHopperFirst - 2*D_Rebar], D_Rebar/2, (N_TRSpacesH + 1)*B_EtRebar - D_Rebar, [0; 90]*deg)
ArrayVertCyl := ArrayLast(1, N_TRSpacesV + 1, -B_EtRebar)
ArrayAll := array_all(1, 2, -T_ConcreteMin - 2*D_Rebar)
Freeze := FreezeLayer("EtTrashrack")
EtTrashRackScript := stack(TRLayer, HorizCylinder, ViewRight, ArrayHorizCylinder, ViewTop, VertCylinder, ViewRight, ArrayVertCyl, ViewTop, ArrayAll, Freeze)
# Rapid Mix Pipe and LFOM
# this is the upper elbow (connected to the LFOM)
RMElbow1_Origin := [
    Plant_Origin[0] - L_Sed + S_Fitting + ConRadius(ND_RMPipe);
    Et_Origin[1] + SocketDepth(ND_RMPipe);
    Z_EtExit
]
EtRMCoupling_Origin := RMElbow1_Origin - [0 m; 2*SocketDepth(ND_RMPipe); 0 m]
EtWeir_Origin := [
    Et_Origin[0] - S_Fitting - ConRadius(ND_EtOverflow);
    Et_Origin[1] + W_Et - ConRadius(ND_EtOverflow) - S_Fitting;
    Z_EtTop - H_PlantFreeboard
]
RMTee_Origin :=
    if CouplingLength(ND_RMPipe) < T_PlantWall
        [
            Plant_Origin[0] - L_Sed + ConRadius(ND_RMPipe) + S_Fitting;
            -T_PlantWall + EtRMCoupling_Origin[1];
            EtRMCoupling_Origin[2]
        ]
    otherwise
        [
            Plant_Origin[0] - L_Sed + ConRadius(ND_RMPipe) + S_Fitting;
            -CouplingLength(ND_RMPipe) + EtRMCoupling_Origin[1];
            EtRMCoupling_Origin[2]
        ]
RMElbow2_Origin := [
    RMTee_Origin[0];
    RMTee_Origin[1] - ShortTeeLength(ND_RMPipe) - ElbowRadius(ND_RMPipe);
    FlocCoupling_Origin[2]
]  # this is the lower elbow
L_RMPipeHorizLower := RMTee_Origin[1] - Floc_Origin[1] - N_FlocChannels*W_FlocChannel - ElbowRadius(ND_RMPipe) - ShortTeeLength(ND_RMPipe) - (T_PlantWall*(N_FlocChannels - 1) - CouplingLength(ND_RMPipe) + SocketDepth(ND_RMPipe))
L_RMPipeVertLower := Z_EtExit - ShortTeeLength(ND_RMPipe) - FlocCoupling_Origin[2] - ElbowRadius(ND_RMPipe)
L_RMPipeVert := RMElbow1_Origin[2] - ShortTeeLength(ND_RMPipe) - FlocCoupling_Origin[2] - ElbowRadius(ND_RMPipe)
L_RMFlocPipe := RMElbow2_Origin[1] - FlocCoupling_Origin[1] - CouplingLength(ND_RMPipe) + SocketDepth(ND_RMPipe)
L_RMExitPipe := 2*SocketDepth(ND_RMPipe)
L_RMExitPipe2 :=
    (2*SocketDepth(ND_RMPipe)) if (CouplingLength(ND_RMPipe) > T_PlantWall)
    (T_PlantWall - CouplingLength(ND_RMPipe) + 2*SocketDepth(ND_RMPipe)) otherwise
L_RMTeePipe := ZW_RMPipe + H_PlantFreeboard - Z_EtExit - ShortTeeLength(ND_RMPipe)
L_LfomPipe := Z_EtTop - Z_EtExit - ElbowRadius(ND_RMPipe)
ElbowLayer := layer_new("EtRmElbowPlu", green)
UpperElbow := ElbowSUBF(RMElbow1_Origin, [0; 90; 0]*deg, ND_RMPipe, PS_Default, ["EtTankCon"; "EtHopperCon"])
LowerElbow := ElbowF(RMElbow2_Origin, [0; 90; 0]*deg, ND_RMPipe, PS_Default)
FreezeElbow := FreezeLayer("EtRmElbowPlu")
RMCouplingLayer := layer_new("EtRmCouplingPlu", green)
ExitCoupling := CouplingSUBF(EtRMCoupling_Origin, [90; 0]*deg, ND_RMPipe, PS_Default, ["EtTankCon"; "EtHopperCon"])
FreezeRMEtCoupling := FreezeLayer("EtRmCouplingPlu")
PipeLayer := layer_new("EtRmPipePlu", blue)
ExitPipe := PipeSUBF(RMElbow1_Origin, L_RMExitPipe, [90; 0; 0]*deg, ND_RMPipe, PS_Default, ["EtTankCon"; "EtHopperCon"])
ExitPipe2 := PipeF(EtRMCoupling_Origin - [0 m; CouplingLength(ND_RMPipe) - 2*SocketDepth(ND_RMPipe); 0 m], L_RMExitPipe2, [90; 0; 0]*deg, ND_RMPipe, PS_Default)
RMPipeVert := PipeF(RMTee_Origin - [0 m; ShortTeeLength(ND_RMPipe); ShortTeeLength(ND_RMPipe)], L_RMPipeVert, [0; 270; 0]*deg, ND_RMPipe, PS_Default)
RMFlocPipe := PipeF(RMElbow2_Origin, L_RMFlocPipe, [90; 0; 0]*deg, ND_RMPipe, PS_Default)
RMTeePipe := PipeF(RMTee_Origin + [0 m; -ShortTeeLength(ND_RMPipe); ShortTeeLength(ND_RMPipe)], L_RMTeePipe, [0; 90; 0]*deg, ND_RMPipe, PS_Default)
FreezePipe := FreezeLayer("EtRmPipePlu")
RMTeeLayer := layer_new("EtRmTeePlu", green)
MakeTee := TeeF(RMTee_Origin, [0; 90; 0]*deg, ND_RMPipe, PS_Default)
FreezeTee := FreezeLayer("EtRmTeePlu")
RMScript := stack(ElbowLayer, UpperElbow, LowerElbow, FreezeElbow, RMCouplingLayer, ExitCoupling, FreezeRMEtCoupling, PipeLayer, ExitPipe, ExitPipe2, RMPipeVert, RMFlocPipe, RMTeePipe, FreezePipe, RMTeeLayer, MakeTee, FreezeTee)
LfomLayer := layer_new("EtLfomPlu", blue)
LfomPipe := PipeF(RMElbow1_Origin + [0 m; ElbowRadius(ND_RMPipe); ElbowRadius(ND_RMPipe)], L_LfomPipe, [0; 90; 0]*deg, ND_RMPipe, PS_Default)
FreezePipe := FreezeLayer("EtLfomPlu")
LfomOrifices :=
    Local ← stack(LfomLayer, LfomPipe, FreezePipe)
    for h ∈ 0 .. last(H_LfomOrifice)
        Local ← stack(Local, CylinderF([
            RMElbow1_Origin[0];
            RMElbow1_Origin[1] + ElbowRadius(ND_RMPipe);
            ZW_Et - HL_Flowmeasure + H_LfomOrifice[h]
        ], D_LfomOrifices/2, outerradius(ND_RMPipe) + zc, [2*asin(D_LfomOrifices/(2*outerradius(ND_RMPipe)))*(mod(h, 2) == 1) + 90 deg; 0]))
        Local ← stack(Local, ArrayLastPolar([
            RMElbow1_Origin[0];
            RMElbow1_Origin[1] + ElbowRadius(ND_RMPipe);
            ZW_Et - HL_Flowmeasure + H_LfomOrifice[h]
        ], N_LfomOrifices[h], (2*N_LfomOrifices[h] - 1)*2*asin(D_LfomOrifices/(2*outerradius(ND_RMPipe)))))
    return Local
GroupOrifices := GroupAll("DeleteMe")
SubtractOrifices := SubtractF(["EtLfomPlu"], "DeleteMe")
EtLfomScript := stack(LfomOrifices, GroupOrifices, SubtractOrifices)
# Hopper Drains
DrainCouplingLayer := layer_new("EtDrainCouplingsPlu", green)
DrainWeirCoupling := CouplingSUBF([-L_EtHopperFirst/2; ConRadius(ND_EtDrain) + S_Fitting; -SocketDepth(ND_EtDrain)] + Et_Origin, [0; 270]*deg, ND_EtDrain, PS_Default, ["EtTankCon"])
DrainCouplings :=
    Local ← stack(DrainCouplingLayer, DrainWeirCoupling)
    if N_EtHoppers ≥ 2
        for i ∈ 1 .. N_EtHoppers - 1
            Local ← stack(Local, CouplingSUBF([
                -L_EtHopperFirst/2 - L_EtHopperFirst*i - T_EtTrashLedge;
                ConRadius(ND_EtDrain) + S_Fitting;
                -SocketDepth(ND_EtDrain)
            ] + Et_Origin, [0; 270]*deg, ND_EtDrain, PS_Default, ["EtTankCon"]))
FreezeDrainCouplings := FreezeLayer("EtDrainCouplingsPlu")
DrainPipeLayer := layer_new("EtDrainPipesPlu", blue)
DrainPipe1 := PipeSUBF([
    -L_EtHopperFirst/2;
    ConRadius(ND_EtDrain) + S_Fitting;
    SocketDepth(ND_EtDrain) - CouplingLength(ND_EtDrain)
] + Et_Origin, T_PlantWall, [0; 270; 0]*deg, ND_EtDrain, PS_Default, ["EtTankCon"])
DrainPipes :=
    Local ← stack(FreezeDrainCouplings, DrainPipeLayer, DrainPipe1)
    for i ∈ 1 .. N_EtHoppers - 1
        if N_EtHoppers ≥ 2
            Local ← stack(Local, PipeSUBF([
                -L_EtHopperFirst/2 - L_EtHopperFirst*i - T_EtTrashLedge;
                ConRadius(ND_EtDrain) + S_Fitting;
                SocketDepth(ND_EtDrain) - CouplingLength(ND_EtDrain)
            ] + Et_Origin, T_PlantWall, [0; 270; 0]*deg, ND_EtDrain, PS_Default, ["EtTankCon"]))
FreezePipes := FreezeLayer("EtDrainPipesPlu")
StopperLayer := layer_new("EtDrainStoppersPlu", blue)
FirstStopper := PipeF([-L_EtHopperFirst/2; ConRadius(ND_EtDrain) + S_Fitting; -SocketDepth(ND_EtDrain)] + Et_Origin, H_Et - H_PlantFreeboard/2 + SocketDepth(ND_EtDrain), [0; 90; 0]*deg, ND_EtDrain, PS_Default)
StopperPipes :=
    Local ← stack(FreezePipes, StopperLayer, FirstStopper)
    if N_EtHoppers ≥ 2
        for i ∈ 1 .. N_EtHoppers - 1
            Local ← stack(Local, PipeF([
                -L_EtHopperFirst/2 - L_EtHopperFirst*i - T_EtTrashLedge;
                ConRadius(ND_EtDrain) + S_Fitting;
                -SocketDepth(ND_EtDrain)
            ] + Et_Origin, H_Et - H_PlantFreeboard/2 + SocketDepth(ND_EtDrain), [0; 90; 0]*deg, ND_EtDrain, PS_Default))
FreezeStopper := FreezeLayer("EtDrainStoppersPlu")
EtDrainsRight := stack(DrainCouplings, DrainPipes, StopperPipes, FreezeStopper)
ThawDrains := ThawMultiple(["EtTankCon"; "EtHopperCon"; "EtDrainCouplingsPlu"; "EtDrainPipesPlu"; "EtWeir"; "EtTrashrack"; "Cdc"; "CdcFittings"; "EtDrainStoppersPlu"])
MirrorDrains := Mirror3dAll("YZ", [Plant_Origin[0] - 1/2*L_Sed; 0 m; 0 m], "Y")
FreezeDrains := FreezeMultiple(["EtTankCon"; "EtHopperCon"; "EtDrainCouplingsPlu"; "EtDrainPipesPlu"; "EtWeir"; "EtTrashrack"; "Cdc"; "CdcFittings"; "EtDrainStoppersPlu"])
EtDrainsLeft := stack(ThawDrains, MirrorDrains, FreezeDrains)
# Overflow Drain Plu
L_EtOverflowPipeVert := H_Et - HW_EtOverflowChannel - H_PlantFreeboard - H_EtWeirFreefall - CouplingLength(ND_EtOverflowDrain) + 2*SocketDepth(ND_EtOverflowDrain) - ElbowRadius(ND_EtOverflowDrain) + T_PlantWall + Et_Origin[2]
L_EtOverflowPipeHoriz := 2*SocketDepth(ND_EtOverflowDrain) + max(0, T_ChannelWall - CouplingLength(ND_EtOverflowDrain))
EtOverflowCouplingHoriz_Origin := [
    Plant_Origin[0] - L_Sed - T_ChannelWall + CouplingLength(ND_EtOverflowDrain) - SocketDepth(ND_EtOverflowDrain);
    Et_Origin[1] + W_Et + T_EtWeir + W_EtOverflowChannel - S_Fitting - ConRadius(ND_EtOverflowDrain);
    Plant_Origin[2] - S_Fitting - ConRadius(ND_EtOverflowDrain)
]
EtOverflowPipeHoriz_Origin := EtOverflowCouplingHoriz_Origin + [L_EtOverflowPipeHoriz; 0; 0]  # same as elbow origin
EtOverflowElbow_Origin := EtOverflowPipeHoriz_Origin + [ElbowRadius(ND_EtOverflowDrain); 0; ElbowRadius(ND_EtOverflowDrain)]
EtOverflowCouplingVert_Origin := EtOverflowElbow_Origin + [
    0;
    0;
    L_EtOverflowPipeVert + CouplingLength(ND_EtOverflowDrain) - 2*SocketDepth(ND_EtOverflowDrain)
]
EtOverflowFittingLayer := layer_new("EtOverflowFittingPlu", green)
EtOverflowCouplingVert := CouplingSUBF(EtOverflowCouplingVert_Origin, [0; 270]*deg, ND_EtOverflowDrain, PS_Default, ["EtTankCon"])
EtOverflowCouplingHoriz := CouplingSUBF(EtOverflowCouplingHoriz_Origin, [0; 0]*deg, ND_EtOverflowDrain, PS_Default, ["EtTankCon"])
EtOverflowElbow := ElbowF(EtOverflowElbow_Origin, [0; 0; 270]*deg, ND_EtOverflowDrain, PS_Default)
FreezeEtOverflowFittings := FreezeLayer("EtOverflowFittingPlu")
EtOverflowPipeLayer := layer_new("EtOverflowPipePlu", blue)
EtOverflowPipeVert := PipeSUBF(EtOverflowElbow_Origin, L_EtOverflowPipeVert, [0; 90; 0]*deg, ND_EtOverflowDrain, PS_Default, ["EtTankCon"])
EtOverflowPipeHoriz := PipeSUBF(EtOverflowPipeHoriz_Origin, L_EtOverflowPipeHoriz, [0; 0; 0]*deg, ND_EtOverflowDrain, PS_Default, ["EtTankCon"])
FreezeEtOverflowPipe := FreezeLayer("EtOverflowPipePlu")
EtOverflowPluScript := stack(EtOverflowFittingLayer, EtOverflowCouplingVert, EtOverflowCouplingHoriz, EtOverflowElbow, FreezeEtOverflowFittings, EtOverflowPipeLayer, EtOverflowPipeVert, EtOverflowPipeHoriz, FreezeEtOverflowPipe)
# Flow Control Drain
EtFlowControlPipeLayer := layer_new("EtFlowControlPipePlu", blue)
EtFlowControlPipe := PipeSUBF(Et_Origin + [
    -L_EtHopperFirst/2 + S_Fitting + ConRadius(ND_EtDrain);
    S_Fitting + ConRadius(ND_EtDrain);
    outerradius(ND_EtFlowControl)
], L_EtFlowControlPipe, [0; 180; 0]*deg, ND_EtFlowControl, PS_Default, ["EtTankCon"])
EtFlowControlNipple1 := PipeF(Et_Origin + [
    T_PlantWall - SocketDepth(ND_EtFlowControl);
    S_Fitting + ConRadius(ND_EtDrain);
    outerradius(ND_EtFlowControl)
], 2*SocketDepth(ND_EtFlowControl), [0; 180; 0]*deg, ND_EtFlowControl, PS_Default)
EtFlowControlNipple2 := PipeF(Et_Origin + [
    T_PlantWall + 2*MaleAdapterLength(ND_EtFlowControl) + ValveLength(ND_EtFlowControl) - 2*ValveSocket(ND_EtFlowControl) - SocketDepth(ND_EtFlowControl);
    S_Fitting + ConRadius(ND_EtDrain);
    outerradius(ND_EtFlowControl)
], 2*SocketDepth(ND_EtFlowControl), [0; 180; 0]*deg, ND_EtFlowControl, PS_Default)
EtFlowControlNipple3 := PipeF(Et_Origin + [
    T_PlantWall + 2*MaleAdapterLength(ND_EtFlowControl) + ValveLength(ND_EtFlowControl) + SocketDepth(ND_EtFlowControl) - 2*ValveSocket(ND_EtFlowControl) + (ElbowRadius(ND_EtFlowControl) + SocketDepth(ND_EtFlowControl))*sin(45 deg);
    S_Fitting + ConRadius(ND_EtDrain) + (ElbowRadius(ND_EtFlowControl) + 2*SocketDepth(ND_EtFlowControl))*cos(45 deg);
    outerradius(ND_EtFlowControl) - sin(45 deg)*(ElbowRadius(ND_EtFlowControl) + 2*SocketDepth(ND_EtFlowControl))
], 2*SocketDepth(ND_EtFlowControl), [135; 270]*deg, ND_EtFlowControl, PS_Default)
EtFlowControlFittingLayer := layer_new("EtFlowControlFittingPlu", green)
EtFlowControlCoupling := CouplingSUBF(Et_Origin + [
    T_PlantWall - SocketDepth(ND_EtFlowControl);
    S_Fitting + ConRadius(ND_EtDrain);
    outerradius(ND_EtFlowControl)
], [0; 0]*deg, ND_EtFlowControl, PS_Default, ["EtTankCon"])
EtFlowControlElbow1 := ElbowF(Et_Origin + [
    T_PlantWall + 2*MaleAdapterLength(ND_EtFlowControl) + ValveLength(ND_EtFlowControl) + SocketDepth(ND_EtFlowControl) - 2*ValveSocket(ND_EtFlowControl);
    S_Fitting + ConRadius(ND_EtDrain);
    outerradius(ND_EtFlowControl)
], [270; 0; 315]*deg, ND_EtFlowControl, PS_Default)
EtFlowControlElbow2 := ElbowF(Et_Origin + [
    T_PlantWall + 2*MaleAdapterLength(ND_EtFlowControl) + ValveLength(ND_EtFlowControl) + SocketDepth(ND_EtFlowControl) - 2*ValveSocket(ND_EtFlowControl) + (ElbowRadius(ND_EtFlowControl) + SocketDepth(ND_EtFlowControl))*sin(45 deg);
    S_Fitting + ConRadius(ND_EtDrain) + (ElbowRadius(ND_EtFlowControl) + 2*SocketDepth(ND_EtFlowControl))*cos(45 deg);
    outerradius(ND_EtFlowControl) - sin(45 deg)*(ElbowRadius(ND_EtFlowControl) + 2*SocketDepth(ND_EtFlowControl))
], [0; 0; 315]*deg, ND_EtFlowControl, PS_Default)
EtFlowControlAdapterLayer := layer_new("EtFlowControlAdapterPlu", red)
EtFlowControlAdapter1 := MaleAdapterF(Et_Origin + [
    T_PlantWall + SocketDepth(ND_EtFlowControl);
    S_Fitting + ConRadius(ND_EtDrain);
    outerradius(ND_EtFlowControl)
], [180; 0]*deg, ND_EtFlowControl, PS_Default)
EtFlowControlAdapter2 := MaleAdapterF(Et_Origin + [
    T_PlantWall + 2*MaleAdapterLength(ND_EtFlowControl) - 2*ValveSocket(ND_EtFlowControl) - SocketDepth(ND_EtFlowControl) + ValveLength(ND_EtFlowControl);
    S_Fitting + ConRadius(ND_EtDrain);
    outerradius(ND_EtFlowControl)
], [0; 0]*deg, ND_EtFlowControl, PS_Default)
EtFlowControlValveLayer := layer_new("EtFlowControlValvePlu", blue3)
EtFlowControlValve := insertdwg("VAL-Scaled-Gate-Valve-Threaded", Et_Origin + [
    T_PlantWall + MaleAdapterLength(ND_EtFlowControl) - ValveSocket(ND_EtFlowControl) + ValveLength(ND_EtFlowControl);
    S_Fitting + ConRadius(ND_EtDrain);
    outerradius(ND_EtFlowControl)
], 2*outerradius(ND_EtFlowControl)/(1.16 m), 2*outerradius(ND_EtFlowControl)/(1.16 m), 0 deg)
EtFlowControlSubWedge := WedgeF(Et_Origin + [
    -L_EtHopperFirst/2 + S_Fitting + ConRadius(ND_EtDrain);
    S_Fitting + ConRadius(ND_EtDrain) + outerradius(ND_EtFlowControl);
    outerdiameter(ND_EtFlowControl)
], Et_Origin + [
    -L_EtHopperFirst/2 + S_Fitting + ConRadius(ND_EtDrain) + outerdiameter(ND_EtFlowControl)/tan(AN_EtSlope);
    S_Fitting + ConRadius(ND_EtDrain) - outerradius(ND_EtFlowControl);
    0 m
], [0; 0; 0]*m)
SubtractPipeEndWedge := SubtractF(["EtFlowControlPipePlu"], "DeleteMe")
FlowControlScript := stack(EtFlowControlPipeLayer, EtFlowControlPipe, EtFlowControlNipple1, EtFlowControlNipple2, EtFlowControlNipple3, FreezeLayer("EtFlowControlPipePlu"), EtFlowControlFittingLayer, EtFlowControlCoupling, EtFlowControlElbow1, EtFlowControlElbow2, FreezeLayer("EtFlowControlFittingPlu"), EtFlowControlAdapterLayer, EtFlowControlAdapter1, EtFlowControlAdapter2, FreezeLayer("EtFlowControlAdapterPlu"), EtFlowControlValveLayer, EtFlowControlValve, FreezeLayer("EtFlowControlValvePlu"), EtFlowControlSubWedge, GroupAll("DeleteMe"), SubtractPipeEndWedge)
AC_EntranceTank := stack(EtTankScript, EtTrashRackScript, EtOverflowPluScript, EtDrainsRight, EtLfomScript, RMScript, FlowControlScript)
