# Sed layers - "Sed"
# Filter layers - "Fi"
# Floc Layers - "Floc"
# EntranceTank Layers - "Et"
# Cdc layers - "Cdc"
# rapid mix layers - "RM"
# coagulant tank layers - "Coag"
# chlorine tank layers - "Chlor"
TopView :=
    SetLayout1 ← concat("layout", sp, "s", sp)
    RenameLayout ← stack(concat("layout", sp, "r", sp), "TopView")
    SwitchSpace ← ".ms"
    TopView ← viewtop1
    Zoom ← concat("z", sp, "o", sp, "all", sp)
    return stack(SetLayout1, RenameLayout, SwitchSpace, TopView, Zoom)
FrontView :=
    SetLayout2 ← concat("layout", sp, "s", sp, "layout2")
    RenameLayout ← stack(concat("layout", sp, "r", sp), "FrontView")
    SwitchSpace ← ".ms"
    FrontView ← viewfront1
    Zoom ← concat("z", sp, "o", sp, "all", sp)
    return stack(SetLayout2, RenameLayout, SwitchSpace, FrontView, Zoom)
LeftView :=
    NewLayout ← concat("layout", sp, "n", sp, "LeftView")
    SetLayout ← concat("layout", sp, "s", sp, "LeftView")
    SwitchSpace ← ".ms"
    LeftView ← viewleftside
    Zoom ← concat("z", sp, "o", sp, "all", sp)
    return stack(NewLayout, SetLayout, SwitchSpace, LeftView, Zoom)
RightView :=
    NewLayout ← concat("layout", sp, "n", sp, "RightView")
    SetLayout ← concat("layout", sp, "s", sp, "RightView")
    SwitchSpace ← ".ms"
    RightView ← viewrightside1
    Zoom ← concat("z", sp, "o", sp, "all", sp)
    return stack(NewLayout, SetLayout, SwitchSpace, RightView, Zoom)
ViewPort(View, LayerVector, VPName) :=
    NewLayout ← concat("layout", sp, "n", sp, VPName)
    SetLayout ← concat("layout", sp, "s", sp, VPName)
    SwitchSpace ← ".ms"
    FreezeLayers ← FreezeVPMultiple(LayerVector)
    ViewType ← View
    Zoom ← concat("z", sp, "o", sp, "all", sp)
    return stack(NewLayout, SetLayout, SwitchSpace, FreezeLayers, ViewType, Zoom)
TopViewEntrance := ViewPort(viewtop1, ["Floc*"; "Coag*"; "Sed*"; "Fi*"; "Op*"], "TopViewEntranceTank")
RightViewEntrance := ViewPort(viewrightside1, ["Floc*"; "Coag*"; "Sed*"; "Fi*"; "Op*"], "RightViewEntranceTank")
LeftViewEntrance := ViewPort(viewleftside, ["Floc*"; "Coag*"; "Sed*"; "Fi*"; "Op*"], "LeftViewEntranceTank")
FrontViewEntrance := ViewPort(viewfront1, ["Floc*"; "Coag*"; "Sed*"; "Fi*"; "Op*"], "FrontViewEntranceTank")
TopViewFloc := ViewPort(viewtop1, ["Et*"; "Coag*"; "Sed*"; "Fi*"; "Op*"], "TopViewFlocTank")
RightViewFloc := ViewPort(viewrightside1, ["Et*"; "Coag*"; "Sed*"; "Fi*"; "Op*"], "RightViewFlocTank")
LeftViewFloc := ViewPort(viewleftside, ["Et*"; "Coag*"; "Sed*"; "Fi*"; "Op*"], "LeftViewFlocTank")
.
FrontViewFloc := ViewPort(viewfront1, ["Et*"; "Coag*"; "Sed*"; "Fi*"; "Op*"], "FrontViewFlocTank")
TopViewSed := ViewPort(viewtop1, ["Et*"; "Coag*"; "Floc*"; "Fi*"; "Op*"], "TopViewSedTank")
RightViewSed := ViewPort(viewrightside1, ["Et*"; "Coag*"; "Floc*"; "Fi*"; "Op*"], "RightViewSedTank")
LeftViewSed := ViewPort(viewleftside, ["Et*"; "Coag*"; "Floc*"; "Fi*"; "Op*"], "LeftViewSedTank")
FrontViewSed := ViewPort(viewfront1, ["Et*"; "Coag*"; "Floc*"; "Fi*"; "Op*"], "FrontViewSedTank")
TopViewFilt := ViewPort(viewtop1, ["Et*"; "Coag*"; "Floc*"; "Sed*"; "Op*"], "TopViewFilter")
RightViewFilt := ViewPort(viewrightside1, ["Et*"; "Coag*"; "Floc*"; "Sed*"; "Op*"], "RightViewFilter")
LeftViewFilt := ViewPort(viewleftside, ["Et*"; "Coag*"; "Floc*"; "Sed*"; "Op*"], "LeftViewFilter")
FrontViewFilt := ViewPort(viewfront1, ["Et*"; "Coag*"; "Floc*"; "Sed*"; "Op*"], "FrontViewFilter")
TopViewSedOp :=
    NewLayout ← concat("layout", sp, "n", sp, "TopViewSedOp")
    SetLayout ← concat("layout", sp, "s", sp, "TopViewSedOp")
    SwitchSpace ← ".ms"
    FreezeText ← FreezeVPLayer("text")
    FreezeLayers ← FreezeVPMultiple(["Et*"; "Coag*"; "Sed*"])
    FreezeChimneyStops ← ThawVPLayer("chimney stops")
    TopView ← viewtop1
    Zoom ← concat("z", sp, "o", sp, "all", sp)
    return stack(NewLayout, SetLayout, SwitchSpace, FreezeText, FreezeLayers, FreezeChimneyStops, TopView, Zoom)
FrontViewSedOp :=
    NewLayout ← concat("layout", sp, "n", sp, "FrontViewSedOp")
    SetLayout ← concat("layout", sp, "s", sp, "FrontViewSedOp")
    SwitchSpace ← ".ms"
    FreezeText ← FreezeVPLayer("text")
    FreezeLayers ← FreezeVPMultiple(["Et*"; "Coag*"; "Sed*"])
    FreezeChimneyStops ← ThawVPLayer("chimney stops")
    FrontView ← viewfront1
    Zoom ← concat("z", sp, "o", sp, "all", sp)
    return stack(NewLayout, SetLayout, SwitchSpace, FreezeText, FreezeLayers, FreezeChimneyStops, FrontView, Zoom)
RightViewSedOp :=
    NewLayout ← concat("layout", sp, "n", sp, "RightViewSedOp")
    SetLayout ← concat("layout", sp, "s", sp, "RightViewSedOp")
    SwitchSpace ← ".ms"
    FreezeText ← FreezeVPLayer("text")
    FreezeLayers ← FreezeVPMultiple(["Et*"; "Coag*"; "Sed*"])
    FreezeChimneyStops ← ThawVPLayer("chimney stops")
    RightView ← viewrightside1
    Zoom ← concat("z", sp, "o", sp, "all", sp)
    return stack(NewLayout, SetLayout, SwitchSpace, FreezeText, FreezeLayers, FreezeChimneyStops, RightView, Zoom)
LeftViewSedOp :=
    NewLayout ← concat("layout", sp, "n", sp, "LeftViewSedOp")
    SetLayout ← concat("layout", sp, "s", sp, "LeftViewSedOp")
    SwitchSpace ← ".ms"
    FreezeText ← FreezeVPLayer("text")
    FreezeLayers ← FreezeVPMultiple(["Et*"; "Coag*"; "Sed*"])
    FreezeChimneyStops ← FreezeVPLayer("chimney stops")
    LeftView ← viewleftside
    Zoom ← concat("z", sp, "o", sp, "all", sp)
    return stack(NewLayout, SetLayout, SwitchSpace, FreezeText, FreezeLayers, FreezeChimneyStops, LeftView, Zoom)
TopViewSedRefill :=
    NewLayout ← concat("layout", sp, "n", sp, "TopViewSedRefill")
    SetLayout ← concat("layout", sp, "s", sp, "TopViewSedRefill")
    SwitchSpace ← ".ms"
    FreezeText ← FreezeVPLayer("text")
    FreezeEntrance ← FreezeVPMultiple(EntranceTankLayers)
    FreezeTanks ← FreezeVPLayer("alumtanks")
    FreezeFloc ← FreezeVPMultiple(FlocTankLayers)
    FreezeChimneyStops ← FreezeVPLayer("chimney stops")
    TopView ← viewtop1
    Zoom ← concat("z", sp, "o", sp, "all", sp)
    return stack(NewLayout, SetLayout, SwitchSpace, FreezeText, FreezeEntrance, FreezeTanks, FreezeFloc, FreezeChimneyStops, TopView, Zoom)
RightViewSedRefill :=
    NewLayout ← concat("layout", sp, "n", sp, "RightViewSedRefill")
    SetLayout ← concat("layout", sp, "s", sp, "RightViewSedRefill")
    SwitchSpace ← ".ms"
    FreezeText ← FreezeVPLayer("text")
    FreezeEntrance ← FreezeVPMultiple(EntranceTankLayers)
    FreezeTanks ← FreezeVPLayer("alumtanks")
    FreezeFloc ← FreezeVPMultiple(FlocTankLayers)
    FreezeChimneyStops ← FreezeVPLayer("chimney stops")
    RightView ← viewrightside1
    Zoom ← concat("z", sp, "o", sp, "all", sp)
    return stack(NewLayout, SetLayout, SwitchSpace, FreezeText, FreezeEntrance, FreezeTanks, FreezeFloc, FreezeChimneyStops, RightView, Zoom)
LeftViewSedRefill :=
    NewLayout ← concat("layout", sp, "n", sp, "LeftViewSedRefill")
    SetLayout ← concat("layout", sp, "s", sp, "LeftViewSedRefill")
    SwitchSpace ← ".ms"
    FreezeText ← FreezeVPLayer("text")
    FreezeEntrance ← FreezeVPMultiple(EntranceTankLayers)
    FreezeTanks ← FreezeVPLayer("alumtanks")
    FreezeFloc ← FreezeVPMultiple(FlocTankLayers)
    FreezeChimneyStops ← FreezeVPLayer("chimney stops")
    LeftView ← viewleftside
    Zoom ← concat("z", sp, "o", sp, "all", sp)
    return stack(NewLayout, SetLayout, SwitchSpace, FreezeText, FreezeEntrance, FreezeTanks, FreezeFloc, FreezeChimneyStops, LeftView, Zoom)
FrontViewSedRefill :=
    NewLayout ← concat("layout", sp, "n", sp, "FrontViewSedRefill")
    SetLayout ← concat("layout", sp, "s", sp, "FrontViewSedRefill")
    SwitchSpace ← ".ms"
    FreezeText ← FreezeVPLayer("text")
    FreezeEntrance ← FreezeVPMultiple(EntranceTankLayers)
    FreezeTanks ← FreezeVPLayer("alumtanks")
    FreezeFloc ← FreezeVPMultiple(FlocTankLayers)
    FreezeChimneyStops ← FreezeVPLayer("chimney stops")
    FrontView ← viewfront1
    Zoom ← concat("z", sp, "o", sp, "all", sp)
    return stack(NewLayout, SetLayout, SwitchSpace, FreezeText, FreezeEntrance, FreezeTanks, FreezeFloc, FreezeChimneyStops, FrontView, Zoom)
TopViewSedDrain :=
    NewLayout ← concat("layout", sp, "n", sp, "TopViewSedDrain")
    SetLayout ← concat("layout", sp, "s", sp, "TopViewSedDrain")
    SwitchSpace ← ".ms"
    FreezeText ← FreezeVPLayer("text")
    FreezeEntrance ← FreezeVPMultiple(EntranceTankLayers)
    FreezeTanks ← FreezeVPLayer("alumtanks")
    FreezeFloc ← FreezeVPMultiple(FlocTankLayers)
    TopView ← viewtop1
    Zoom ← concat("z", sp, "o", sp, "all", sp)
    return stack(NewLayout, SetLayout, SwitchSpace, FreezeText, FreezeEntrance, FreezeTanks, FreezeFloc, TopView, Zoom)
FrontViewSedDrain :=
    NewLayout ← concat("layout", sp, "n", sp, "FrontViewSedDrain")
    SetLayout ← concat("layout", sp, "s", sp, "FrontViewSedDrain")
    SwitchSpace ← ".ms"
    FreezeText ← FreezeVPLayer("text")
    FreezeEntrance ← FreezeVPMultiple(EntranceTankLayers)
    FreezeTanks ← FreezeVPLayer("alumtanks")
    FreezeFloc ← FreezeVPMultiple(FlocTankLayers)
    FrontView ← viewfront1
    Zoom ← concat("z", sp, "o", sp, "all", sp)
    return stack(NewLayout, SetLayout, SwitchSpace, FreezeText, FreezeEntrance, FreezeTanks, FreezeFloc, FrontView, Zoom)
RightViewSedDrain :=
    NewLayout ← concat("layout", sp, "n", sp, "RightViewSedDrain")
    SetLayout ← concat("layout", sp, "s", sp, "RightViewSedDrain")
    SwitchSpace ← ".ms"
    FreezeText ← FreezeVPLayer("text")
    FreezeEntrance ← FreezeVPMultiple(EntranceTankLayers)
    FreezeTanks ← FreezeVPLayer("alumtanks")
    FreezeFloc ← FreezeVPMultiple(FlocTankLayers)
    RightView ← viewrightside1
    Zoom ← concat("z", sp, "o", sp, "all", sp)
    return stack(NewLayout, SetLayout, SwitchSpace, FreezeText, FreezeEntrance, FreezeTanks, FreezeFloc, RightView, Zoom)
LeftViewSedDrain :=
    NewLayout ← concat("layout", sp, "n", sp, "LeftViewSedDrain")
    SetLayout ← concat("layout", sp, "s", sp, "LeftViewSedDrain")
    SwitchSpace ← ".ms"
    FreezeText ← FreezeVPLayer("text")
    FreezeEntrance ← FreezeVPMultiple(EntranceTankLayers)
    FreezeTanks ← FreezeVPLayer("alumtanks")
    FreezeFloc ← FreezeVPMultiple(FlocTankLayers)
    LeftView ← viewleftside
    Zoom ← concat("z", sp, "o", sp, "all", sp)
    return stack(NewLayout, SetLayout, SwitchSpace, FreezeText, FreezeEntrance, FreezeTanks, FreezeFloc, LeftView, Zoom)
TopViewPlateSettlerModule :=
    NewLayout ← concat("layout", sp, "n", sp, "TopViewPlateSettlerModule")
    SetLayout ← concat("layout", sp, "s", sp, "TopViewPlateSettlerModule")
    SwitchSpace ← ".ms"
    FreezeText ← FreezeVPLayer("text")
    FreezeEntrance ← FreezeVPMultiple(EntranceTankLayers)
    FreezeTanks ← FreezeVPLayer("alumtanks")
    FreezeFloc ← FreezeVPMultiple(FlocTankLayers)
    FreezeSed ← FreezeVPMultiple(SedWithoutPSModules)
    TopView ← viewtop1
    Zoom ← concat("z", sp, "o", sp, "all", sp)
    return stack(NewLayout, SetLayout, SwitchSpace, FreezeText, FreezeEntrance, FreezeTanks, FreezeFloc, FreezeSed, TopView, Zoom)
FrontViewPlateSettlerModule :=
    NewLayout ← concat("layout", sp, "n", sp, "FrontViewPlateSettlerModule")
    SetLayout ← concat("layout", sp, "s", sp, "FrontViewPlateSettlerModule")
    SwitchSpace ← ".ms"
    FreezeText ← FreezeVPLayer("text")
    FreezeEntrance ← FreezeVPMultiple(EntranceTankLayers)
    FreezeTanks ← FreezeVPLayer("alumtanks")
    FreezeFloc ← FreezeVPMultiple(FlocTankLayers)
    FreezeSed ← FreezeVPMultiple(SedWithoutPSModules)
    FrontView ← viewfront1
    Zoom ← concat("z", sp, "o", sp, "all", sp)
    return stack(NewLayout, SetLayout, SwitchSpace, FreezeText, FreezeEntrance, FreezeTanks, FreezeFloc, FreezeSed, FrontView, Zoom)
LeftViewPlateSettlerModule :=
    NewLayout ← concat("layout", sp, "n", sp, "LeftViewPlateSettlerModule")
    SetLayout ← concat("layout", sp, "s", sp, "LeftViewPlateSettlerModule")
    SwitchSpace ← ".ms"
    FreezeText ← FreezeVPLayer("text")
    FreezeEntrance ← FreezeVPMultiple(EntranceTankLayers)
    FreezeTanks ← FreezeVPLayer("alumtanks")
    FreezeFloc ← FreezeVPMultiple(FlocTankLayers)
    FreezeSed ← FreezeVPMultiple(SedWithoutPSModules)
    LeftView ← viewleftside
    Zoom ← concat("z", sp, "o", sp, "all", sp)
    return stack(NewLayout, SetLayout, SwitchSpace, FreezeText, FreezeEntrance, FreezeTanks, FreezeFloc, FreezeSed, LeftView, Zoom)
RightViewPlateSettlerModule :=
    NewLayout ← concat("layout", sp, "n", sp, "LeftViewPlateSettlerModule")
    SetLayout ← concat("layout", sp, "s", sp, "LeftViewPlateSettlerModule")
    SwitchSpace ← ".ms"
    FreezeText ← FreezeVPLayer("text")
    FreezeEntrance ← FreezeVPMultiple(EntranceTankLayers)
    FreezeTanks ← FreezeVPLayer("alumtanks")
    FreezeFloc ← FreezeVPMultiple(FlocTankLayers)
    FreezeSed ← FreezeVPMultiple(SedWithoutPSModules)
    RightView ← viewrightside1
    Zoom ← concat("z", sp, "o", sp, "all", sp)
    return stack(NewLayout, SetLayout, SwitchSpace, FreezeText, FreezeEntrance, FreezeTanks, FreezeFloc, FreezeSed, RightView, Zoom)
DimensionScript :=
    SedTopDimLayer ← layer_new("SedTopDimension", purple)
    AddDim1 ← LinearDim(Plant_Origin, W_Sed, L_Sed + W_Sed, "v")
    AddDim2 ← LinearDim(Plant_Origin, -L_Sed, echannelbox_dim[1] + .5 m, "h")
    AddDim3 ← LinearDim(echannel_origin, echannelbox_dim[1], -W_Sed, "v")
    AddDim4 ← LinearDim(echannel_origin, -echannelbox_dim[0], -W_Sed, "h")
    AddDim5 ← LinearDim(channel_origin, -channelbox_dim[0], -W_Sed, "h")
    SedTopDim ← concat(AddDim1, AddDim2, AddDim3, AddDim4, AddDim5)
    SedSideDimLayer ← layer_new("SedSideDimension", purple)
    SedFrontDimLayer ← layer_new("SedFrontDimension", purple)
    return concat(SedTopDimLayer, SedTopDim, SedSideDimLayer, SedFrontDimLayer)
AC_Layout := stack("laythw", TopView, FrontView, RightView, TopViewEntrance, TopViewFloc, TopViewSed, TopViewFilt, concat("layout", sp, "s", sp, "model", sp), concat("-view", sp, "_SEISO", sp))
# [component: inputs AC_Layout]
