# [reference: MasterProgram.xmcd]
# [reference: Stacked Rapid Samd Filtration jcw57.xmcd]
echanneltank_origin = [0; -0.57432; 1.38183] m
N_Fi := 2
newechannel_origin := [echannel_origin[0]; -W_ExitChannel/2; echannel_origin[2]]
# Arbitrary design variables.
# for box spacing and heights
FilterInletTank_origin := [echanneltank_origin[0]; echanneltank_origin[1]; echanneltank_origin[2]] = [0; -0.57432; 1.38183] m
BoxDist := 2 m
# horizontal distance from inlet box to filter
Headloss := 10 cm  # difference in depth between inlet and outlet box
FilterInletBox_origin := [echannelbox_origin[0] - T_PlantWall; echannelbox_origin[1] - W_ExitChannel; echannelbox_origin[2]] = [-0.523167; -0.523167; 1.38183] m
echanneltank_dim = [0.373167; 0.42432; 0.355898] m
filterinletbox_dim := [T_PlantWall; W_ExitChannel; H_ExitChannel] = [0.15; 0.373167; 0.355898] m
Filterinletchannelscript :=
    layer2 ← layer_new("Filter Inlet Channel", ltgrey)
    channel1 ← ChannelDrawing([FilterInletTank_origin[0] - W_ExitChannel; 0; FilterInletTank_origin[2]], [((N_Fi*2*T_PlantWall) + ((N_Fi + 1)*W_ExitChannel)) + 2*T_PlantWall; W_ExitChannel; H_ExitChannel], T_ChannelWall)
    rotate1 ← rotate([FilterInletTank_origin[0] - W_ExitChannel; 0; FilterInletTank_origin[2]], 270)
    bigunion ← union_allA
    layerset ← layer_set("0")
    layerfreeze2 ← layer_freeze("Filter Inlet Channel")
    one ← stack(layer2, channel1, rotate1, bigunion, layerset, layerfreeze2)
    return ← one
sedechanneltankscript :=
    layernewect ← layer_new("echanneltank", ltgrey)
    tankect ← Tank([
        echanneltank_origin[0];
        echanneltank_origin[1] - (N_Fi*W_ExitChannel) - (N_Fi*2*T_PlantWall);
        echanneltank_origin[2]
    ], [echanneltank_dim[0]; W_ExitChannel; echanneltank_dim[2]], T_PlantWall)
    layerset ← layer_set("0")
    layerfreezeect ← layer_freeze("echanneltank")
    one ← stack(layernewect, tankect, layerset, layerfreezeect)
    return one
# ***Drawn for reference***
Filterexitchannelscript :=
    layer2 ← layer_new("SRSF outlet box", ltgrey)
    channel1 ← ChannelDrawing([
        FilterInletTank_origin[0] - (S_Walkway + 4*W_ExitChannel + 6*T_PlantWall);
        0;
        FilterInletTank_origin[2]
    ], [((N_Fi*2*T_PlantWall) + ((N_Fi + 1)*W_ExitChannel)) + 2*T_PlantWall; W_ExitChannel; H_ExitChannel], T_ChannelWall)
    rotate1 ← rotate([
        FilterInletTank_origin[0] - (S_Walkway + 4*W_ExitChannel + 6*T_PlantWall);
        0;
        FilterInletTank_origin[2]
    ], 270)
    bigunion ← union_allA
    layerset ← layer_set("0")
    layerfreeze2 ← layer_freeze("echannel2")
    one ← stack(layer2, channel1, rotate1, bigunion, layerset, layerfreeze2)
    return ← one
Fiexitboxscript :=
    layernewfob ← layer_new("SRSF exit boxes", ltgrey)
    tankbw ← Tank([
        FilterInletTank_origin[0] - 2*W_ExitChannel - 4*T_PlantWall;
        FilterInletTank_origin[1];
        Z_FiExitBottom
    ], [echanneltank_dim[0]; W_ExitChannel; H_FiExit], T_PlantWall)
    tankbw2 ← Tank([
        FilterInletTank_origin[0] - 2*W_ExitChannel - 4*T_PlantWall;
        FilterInletTank_origin[1] - 2*W_ExitChannel - 4*T_PlantWall;
        Z_FiExitBottom
    ], [echanneltank_dim[0]; W_ExitChannel; H_FiExit], T_PlantWall)
    layerset ← layer_set("0")
    layerfreezefob ← layer_freeze("SRSF backwash channel")
    one ← stack(layernewfob, tankbw, tankbw2, layerset, layerfreezefob)
    return one
FilterInletTank_origin[1] + W_ExitChannel + T_PlantWall = -0.0511528 m
Z_FiExitBottom = 0.648769 m
H_FiEntrance = 1.33317 m
Z_FiEntranceBottom = 0.192919 m
Fiinletboxscript :=
    layernewfilt ← layer_new("SRSF inlet boxes", ltgrey)
    tankfilt ← Tank([
        FilterInletTank_origin[0] - W_ExitChannel - 2*T_PlantWall;
        FilterInletTank_origin[1];
        Z_FiEntranceBottom
    ], [echanneltank_dim[0]; W_ExitChannel; H_FiEntrance], T_PlantWall)
    tankfilt2 ← Tank([
        FilterInletTank_origin[0] - W_ExitChannel - 2*T_PlantWall;
        FilterInletTank_origin[1] - 2*W_ExitChannel - 4*T_PlantWall;
        Z_FiEntranceBottom
    ], [echanneltank_dim[0]; W_ExitChannel; H_FiEntrance], T_PlantWall)
    layerset ← layer_set("0")
    layerfreezefilt ← layer_freeze("SRSF")
    one ← stack(layernewfilt, tankfilt, tankfilt2, layerset, layerfreezefilt)
    return one
H_FiExit = 0.25 m
echanneltank_dim[2] = 0.355898 m
Fibackwash :=
    layernewfibw ← layer_new("SRSF backwash", ltgrey)
    tankfibw ← Tank([
        FilterInletTank_origin[0] - 3*W_ExitChannel - 6*T_PlantWall;
        FilterInletTank_origin[1] - W_ExitChannel - 2*T_PlantWall;
        0
    ], [echanneltank_dim[0]; W_ExitChannel; echanneltank_dim[2]], T_PlantWall)
    channel1 ← ChannelDrawing([
        FilterInletTank_origin[0] - 2*W_ExitChannel - 4*T_PlantWall;
        FilterInletTank_origin[1] - W_ExitChannel - 2*T_PlantWall;
        0
    ], [((N_Fi*2*T_PlantWall) + ((N_Fi + 1)*W_ExitChannel)) + 2*T_PlantWall; W_ExitChannel; H_ExitChannel], T_ChannelWall)
    rotate1 ← rotate([FilterInletTank_origin[0] - W_ExitChannel; 0; 0], 180)
    layerset ← layer_set("0")
    layerfreezefibw ← layer_freeze("SRSF backwash")
    one ← stack(layernewfibw, tankfibw, channel1, rotate1, layerset, layerfreezefibw)
    return one
AC_Filter := stack(Filterinletchannelscript, sedechanneltankscript, Filterexitchannelscript, Fiexitboxscript, Fiinletboxscript, Fibackwash)
# [component: inputs AC_Filter]
