# [reference: MasterProgram.xmcd]
SedLaunderscript :=
    o
    array1 ← arrayB([
        SedLaunder_origin[1] + outerradius(ND_SedLaunder) + zc;
        SedLaunder_origin[2] + L_SedActive - B_SedLaunderOrifices/2;
        SedLaunder_origin[0]
    ], N_SedLaunderOrificesRow, 1, -B_SedLaunderOrifices)
    subtract2 ← subtractH([SedLaunder_origin[0]; SedLaunder_origin[1] - outerradius(ND_SedLaunder)], [
        SedLaunder_origin[0] + D_SedLaunderOrifice + zc;
        SedLaunder_origin[1] + outerradius(ND_SedLaunder) + 2*zc
    ], [SedLaunder_origin[0] - D_SedLaunderOrifice - zc; SedLaunder_origin[1] - zc])
    cylinder4 ← cylinderD([
        SedLaunder_origin[0];
        SedLaunder_origin[1];
        SedLaunder_origin[2] + L_SedActive - B_SedLaunderOrifices/2
    ], D_SedLaunderOrifice/2, [
        SedLaunder_origin[0] + (outerradius(ND_SedLaunder)*cos(π/6)) + outerradius(ND_SedLaunder);
        SedLaunder_origin[1] + (outerradius(ND_SedLaunder)*sin(π/6)) + outerradius(ND_SedLaunder);
        SedLaunder_origin[2] + L_SedActive - B_SedLaunderOrifices/2
    ])
    array2 ← arrayB([
        SedLaunder_origin[1] + (outerradius(ND_SedLaunder)*sin(π/6)) + outerradius(ND_SedLaunder);
        SedLaunder_origin[2] + L_SedActive - B_SedLaunderOrifices/2
    ], N_SedLaunderOrificesRow, 1, -B_SedLaunderOrifices)
    holecylinder ← cylinderD(SedLaunder_origin, ND_SedLaunder, [SedLaunder_origin[0]; SedLaunder_origin[1]; SedLaunder_origin[2] + L_SedLaunder])
    subtract3 ← subtractH([SedLaunder_origin[0]; SedLaunder_origin[1] - outerradius(ND_SedLaunder)], [
        SedLaunder_origin[0] + (outerradius(ND_SedLaunder)*cos(π/3)) + 2*zc;
        SedLaunder_origin[0] + (outerradius(ND_SedLaunder)*sin(π/3)) + 2*zc
    ], [SedLaunder_origin[0]; SedLaunder_origin[1]])
    rotate1 ← rotate18 ← rotate_3d([
        SedLaunder_origin[0] + innerD(ND_SedLaunder, EN_PipeSpec)/2;
        SedLaunder_origin[1];
        SedLaunder_origin[2]
    ], SedLaunder_origin, "y", 90)
    rotate2 ← rotate_3d([
        SedLaunder_origin[0];
        SedLaunder_origin[1] + innerD(ND_SedLaunder, EN_PipeSpec)/2;
        SedLaunder_origin[2]
    ], SedLaunder_origin, "x", 120)
    layerset1 ← layer_set("0")
    view2 ← viewrightside1
    layerfreeze1 ← layer_freeze("launder")
    layercoupling ← layer_new("launder coupling", grey)
    coupling ← couplingIDsocket([SedLaunder_origin[1]; Plant_Origin[1] + Z_SedLaunder; Plant_Origin[2] - W_ExitChannel], outerdiameter(ND_SedLaunder), T_ChannelWall, EN_PipeSpec)
    view2 ← viewrightside1
    layerset1 ← layer_set("0")
    layerfreezecoupl ← layer_freeze("launder coupling")
    layernewcouplcap ← layer_new("laundercouplingcap", red)
    solidcap ← laundercouplingcap([
        SedLaunder_origin[1];
        Plant_Origin[1] + Z_SedLaunder;
        Plant_Origin[2] - W_ExitChannel - SocketDepth(ND_SedLaunder)
    ], ND_SedLaunder, EN_PipeSpec)
    layerset1 ← layer_set("0")
    layerfcouplcap ← layer_freeze("laundercouplingcap")
    layernewocap ← layer_new("launderorificecap", green)
    view3 ← viewleftside
    orificecap ← launderorificecap([
        (Plant_Origin[1] - W_Sed/(N_SedLaunders*N_SedBays*2));
        Plant_Origin[1] + Z_SedLaunder;
        Plant_Origin[2] + W_ExitChannel + T_PlantWall - SocketDepth(ND_SedLaunder)
    ], ND_SedLaunder, D_CapOrifice, EN_PipeSpec)
    layerset1 ← layer_set("0")
    layerfocap ← layer_freeze("launderorificecap")
    layerlaundercap ← layer_new("launder cap", yellow)
    laundercap ← cap([
        Plant_Origin[1] - W_Sed/(N_SedLaunders*N_SedBays*2);
        Plant_Origin[1] + Z_SedLaunder;
        ((Plant_Origin[2] + W_ExitChannel) + T_ChannelWall) + (L_SedLaunder - CapHeight(ND_SedLaunder)) - SocketDepth(ND_SedLaunder) + CapDiameter(NominalPipeSize(ND_SedLaunder))/2 - outerradius(NominalPipeSize(ND_SedLaunder))
    ], ND_SedLaunder, EN_PipeSpec)
    layerthawcoupling ← layer_thaw("launder coupling")
    layerthawlaunder ← layer_thaw("launder")
    layertocap ← layer_thaw("launderorificecap")
    layertcouplcap ← layer_thaw("laundercouplingcap")
    view2 ← viewrightside1
    arraywithinbay ← array_all(1, N_SedLaunders*N_SedBays, (2*SedLaunder_origin)[1])
    arraybay4 ← concat("-array", sp, "ALL", sp, sp, "r", sp, stringit_nounits(N_SedBays), sp, "1", sp, stringit(W_SedBay))
    arraybay2 ← concat("-array", sp, "ALL", sp, sp, "r", sp, stringit_nounits(N_SedBays), sp, "1", sp, stringit(W_SedBay))
    layerset1 ← layer_set("0")
    layerfreeze1 ← layer_freeze("launder")
    layerfreezecoupl ← layer_freeze("launder coupling")
    layerfreezecap ← layer_freeze("launder cap")
    layerfocap ← layer_freeze("launderorificecap")
    layerfcouplecap ← layer_freeze("laundercouplingcap")
    one ← stack(layernew1, viewtop1, zoom_win, pipe1, cylinder3, viewrightside1, array1, viewtop1, subtract2, viewtop1, zoom_win, cylinder4, viewrightside1, array2, viewtop1, subtract3, rotate1, rotate2, layerset1, view2, layerfreeze1, layercoupling, coupling, view2, layerset1, layerfreezecoupl, layernewcouplcap, solidcap, layerset1, layerfcouplcap, layernewocap, view3, orificecap, layerset1, layerfocap, layerlaundercap, view3, laundercap, layerthawcoupling, layerthawlaunder, layertocap, layertcouplcap, view2, arraywithinbay, layerset1, layerfreeze1, layerfreezecoupl, layerfreezecap, layerfocap, layerfcouplcap) if (N_SedTanks > 1 and N_SedBays > 1)
    one ← stack(layernew1, viewtop1, zoom_win, pipe1, cylinder3, viewrightside1, array1, viewtop1, subtract2, viewtop1, zoom_win, cylinder4, viewrightside1, array2, viewtop1, subtract3, rotate1, rotate2, layerset1, view2, layerfreeze1, layercoupling, coupling, view2, layerset1, layerfreezecoupl, layernewcouplcap, solidcap, layerset1, layerfcouplcap, layernewocap, view3, orificecap, layerset1, layerfocap, layerlaundercap, view3, laundercap, layerthawcoupling, layerthawlaunder, layertocap, layertcouplcap, view2, arraywithinbay, layerset1, layerfreeze1, layerfreezecoupl, layerfreezecap, layerfocap, layerfcouplcap) if N_SedBays == 1
    one ← stack(layernew1, viewtop1, zoom_win, pipe1, cylinder3, viewrightside1, array1, viewtop1, subtract2, viewtop1, zoom_win, cylinder4, viewrightside1, array2, viewtop1, subtract3, rotate1, rotate2, layerset1, layerfreeze1, view2, layerfreeze1, layercoupling, coupling, view2, layerset1, layerfreezecoupl, layernewcouplcap, solidcap, layerset1, layerfcouplcap, layernewocap, view3, orificecap, layerset1, layerfocap, layerlaundercap, view3, laundercap, layerthawcoupling, layerthawlaunder, layertocap, layertcouplcap, layerset1, layerfreeze1, layerfreezecoupl, layerfreezecap, layerfocap, layerfcouplcap) otherwise
    return one  # error: This variable is undefined.
# [component: inputs SedLaunderscript]
T_LaunderCap := outerradius(ND_SedLaunder) - innerdiameter(ND_SedLaunder, EN_PipeSpec)/2
L_SedLaunder :=
    (L_Sed - W_InletChannel - W_ExitChannel - T_ChannelWall - CouplingLength(ND_SedLaunder) - CouplingLengthFlex(ND_SedLaunder) + SocketDepthFlex(ND_SedLaunder)) - T_LaunderCap if CouplingLength(ND_SedLaunder) ≥ T_ChannelWall
    (L_Sed - W_InletChannel - W_ExitChannel - 2*T_ChannelWall - CouplingLengthFlex(ND_SedLaunder) + SocketDepthFlex(ND_SedLaunder)) - T_LaunderCap otherwise
RigidCouplingNew_origin := [
    Plant_Origin[0] + T_PlantWall;
    Plant_Origin[1] + W_Sed/(N_SedLaunders*N_SedBays*2);
    Plant_Origin[2] + HW_Sed - H_SedAbove + outerradius(ND_SedLaunder)
]
FlexCouplingNew_origin := [
    {
        Plant_Origin[0] + T_PlantWall - CouplingLength(ND_SedLaunder) if CouplingLength(ND_SedLaunder) ≥ T_PlantWall
        Plant_Origin[0] otherwise
    };
    Plant_Origin[1] + W_Sed/(N_SedLaunders*N_SedBays*2);
    Plant_Origin[2] + HW_Sed - H_SedAbove + outerradius(ND_SedLaunder)
]
SedLaunderNippleNew_origin := RigidCouplingNew_origin - CouplingLength(ND_SedLaunder) + SocketDepth(ND_SedLaunder)
SedLaunderNew_origin := FlexCouplingNew_origin - SocketDepthFlex(ND_SedLaunder)
LaunderCapNew_origin := SedLaunderNew_origin - L_SedLaunder
LengthSedLaunderNipple :=
    (SocketDepth(ND_SedLaunder) + SocketDepthFlex(ND_SedLaunder)) if CouplingLength(ND_SedLaunder) ≥ T_PlantWall
    (SocketDepth(ND_SedLaunder) + SocketDepthFlex(ND_SedLaunder) + (T_PlantWall - CouplingLength(ND_SedLaunder))) otherwise
T_RigidCoupling := outerradius(ND_SedLaunder) - innerdiameter(ND_SedLaunder, ND_PipeSpec)/2  # error: This variable is undefined.
SedLaunderscriptNEW :=
    LayerNew1 ← layer_new("launder", blue)
    LaunderPipe ← PipeF(SedLaunderNew_origin, L_SedLaunder, [0 deg; 0 deg], ND_SedLaunder, EN_PipeSpec)
    FreezeLaunder ← FreezeLayer("launder")
    Orifice ← cylinderD([
        SedLaunderNew_origin[0];
        SedLaunderNew_origin[1];
        SedLaunderNew_origin[2] + L_SedActive - B_SedLaunderOrifices/2
    ], D_SedLaunderOrifice/2, [
        SedLaunderNew_origin[0];
        SedLaunderNew_origin[1] + outerradius(ND_SedLaunder) + zc;
        SedLaunderNew_origin[2] + L_SedActive - B_SedLaunderOrifices/2
    ])
    ViewRightside ← viewrightside1
    OrificeArray ← arrayB([
        SedLaunderNew_origin[1] + outerradius(ND_SedLaunder) + zc;
        SedLaunderNew_origin[2] + L_SedActive - B_SedLaunderOrifices/2;
        SedLaunderNew_origin[0]
    ], N_SedLaunderOrificesRow, 1, -B_SedLaunderOrifices)
    ThawLaunder ← SelectLayer("launder")
    FreezeLaunderAgain ← FreezeLayer("launder")
    SubtractOrifice ← subtractH([SedLaunderNew_origin[0]; SedLaunderNew_origin[1] - outerradius(ND_SedLaunder)], [
        SedLaunderNew_origin[0] + D_SedLaunderOrifice + zc;
        SedLaunderNew_origin[1] + outerradius(ND_SedLaunder) + 2*zc
    ], [SedLaunderNew_origin[0] - D_SedLaunderOrifice - zc; SedLaunderNew_origin[1] - zc])
    LayerNew2 ← layer_new("PVCCoupling", red)
    PVCCoupling ← CouplingSUBF(RigidCouplingNew_origin, [0 deg; 0 deg], ND_SedLaunder, EN_PipeSpec, ["tank"])
    FreezePVCCoupling ← FreezeLayer("PVCCoupling")
    LayerNew3 ← layer_new("SedLaunderNipple", blue)
    SedLaunderNipple ← PipeF(SedLaunderNippleNew_origin, LengthSedLaunderNipple, [0 deg; 0 deg], ND_SedLaunder, EN_PipeSpec) if CouplingLength(ND_SedLaunder) ≥ T_PlantWall
    SedLaunderNipple ← PipeF(SedLaunderNippleNew_origin, LengthSedLaunderNipple, [0 deg; 0 deg], ND_SedLaunder, EN_PipeSpec, ["tank"]) otherwise
    FreezeSedLaunderNipple ← FreezeLayer("SedLaunderNipple")
    LayerNew4 ← layer_new("FlexCoupling", ltpurple)
    FlexCoupling ← FlexCouplingF(FlexCouplingNew_origin, [0 deg; 0 deg], ND_SedLaunder)
    FreezeSedLaunderNipple ← FreezeLayer("FlexCoupling")
    LayerNew5 ← layer_new("LaunderCap", yellow)
    LaunderCap ← CapF(LaunderCapNew_origin, [0 deg; 180 deg], ND_SedLaunder)
    FreezeLaunderCap ← FreezeLayer("LaunderCap")
    StackEverything ← stack(□)
    return StackEverything  # error: This placeholder is empty.
PipeSUBF(OriginPoint, Length, AngleVector, ND, EN, SubtractionLayers)
