# Only parameters with units need to be entered in this file. The units must be attached as SI (meters, kg, s)
# Engineer Entered Values:
Q_Plant := Q_Plant*m^3/s
# General Plant Parameters
H_PlantFreeboard := H_PlantFreeboard*m
# sed tank parameters
W_SedBay := W_SedBay*m
# width of lamella = width of sed tank bay
W_SedSlopePlate := W_SedSlopePlate*m
T_SedSlopePlate := T_SedSlopePlate*m
Ti_SludgeDrain := Ti_SludgeDrain*s
EN_PipeSpec := EN_PipeSpec
EN_DrillSeries := EN_DrillSeries  # Drain time for sed tank
N_SedTanks := N_SedTanks
N_SedBaysEst := N_SedBaysEst
W_SedFrameWall := W_SedFrameWall*m
H_SedFrameWall := H_SedFrameWall*m
T_SedManifoldEntrance := T_SedManifoldEntrance*m
B_SedPipe := B_SedPipe*m
T_SedPlate := T_SedPlate*m
T_SedInletSlope := T_SedInletSlope*m
L_SedPlateSheet := L_SedPlateSheet*m
ND_SedPlateFrame := ND_SedPlateFrame*in
# floc parameteres
T_FlocBaffle := T_FlocBaffle*m
S_FlocChannel := S_FlocChannel*m
# Chem Feed Parameters
C_FcmDoseMax := C_FcmDoseMax*kg/m^3
C_FcmAlum := C_FcmAlum*kg/m^3
EN_FcmTube := EN_FcmTube
Ti_StockMin := Ti_StockMin*s
# Values used to Draw Plant:
T_PlantWall := T_PlantWall*m
W_MpWalkway := W_MpWalkway*m
