# BASIC INPUTS
# Overall Plant Inputs
Q_Plant := 10*L/s
T_PlantWall := 15 cm
T_ConcreteMin := 5 cm
EN_PipeSpec := 4
EN_DrillSeries := 1
# Chemical Storage Tanks, Entrance Tank
# and Rapid Mixer Inputs
C_AlumDoseMax := 90*mg/L
C_AlumStock := 120*gm/L
Ti_AlumStock := 30 hr
# Flocculator Inputs
T_FlocBaffle := 4 cm  # Should only be used if baffles are concrete
H_FlocOption := -1  # H.FlocOption = -1 if same as sed; 0 is optimal or a positive number is user specified
# Sedimentation Inputs
N_SedTanks := 2
N_SedBaysEst := 2
W_SedPlate := 1*m
L_SedPlateSheet := 12 ft
T_SedPlate := 2 mm
T_SedWeir := 4 cm
# code fixes to handle poor definition of input variables
W_SedBay := W_SedPlate
W_Plastic := W_SedPlate
C_FcmDoseMax := C_AlumDoseMax
C_FcmAlum := C_AlumStock
Ti_StockMin := Ti_AlumStock
