# [reference: MasterProgram.xmcd]
Q_AlumStockMax := Q_Plant*C_FcmDoseMax/C_FcmAlum = 7.5e-6 m^3/s
Q_AlumStockMax = 7.5e-6 m^3/s
H_AlumTank(Q_AlumStockMax, Kvc, D_FcmValveOrifice, g) := (Q_AlumStockMax/(Kvc*(.5*D_FcmValveOrifice)^2*π))^2/(2*g) + .1 m
V_AlumtTank(Q_FcmAlum, Ti_StockMin) := Ti_StockMin*Q_AlumStockMax
W_AlumTank(V_AlumTank, H_AlumTank) := (V_AlumTank/H_AlumTank)^.5
D_AlumTank(V_AlumTank, H_AlumTank) := 2*(V_AlumTank/H_AlumTank)^.5/π^.5
