# Entrance Tank
H_EtWeirFreefall := 2 cm
T_EtWeir := 6 cm
HL_RMMicroOrifice := 0 m
# Length and Hopper Calculations
L_Et := L_Sed + OuterDiameterFittingPVC(ND_EtFloat) + S_EtFloat - S_Fitting
# The last half of the last hopper must contain the float with its associated free space, the LFOM pipe, and one half of the drain pipe for that hopper (located in the center), plus the required spacing between the pipes. The hoppers are identical and symmetrical lengthwise, so doubling these dimensions gives the minimum length of a single hopper.
L_EtHopperMin := 2*(OuterDiameterFittingPVC(ND_RMPipe) + S_Fitting + OuterDiameterFittingPVC(ND_EtDrain)/2 + OuterDiameterFittingPVC(ND_EtFloat) + S_EtFloat)
T_EtTrashLedge := 4*D_Rebar + T_ConcreteMin
# The maximum number of hoppers in the entrance tank.
N_EtHoppers := max(floor((L_Et - T_EtTrashLedge)/L_EtHopperMin), 3)  # this max function ensures at least 3 hoppers
L_EtHopperFirst :=
    (L_Et - T_EtTrashLedge)/N_EtHoppers if floor((L_Et - T_EtTrashLedge)/L_EtHopperMin) ≥ 3
    (L_Et - T_EtTrashLedge - 0.5*L_EtHopperMin)/(N_EtHoppers - 1/2) otherwise
L_EtHopperLast :=
    L_EtHopperFirst if floor((L_Et - T_EtTrashLedge)/L_EtHopperMin) ≥ 3
    L_EtHopperMin/2 + L_EtHopperFirst/2 otherwise
H_EtHopperFirst := (L_EtHopperFirst/2 - ConRadius(ND_EtDrain) - S_Fitting)*tan(AN_EtSlope) = 0.490551 m
H_EtHopperLastEst := (L_EtHopperMin - ConRadius(ND_EtDrain) - S_Fitting)*tan(AN_EtSlope)
HL_Flowmeasure :=
    HL_Lfom if EN_LinearFlow
    HL_Nlfom otherwise  # linear and nonlinear flow meter headloss
H_EtTopMin := HL_Flowmeasure  # ensures there is water above the pyramic peaks even at zero flow.
H_EtTop := H_EtHopperFirst + H_EtTopMin  # excludes freeboard height!!!
HW_Et := H_EtHopperFirst + H_EtTop = 1.57395 m
H_EtHopperLast := min((L_EtHopperMin/2 - ConRadius(ND_EtDrain) - S_Fitting)*tan(AN_EtSlope), HW_Et - HL_Flowmeasure - D_LfomOrifices/2 - H_CdcFloat/2)
# Overflow Channel
ND_EtOverflowDrain := D_pipeschedule(Q_Plant, PS_Default, 2 m, 2 m, Nu_Water, E_Pvc, K_PipeEnt + K_PipeExit + K_El90) = 3 in
# Sizes the drain pipe using a guess value of 2m for both total length and head loss. The pipe will drop from the overflow to near the level of the main plant drain channel.
W_EtOverflowChannel := max(W_ChannelMin, 2*ConRadius(ND_EtOverflowDrain) + 2*S_Fitting)
HW_EtOverflowChannel := H_HorizChannel(Q_Plant, W_EtOverflowChannel, HL_ChannelMax, L_Et, Nu_Water, E_Concrete, 1)
# Tank Width
W_EtCapture := Q_Plant/(L_Et*V_EtUp)
W_EtFlocVelocity := S_FlocBaffle*W_FlocChannel/H_EtTopMin
W_EtRMElbow := ElbowRadius(ND_RMPipe) + ConRadius(ND_RMPipe) + S_Fitting + SocketDepth(ND_RMPipe)
W_EtCoagPlatform := 2*(R_CoagTank + T_ChemTankWall) + S_ChemTankBorder + S_Operator - 2*T_PlantWall - W_EtOverflowChannel - T_EtWeir
# Terms in the width calculation ensure that:
# - A worker can fit inside for construction and maintenance
# - The desired capture velocity is achieved
# - The horizontal velocity is no greater than that of the floc between flocculator baffles
# - The rapid mix elbow fits into the tank
# - The tank is at least wide enough to be flush with the coagulant platform in the front for ease of mounting the doser assembly
W_Et := max(W_HumanMin, W_EtCapture, W_EtFlocVelocity, W_EtRMElbow, W_EtCoagPlatform)
# Heights and Elevations
H_EtHopperBack := min((W_Et - 2*ConRadius(ND_EtDrain) - 2*S_Fitting)*tan(AN_EtSlope), HW_Et - HL_Flowmeasure) = 0.9112 m
HL_RMPipe := h_l(Q_Plant, innerdiameter(ND_RMPipe, PS_Default), 2*HW_EtMax + W_EtWalkway, 2*K_El90 + K_PipeExit, Nu_Water, E_Pvc)
# estimate the length of RM pipe using:2*HW_EtMax + W_EtWalkway
ZW_RMPipe := HW_Sed + HL_Floc + HL_RMPipe + HL_RMMicroOrifice = 2.25231 m
# Elevation of the water inside the rapid mix pipe in the Tee outside the entrance tank
HL_EtLfomtoRm := h_e(Q_Plant, innerdiameter(ND_RMPipe, PS_Default), 2*K_El90) = 0.0061592 m
# one of these elbows is the Tee and the other is the elbow below the lfom
ZW_Et := ZW_RMPipe + H_Freefall + HL_Flowmeasure + HL_EtLfomtoRm = 2.55847 m
# elevation of the maximum water level in the entrance tank (relative to plant datum)
# This freefall is a safety factor inside the lfom
Z_EtTop := ZW_Et + H_PlantFreeboard = 2.65847 m  # Elevation of the top of the entrance tank walls (includes freeboard)
Z_Et := ZW_Et - HW_Et = 0.984519 m  # This is the elevation of the bottom slab of the entrance tank
# bottom elevation of entrance tank (same as the drain entrance elevation)
H_Et := Z_EtTop - Z_Et
Z_EtHopper := Z_Et + H_EtHopperFirst = 1.47507 m  # Top elevation of the first set of hoppers. (The peak of the pyramid)
ED_Tee := ED_Port(Q_Plant, innerdiameter(ND_RMPipe, PS_Default), Pi_VenaContractaOrifice, Pi_Jet) = 18.8496 mW/kg
# This suggests that the flow through the TEE has a high enough energy dissipation rate to provide rapid mix.
Z_RmMicroMix := Z_SedWeirExit  # This is the maximum elevation of the micromix plate to ensure that it is submerged until the plant flow stops.
# Linear case
Z_LfomOrifices := ZW_Et - HL_Flowmeasure + D_LfomOrifices/2
# elevation centers of the bottom orifices of the LFOM. The bottom of the bottom row of orifices is at the zero elevation
# Non Linear Case
Z_PipeGap := ZW_Et - HL_Flowmeasure  # elevation of the orifice gap between pipes that the water flows through
Z_EtExit := min(Z_RmMicroMix + ShortTeeLength(ND_RMPipe) - SocketDepth(ND_RMPipe), ZW_Et - HL_Flowmeasure - S_Fitting - SocketDepth(ND_RMPipe) - ElbowRadius(ND_RMPipe))
# are we sure we want to subtract a socket depth from this?
# This is MAXIMUM centerline elevation of the pipe exiting the entrance tank. Lower is okay. However, the lower this pipe exits the entrance tank, the more difficult it will be to access the micro mix orifice.
# I am finding the distance between the micromix plate and the centerline of the Tee.
# This is how far below the water level in the rapid mix pipe the orifice plate is located if we use a rapid mix orifice.
HW_RmMicroMix := ZW_RMPipe - Z_RmMicroMix = 0.314951 m
# Hopper Drains
ND_EtDrain =  # error: This variable is undefined.
# Currently the drains are always set to 3in nominal diameter, but we are saving these calculations which design the drains more thoroughly.
Q_EtHopper := L_EtHopperFirst*W_Et*H_EtHopperFirst/(2*Ti_EtDrain)  # estimates the max flow out of each Hopper during cleaning
ND_EtDrainBetter := max(D_pipeschedule(Q_EtHopper, PS_Default, HW_Et, L_Et, Nu_Water, E_Pvc, K_PipeExit + K_PipeEnt), ND_EtDrainMin)
# Although this calculation is approximate it is adequate for designing the drains.
# Doser Elevations
H_CdcFloatvalve := 5 cm  # Distance between fluid level in constant head tank and orifice for float valve
H_CdcDripZero := 6.77 cm
# Estimated minimum elevation difference between the top of the entrance tank wall and the Cdc doser tube discharge (which is at the same elevation as the constant head tank water level), based on the hardware used to mount the lever arm assembly. Estimated distance from lever arm drawing.
Z_CdcDripZero := H_CdcDripZero + Z_EtTop = 2.72617 m  # End of doser tube elevation at zero dose. (also fluid level in constant head tank)
Z_CdcFloatvalveOrifice := Z_CdcDripZero + H_CdcFloatvalve = 2.77617 m
Z_CoagulantOutlet := Z_CdcFloatvalveOrifice + H_CoagTankAboveHeadTank = 3.07617 m  # This is the height of the outlet from the stock tanks
Z_CoagulantTankBottom := Z_CoagulantOutlet - B_StockOutlet = 2.97617 m  # This is the height of the coagulant stock tank base
# There must be a wall between the stock tanks and the entrance tank to prevent spills from reaching the entrance tank.
Z_Walkway := H_Sed - H_WalkwayToTankWall = 1.59086 m
H_ETfromWalkway := Z_EtTop - Z_Walkway = 1.06761 m  # Height of the entrance tank wall from the walkway
H_CdcChtfromWalkway := Z_CdcDripZero - Z_Walkway = 1.13531 m  # Height of the constant head tank (fluid level) from the walkway
## Trash Racks
N_TRSpacesV := ceil((W_Et + 4*D_Rebar)/(D_LfomOrifices/sqrt(2) + D_Rebar))  # number of spaces between rebar spanning the width of the entrance tank
B_EtRebar := (W_Et + 3*D_Rebar)/N_TRSpacesV = 0.0255756 m
# number of spaces between rebar spanning the heigth of the top of the entrance tank
N_TRSpacesH := ceil((H_EtTop + H_PlantFreeboard/2 + 2*D_Rebar)/B_EtRebar)
# Flow Control Drain
# This feature is a pipe with a gate valve draining into the main plant drain channel from a pipe which begins in the entrance tank's first hopper. The purpose is to control the plant flow by wasting a certain amount of the influent. The operator will need to learn empirically how many turns of the valve handle will give the desired flow rates, which he will read off of a scale in the entrance tank.
L_EtFlowControlPipeEst := H_EtHopperLast/tan(AN_EtSlope) + T_PlantWall
ND_EtFlowControl := D_pipeschedule(Q_Plant, PS_Default, HW_Et, L_EtFlowControlPipeEst, Nu_Water, E_Pvc, K_PipeExit + K_PipeEnt + K_GateValve) = 3 in
L_EtFlowControlPipe := H_EtHopperLast/tan(AN_EtSlope) + T_PlantWall - CouplingLength(ND_EtFlowControl) + SocketDepth(ND_EtFlowControl)
# Coagulant Stock Tank Elevation
Z_CoagTank := Z_EtTop + H_CoagTankAboveHeadTank + H_DoserAssembly - B_StockOutlet
Z_CoagTankOutlet := Z_CoagTank + B_StockOutlet
