Q_Plant := 2*L/s
# [reference: ExpertInputs.xmcd]
# [reference: MathFunctions.xmcd]
# [reference: PipeDatabase.xmcd]
# [reference: MaterialsDatabase.xmcd]
# [reference: FluidsFunctions.xmcd]
# [reference: CdcFunctions.xmcd]
# [reference: SedimentationTankjem384.xmcd]
# [reference: Flocculator.xmcd]
# [reference: LFOM.xmcd]
# Entrance Tank
# Flow Control Drain and Entrance Tank Walkway
# This feature is a pipe with a gate valve draining into the entrance tank drain channel from a pipe out of the entrance tank's first hopper. The purpose is to control the plant flow by wasting a certain amount of the influent. The operator will need to learn empirically how many turns of the valve handle will give the desired flow rates, which he will read off of a scale in the entrance tank.
HW_EtEst := 0.8 m
L_EtFlowControlPipeEst := 2 m
ND_EtFlowControl := D_pipeschedule(Q_Plant, PS_Default, HW_EtEst, L_EtFlowControlPipeEst, Nu_Water, E_Pvc, K_PipeExit + K_PipeEnt + K_GateValve + 2*K_El90) = 1.5 in
ND_EtOverflowDrain := D_PipeChannel(Q_Plant/2, PS_Default) = 2 in
ND_EtInlet := D_pipe(Q_Plant, AvailND, 1 m, 100 m, Nu_Water, E_Concrete, K_PipeEnt + K_PipeExit) = 3 in
# Length, Width, and Hopper Calculations (grit =0)
W_EtDCMinRMFit := max(W_EtDCMin, 2*ConRadius(ND_RMPipe))
W_EtFloatDrainLFOM := 2*ConRadius(ND_EtFloat) + S_EtFloat + 2*ConRadius(ND_RMPipe) + 2*S_Fitting + 2*ConRadius(ND_EtDrain) + L_EtSupport = 1.03974 m
W_EtDCLFOM := W_EtDCMinRMFit + T_PlantWall + S_Fitting + OuterDiameterFittingPVC(ND_RMPipe) + S_Fitting = 0.5516 m
W_EtDCOverflow := W_EtDCMinRMFit + SocketDepth(ND_EtOverflowDrain) + ElbowRadius(ND_EtOverflowDrain) + ConRadius(ND_EtOverflowDrain) + S_Fitting = 0.406331 m
W_EtMin := max(W_HumanMin, W_EtFloatDrainLFOM, W_EtDCLFOM, W_EtDCOverflow) = 1.03974 m  # Minimum width to satisfy geometric constraints
L_EtMax := L_Sed  # maximum length to prevent enlarging the plant footprint
H_EtHopperMin :=
    (35 cm) if Q_Plant ≤ 3*L/s
    (50 cm) otherwise  # so that the hoppers aren't so small that they need to be drained frequently
H_EtHopperMax := HW_EtMax - HL_Flowmeasure  # so that the entrance tank doesn't get too deep
ConRadius(ND_EtDrain) = 0.0508 m
L_EtCaptureEffectiveMin := Q_Plant/V_EtUpMin/W_EtMin = 0.240445 m  # Length of plate settlers needed
L_EtMin := max(2*(ConRadius(ND_RMPipe) + S_Fitting), H_EtHopperMin/tan(AN_EtSlopeMax) + S_Fitting + 2*ConRadius(ND_EtDrain)) + T_EtHopperLedge + L_EtCaptureEffectiveMin + max(2*(ConRadius(ND_EtInlet) + S_Fitting), H_EtHopperMin/tan(AN_EtSlopeMax)) = 1.24205 m
N_EtPlates := round(1 + L_EtCaptureEffectiveMin/(B_SedPlate/sin(AN_SedPlate))) = 9
L_EtCaptureEffective := (N_EtPlates - 1)*B_SedPlate/sin(AN_SedPlate) + T_SedPlate/sin(AN_SedPlate) = 0.251725 m
L_Et := max(2*(ConRadius(ND_RMPipe) + S_Fitting), H_EtHopperMin/tan(AN_EtSlopeMax) + S_Fitting + 2*ConRadius(ND_EtDrain)) + T_EtHopperLedge + L_EtCaptureEffective + max(2*(ConRadius(ND_EtInlet) + S_Fitting), H_EtHopperMin/tan(AN_EtSlopeMax)) = 1.25332 m
H_EtSlope := min((max(2*(ConRadius(ND_RMPipe) + S_Fitting), H_EtHopperMin/tan(AN_EtSlopeMax) + S_Fitting + 2*ConRadius(ND_EtDrain)) - 2*ConRadius(ND_EtDrain) - S_Fitting)*tan(AN_EtSlopeMax), H_EtHopperMax) = 0.35 m
L_EtPlateActive := (N_EtPlates - 1)*S_SedPlate/sin(AN_SedPlate) = 0.23094 m
L_EtPlateEst := (B_SedPlate*Q_Plant/(W_EtMin*L_EtCaptureEffective*V_EtUpMin) - S_SedPlate)/(sin(AN_SedPlate)*cos(AN_SedPlate)) = 0.00182482 m
N_PlatesPerSheet := floor(L_SedPlateSheet/L_EtPlateEst) = 1643
L_EtPlate := L_SedPlateSheet/N_PlatesPerSheet = 0.182593 cm
V_SedActiveUp := Q_SedBay/(W_SedBay*L_SedPlateActive) = 1.04748 mm/s
V_SedCaptureCheck := V_SedActiveUp*B_SedPlate/(L_SedPlateEst*sin(AN_SedPlate)*cos(AN_SedPlate) + S_SedPlate) = 0.12 mm/s
AN_EtSlope := atan(H_EtHopper/(L_EtHopper/2 - S_Fitting - ConRadius(ND_EtDrain)))
W_EtCapture := Q_Plant/V_EtUpMin/(L_Et0 - 1/2*L_EtHopper - (S_Fitting + ConRadius(ND_EtDrain)))
W_Et0 := max(W_EtMin, W_EtCapture)
V_EtUp := Q_Plant/(W_Et0*(L_Et0 - 1/2*L_EtHopper - (S_Fitting + ConRadius(ND_EtDrain))))
HW_Et0 := H_EtHopper + HL_Flowmeasure
H_EtTop := HL_Flowmeasure + H_PlantFreeboard
H_Et0 := HW_Et0 + H_PlantFreeboard
L_EtHopperFront := L_EtSupport - (T_PlantWall - T_ChannelWall)
H_EtHopperFront := min(H_EtHopper, tan(AN_EtSlope)*L_EtHopperFront)
L_EtHopperBack := W_Et0 - 2*S_Fitting - 2*ConRadius(ND_EtDrain) - L_EtHopperFront
H_EtHopperBack := min(H_EtHopper, tan(AN_EtSlope)*L_EtHopperBack)
AN_EtHopperBackSlope := atan(H_EtHopperBack/L_EtHopperBack)
AN_EtHopperFrontSlope := atan(H_EtHopperFront/L_EtHopperFront)
# Overflow Channel
W_EtOverflowSlot := innerdiameter(ND_EtOverflowDrain, PS_Default)*sin(acos(1 - 2*0.9)) = 3.31165 cm
# This sizes the slot such that only 10% of the vertical dimension of the pipe is cut away.
L_EtChannelPipesMin :=
    (0.5*(L_EtHopper/2 + ConRadius(ND_EtDrain) + S_Fitting) - ShortTeeLength(ND_EtOverflowDrain) - CapThickness(ND_EtOverflowDrain)) if EN_EtGrit == 0
    W_rectweir(Q_Plant, 5 cm)/2 otherwise
L_EtOverflowWeirMin :=
    (2*(L_EtHopper/2 + ConRadius(ND_EtDrain) + S_Fitting)) if EN_EtGrit == 0
    (2*L_EtChannelPipesMin) otherwise
H_EtOverflowCutaway := 0.1*innerdiameter(ND_EtOverflowDrain, PS_Default) = 0.2173 in
H_EtLFOMtoOverflow := 3 cm
# Heights and Elevations
D_RMOrifice := D_PipeED(E_MaxRM, Q_Plant, Pi_VenaContractaOrifice, Pi_Jet) = 0.0657725 m
HL_RMMicroOrifice := h_orifice(D_RMOrifice, Pi_VenaContractaOrifice, Q_Plant) = 4.45115 cm
# estimate the length of RM pipe using:2*HW_EtMax + W_EtWalkway
HL_RMPipe :=
    h_l(Q_Plant, innerdiameter(ND_RMPipe, PS_Default), 2*HW_EtMax + W_EtWalkway, K_El90 + K_PipeExit, Nu_Water, E_Pvc) if Q_Plant > Q_PlantMaxLF
    h_l(Q_Plant, innerdiameter(ND_RMPipe, PS_Default), 2*HW_EtMax + W_EtWalkway, 3*K_El90 + K_PipeExit, Nu_Water, E_Pvc) otherwise
# estimate the length of RM pipe using:2*HW_EtMax + W_EtWalkway
ZW_RMPipe := HW_Sed + HL_Floc + HL_RMPipe + HL_RMMicroOrifice = 1.9111 m  # Elevation of the water inside the rapid mix pipe in the Tee outside the entrance tank
ZW_Et := ZW_RMPipe + H_Freefall + HL_Flowmeasure + HL_RMPipe = 2.24872 m
# elevation of the maximum water level in the entrance tank (relative to plant datum)
# This freefall is a safety factor inside the lfom
Z_EtTop := ZW_Et + H_PlantFreeboard = 2.34872 m  # Elevation of the top of the entrance tank walls (includes freeboard)
Z_Et := ZW_Et - HW_Et  # This is the elevation of the bottom slab of the entrance tank
# bottom elevation of entrance tank (same as the drain entrance elevation)
Z_EtHopper := Z_Et + H_EtHopper  # Top elevation of the first set of hoppers. (The peak of the pyramid)
Z_RmMicroMix := Z_SedWeirExit
# This is the maximum elevation of the micromix plate to ensure that it is submerged until the plant flow stops. Since we are putting the plate in the flocculator entrance coupling this should not be an issue.
# Linear case
Z_LfomOrifices := ZW_Et - HL_Flowmeasure + D_LfomOrifices/2
# elevation centers of the bottom orifices of the LFOM. The bottom of the bottom row of orifices is at the zero elevation
# Hopper Drains (grit only)
ND_EtDrain = 3 in
# Currently the drains are always set to 3in nominal diameter, but we are saving these calculations which design the drains more thoroughly.
Q_EtHopper := L_EtHopper*W_Et*H_EtHopper/(2*Ti_EtDrain)  # estimates the max flow out of each Hopper during cleaning
ND_EtDrainBetter := max(D_pipeschedule(Q_EtHopper, PS_Default, HW_Et, L_Et, Nu_Water, E_Pvc, K_PipeExit + K_PipeEnt), ND_EtDrainMin)
# Although this calculation is approximate it is adequate for designing the drains.
# Doser Elevations
ZW_CdcCht := Z_EtTop + H_DoserAssembly = 2.41642 m  # End of doser tube elevation at zero flow. (also fluid level in constant head tank)
Z_CdcFloatValveOrifice := ZW_CdcCht + H_CdcFloatvalve = 2.46642 m
Z_CoagulantOutlet := Z_CdcFloatValveOrifice + H_CoagTankAboveHeadTank = 2.76642 m  # This is the height of the outlet from the stock tanks
Z_CoagulantTankBottom := Z_CoagulantOutlet - B_StockOutlet = 2.66642 m  # This is the height of the coagulant stock tank base
## Trash Racks
N_TRSpacesV := ceil((W_Et + 4*D_Rebar)/(D_LfomOrifices/sqrt(2) + D_Rebar))  # number of spaces between rebar spanning the width of the entrance tank
B_EtRebar := (W_Et + 3*D_Rebar)/N_TRSpacesV
# number of spaces between rebar spanning the heigth of the top of the entrance tank
N_TRSpacesH := ceil((H_EtTop - H_PlantFreeboard/2 + 2*D_Rebar)/B_EtRebar)
# Coagulant Stock Tank Elevation
Z_CoagTank := Z_EtTop + H_CoagTankAboveHeadTank + H_DoserAssembly - B_StockOutlet
Z_CoagTankOutlet := Z_CoagTank + B_StockOutlet
# Drain Channel (grit only)
Q_EtDCMax := max(Q_Plant, Q_pipeminor(innerdiameter(ND_EtDrain, PS_Default), H_Et, K_PipeEnt + K_PipeExit)*(N_EtFullHopper + 1))
L_EtDC := L_Et - 2*(S_Fitting + ConRadius(ND_RMPipe))
W_EtDCOLD := max(2*ConRadius(ND_RMPipe), W_Et - max(OuterDiameterFittingPVC(ND_RMPipe) + 2*S_Fitting + T_PlantWall, S_Fitting + ConRadius(ND_EtOverflowDrain) + ElbowRadius(ND_EtOverflowDrain) + SocketDepth(ND_EtOverflowDrain)))
W_EtDC := max(3*S_Fitting + 2*ConRadius(ND_EtDrain) + 2*ConRadius(ND_EtOverflowDrain), 2*ConRadius(ND_RMPipe)) = 0.319863 m
H_EtDCMinFittingsOLD := max(OuterDiameterFittingPVC(ND_EtOverflowDrain), OuterDiameterFittingPVC(ND_EtFlowControl)) = 0.0682625 m
H_EtDCMinFittings := OuterDiameterFittingPVC(ND_EtFlowControl) = 0.05715 m
H_EtDCMinCapacity := H_HorizChannelMin(Q_EtDCMax, W_EtDC, L_EtDC, Nu_Water, E_Concrete, 1)
H_EtDC :=
    max(H_EtDCMinCapacity, H_EtDCMinFittings, 2*ConRadius(ND_RMPipe)) if Z_FlocTank + 2*S_Fitting + OuterDiameterFittingPVC(ND_RMPipe) ≤ Z_Et - T_PlantWall - max(H_EtDCMinCapacity, H_EtDCMinFittings, 2*ConRadius(ND_RMPipe)) - T_ChannelWall
    (Z_Et - Z_FlocTank - T_PlantWall) otherwise
# estimate 1/3 of back slope does not overlap with side slopes
# Other Parameters
Ti_Et0 := (W_Et*L_Et*HW_Et - ((N_EtFullHopper + 1)*0.5*H_EtHopper*W_Et*(L_EtHopper/2 - S_Fitting - ConRadius(ND_EtDrain)) - 1/3*H_EtHopperBack*L_Et*(W_Et - 2*(S_Fitting + ConRadius(ND_EtDrain)))))/Q_Plant
Ti_Et1 := HW_Et*L_Et*W_Et/Q_Plant
Ti_Et :=
    Ti_Et0 if EN_EtGrit == 0
    Ti_Et1 otherwise
.
