# EXPERT INPUTS
acad_version := 2008
W_MpWalkway := 1*m
H_PlantFreeboard := 0.1*m
# Chemical Storage Tanks, Entrance Tank
# and Rapid Mixer Inputs
V_EtUp := 8*mm/s
HL_RMPipeEst := 10 cm
ED_RMMicroOrifice := 1*W/kg
HL_ChemDoserMin := 40 cm
HL_RMMicroOrificeMin := 10 cm
H_AlumTankAboveHeadTank := 30 cm  # This needs to be calculated based on actual float valve orifice and max chemical flow rate.
Ratio_HeightToDiameterStockTank := 1.5
T_ChemTankWall := 5 mm
B_StockOutlet := 10 cm  # This is the distance from the bottom of the stock tanks to the outlets to allow sedimentation.
# Flocculator Inputs
W_HumanMin := 0.45 m
S_FlocBaffleSetBackPlastic := 2 cm
CP_Floc := 90 m^(2/3)
# reduced from 110 to 90 to account for the lower value of K.P that we are now using in the flocculator design (Change by Monroe on 5/11/10)
Pi_JSOptimal := 3
Pi_JSMin := 2
Pi_FlocBaffle := 1
# Ratio of space at the bottom of a baffle to the space between baffles. This is conventionally set to 1.5, but we have reduced it to 1 to keep higher scour velocities at the bottom of the flocculator.
ED_Floc := 6*mW/kg
Ti_FlocDrain := 30 min
# Sedimentation Inputs
# I believe this can be eliminated since we aren't using this constraint in design.
V_Scour := 0.1*m/s
Pi_FlowManifold := 0.8
ED_SedInlet := 6*mW/kg
HW_SedEst := 2 m
V_SedUpBod := 0.8*mm/s
V_SedCBod := 0.12*mm/s
V_UpFlocHopper := 0.35*mm/s
AN_SedSlope := 60 deg  # Angle of the sloped bottom of the sed tank
HW_InletChannelMax := 0.5*m  # To make it easy to place pipe nipples in inlet pipes to block flow to sed tank
B_SedPlateFramePipes := 30 cm  # No longer used.
AN_SedPlate := 60 deg
B_SedPlateMin := 2.5 cm + T_SedPlate  # error: This variable is undefined.
# This is to prevent floc roll up. We should specify this in a more fundamental way. (based on velocity gradients)
ND_SedManifoldMax := 8 in
# Monroe reduced this to 8 inches  (from 12) to force sed tanks to not be so long and to eliminate the drawing errors that were occurring with long sed tanks.
B_SedManifoldPortEst := 10 cm
N_SedLaunders := 1  # Number of launders per bay
HL_SedLaunderBod := 4 cm  # target headloss in sed launders
Pi_Launder := 0.95
Pi_QLaunderOrifices := 0.80
B_SedLaunderOrificesEst := 10 cm
Pi_QSludgeOrifices := 0.85
ND_SedModulePipe := 0.5 in  # This is the diameter of the pipe used to hold the lamina together
ND_SedModulePipeSpace := 3/4*in  # This is the diameter of the ledge that serves as a ledge for the plate setter to lie on.
S_SedPlateModuleMin := 2 cm
ND_SedPlateFrame := 1.5 in
B_SedFrameSupport := 1/3*m
# S.LamellaLaunder is the extra space between the top of the lamella and the ledge used to hold up the launder
S_LamellaLaunder := 4 cm
HL_SedWeirMax := 5 cm
Ti_SludgeDrain := 30 min
# This is the minimum distance between the top of the plate settlers and the second pipe as to ensure that the plate settler isn't too floppy.
L_SedPlateCantilevered := 30 cm
W_ExitChannelMin := 10 in  # This is the minimal width designated for the exit channel in order to fit a cap onto the launders.
ND_SedModulePipe = 0.5 in  # This is the diameter of the pipe used to hold the lamina together
ND_SedModulePipeSpace = 0.75 in  # This is the diameter of the ledge that serves as a ledge for the plate setter to lie on.
