# Linear CDC Design
# [reference: MasterProgram.xmcd]
# Inputs
C_CdcMaxDose := 60*mg/L
# Flows and concentrations:
Q_Plant = 12 L/s
C_CdcMinDose := 8*mg/L
C_CoagulantStock = 120 gm/L
Q_PlantMin := .4*Q_Plant
# Geometry inputs and simple calculations:
H_RangeEntTank := 20 cm  # Difference between the min and max water levels in the entrance tank. Maximum head loss through the LFOM.
H_dmax = 0.2 m
L_LeverArmTotal := 36 in  # Set to be this length.
L_SliderEffective := 3.5 in  # Distance between the end of the slider and the pivot point of the freefall PVC tube.
L_LeverArmEffective := L_LeverArmTotal - L_SliderEffective = 32.5 in
H_Max := 20 cm  # The maximum elevation the doser tube will drop when the slider is at the end of the bar at max plant flow.
# To find the length of the side of the arm with the scale and the side of the arm with the float attached, solve two equations for two unknowns. One equation is similar triangles at maximum flow. The other is that the two sides of the bar must add up to the total.
L_ScaleArmEffective := L_LeverArmEffective/(1 + H_RangeEntTank/H_Max) = 16.25 in
1.75*2.54 = 4.445
L_CdcScaleArm := L_ScaleArmEffective + L_SliderEffective = 19.75 in
L_CdcFloatArm := L_LeverArmTotal - L_CdcScaleArm = 16.25 in
Angle_LeverArmMax := asin(H_RangeEntTank/L_CdcFloatArm) = 28.9833 deg  # Not necessarily important.
# Other:
Re_PipeTransition = 2100
Nu_Water = 1e-6 m^2/s
# Max and Min Doser Flow Rates
C_CoagulantStock := 120*gm/L
Q_Plant := 20*L/s
Q_CdcCoagulantMax := Q_Plant*C_CdcMaxDose/C_CoagulantStock = 10 mL/s
Q_CdcCoagulantMinMax := Q_Plant*C_CdcMinDose/C_CoagulantStock = 1.33333 mL/s
# Float Valve Selection
# Calculating Appropriate Float Sizes
CdcChtFloatValve := [0.093 in, .25 in, "Barb"; 0.187 in, 0.5 in, "NPT"; 0.25 in, 0.5 in, "NPT"; 0.312 in, 0.5 in, "NPT"]
i := 0 .. rows(Float) - 1
D_CdcFloatValveOrifice[i] := CdcChtFloatValve[i, 0]
HL_StockMax = 0.3 m  # max headloss between stock tanks and constant head tank.
Q_CdcChtFloatValveMax := Q_orifice(D_CdcFloatValveOrifice, HL_StockMax, Pi_VenaContractaOrifice)
# Choose Stock Tank Float depending on highest coagulant flow needed.
# Find the float that will be able to supply the maximum coagulant flow.
Q_CdcChtFloatValve := CeilNearest(Q_CdcCoagulantMax, Q_CdcChtFloatValveMax)
# Find the index of this float in the matrix to find the diameter of the float.
index_CdcChtFloatValve := index(Q_Float, Q_FloatOrificeMax) = 1
D_CdcChtFloatValve := D_CdcFloatValveOrifice[index_Float] = 0.187 in
# Tube Diameter
# Tubing diameters | Barbed fittings corresponding to the tubing diameters.
D_BarbAvailable = [0.075; 0.14; 0.25; 0.36; 0.497; 0.61; 0.728] in
D_CdcAvailable := [0.125; 0.1875; 0.25; 0.375; 0.5; 0.625; 0.75; 1]*in
N_CdcTubeArray := [1; 2; 3; 4; 5]
Q_CdcCoagulantMaxTube := Q_transition(D_Available[last(D_Available)], Nu_Water)
Q_CdcCoagulantMaxTube = 41.8931 mL/s
N_CdcTubeEst := Q_CdcCoagulantMax/Q_CdcCoagulantMaxTube
N_CdcTubeEst = 0.238703
N_CdcTubeActual := CeilNearest(N_CdcTubeEst, N_CdcTubeArray)
N_CdcTubeActual = 1
Q_Plant = 20 L/s
Q_CdcCoagulantActual := Q_CdcCoagulantMax/N_CdcTubeActual
Q_CdcCoagulantActual = 10 mL/s
ID_CdcTubeMinLaminar := 4*Q_CdcCoagulantActual/(Nu_Water*π*Re_PipeTransition) = 0.238703 in
# The minumum tubing inner diameter to maintain laminar flow at the maximum flow rate.
ID_CdcTube := CeilNearest(ID_CdcTubeMinLaminar, D_Available) = 0.25 in
# The inner diameter was chosen in order to keep the flow from becoming turbulent at the upper end of the range of flows (calculation below).
# Tube Length
L_CdcTube := H_Max*g*π*ID_CdcTube^4/(128*Nu_Water*Q_CdcCoagulantActual)
L_CdcTube = 7.82682 m
L_CdcTubeMax := 1.25 m
LinearCdc(C_CoagulantStock, D_CdcAvailable) :=
    i ← 1
    while i ≤ 3
        C_CoagulantStock ← C_CoagulantStock*i
        j ← 1
        while j ≤ 3
            N_CdcTubes ← j
            Q_CdcCoagulantMax ← Q_Plant*C_CdcMaxDose/(C_CoagulantStock*N_CdcTubes)
            ID_CdcTubeMinLaminar ← 4*Q_CdcCoagulantMax/(Nu_Water*π*Re_PipeTransition)
            j ← j + 1 if ID_CdcTubeMinLaminar > D_CdcAvailable[last(D_CdcAvailable)]
            otherwise
                D_CdcTube ← NextLargest(ID_CdcTubeMinLaminar, D_CdcAvailable)
                k ← index(D_CdcTube, D_CdcAvailable)
                L_CdcTube ← H_Max*g*π*D_CdcTube^4/(128*Nu_Water*Q_CdcCoagulantMax)
                break if L_CdcTube < L_CdcTubeMax
                otherwise
                    i ← i + 1
                    break
        if L_CdcTube < L_CdcTubeMax
            {
                break
            }
    return [i, j, k]
NextLargest(5 in, array)
# Maximum coagulant flow per tube.
# Minimum diameter needed per tube to maintain laminar flow
# Length of tubing for each tube.
LinearCdc(C_CoagulantStock, D_CdcAvailable) = [2, 1, 0]
insertdwg(filepath, insertionpoint, scalefactor, AN_rotation)
# Lever Arm Scale
L_SliderEffective := 3 in
# This is the distance between the end of the slider and the point where the freefall PVC is hung. (it's not drawn at exactly 3", but we'll change that. the drawing was arbitrary initially).
L_WallClearance := L_HalfWall + L_Slider - L_SliderEffective + L_Extra  # error: This variable is undefined.
# This is the minumum distance the first tick mark can be from the lever arm pivot point in order for the PVC assembly to have enough clearance from the entrance tank wall.
# This is the elevation difference between the point where the freefall PVC assembly is hung and the point where the end of the tube rests. The horizontal PVC has an outer radius of .525" and the tool hangar likely adds another .5".
#
# This is only significant in zeroing the CHT. It shouldn't effect the lever arm scale because it's a constant.
H_PVCAssembly := 1 in
H_MinDoseMaxFlow := 128*Nu_Water*L_Tube*Q_CdcCoagulantMinMax/(g*π*ID_CdcTube^4) = 0.238496 cm
# This is the minumum tube head loss when the lever arm is at max angle (max plant flow) and the dose is at a minumum, which corresponds to the first point on the scale.
L_FirstPoint := H_MinDoseMaxFlow/sin(Angle_LeverArmMax) + L_SliderEffective = 3.19378 in
# This is the distance between the first tick mark and the pivot point along the lever arm. It must be greater than L.WallClearance in order for the PVC assembly to be far enough from the tank wall.
