# [reference: MasterProgram.xmcd]
# Automated Materials List
N_SedPlatesTotal := N_SedPlates*N_SedBays*N_SedTanks
N_SedPlatesPerSheet := floor(L_SedPlateSheet/L_SedPlate)
N_SedPlateSheets := ceil(N_SedPlatesTotal/N_SedPlatesPerSheet) = 256  # Total number of corrugated sheets needed to construct lamella/plate settlers
# Channel and Tank Walls
A_FlocFloor := (L_Sed + 2*T_PlantWall)*(W_FlocChannel*N_FlocChannels + T_PlantWall*(N_FlocChannels + 1)) = 45.0061 m^2
A_FlocWalls := ((H_Floc*L_Sed) - (H_FlocPort[N_FlocChannels - 1]*W_FlocPort[N_FlocChannels - 1])) + (L_Sed*H_Floc) + ((N_FlocChannels*W_FlocChannel + ((N_FlocChannels + 1)*T_PlantWall))*H_Floc) + ((N_FlocChannels - 1)*((L_Sed*H_Floc) - (H_FlocPort[0]*W_FlocPort[0]))) = 80.887 m^2
Vol_FlocFloor := A_FlocFloor*T_PlantWall = 6.75091 m^3
# **This is for vertical flocculator; Calculate for horizontal in the future**
Vol_FlocWalls := A_FlocWalls*T_PlantWall = 12.1331 m^3
A_SedWalls := (N_SedTanks + 1)*(L_Sed*H_Sed - ((H_ExitChannel*W_ExitChannel) + (H_InletChannel*W_InletChannel))) + ((N_SedTanks*W_Sed) + ((T_PlantWall*(N_SedTanks + 1))*2))*H_Sed = 55.6268 m^2
Vol_SedWalls := A_SedWalls*T_PlantWall = 8.34403 m^3
A_SedFloor := (L_Sed + 2*T_PlantWall)*(N_SedTanks*W_Sed + (N_SedTanks + 1)*T_PlantWall) = 69.3964 m^2
Vol_SedFloor := A_SedFloor*T_PlantWall = 10.4095 m^3
Vol_EntranceTank := 2*(W_Et*T_EtWall*H_Et) + 2*(L_Et*T_EtWall*H_Et) - (T_EtWall*W_EtChannel*W_EtChannel) = 2.95989 m^3
# **basic dimensions - no grit chamber**
A_EtWalls := 2*(H_Et*(L_Et + T_EtWall)) + 2*H_Et(W_Et + 2*T_EtWall) - W_EtChannel*W_EtChannel  # error: This value must be a function, but has the form: Length.
A_EtFloor := (W_Et + 2*T_EtWall)*(L_Et + 2*T_EtWall) = 7.75197 m^2
# **Assuming L.Et is marked as the top diagram on the materials list wiki**
Vol_EtWalls := Vol_EntranceTank = 2.95989 m^3
W_ExitChannel = 0.515514 m
Vol_EtFloor := (L_Et + 2*T_EtWall)*(W_Et + 2*T_EtWall)*T_EtFloor
H_ExitChannel = 0.569105 m
Vol_StockTank := Q_AlumStockMax*Ti_StockMin = 4.05 m^3
L_Sed + 2*T_PlantWall - 2*W_ExitChannel = 4.41183 m
# **D.StockTank is a user input, newly created**
R_StockTank := D_StockTank/2
H_StockTank := Vol_StockTank/(pi*R_StockTank^2)
# **new variable defined here**
A_StockTank := 2*pi*R_StockTank^2 + 2*pi*R_StockTank*H_StockTank  # **new variable defined here**
A_StockTankFloor := Vol_StockTank/(2*R_StockTank)  # **new variable defined here**
Vol_ExitChannelTank := (2*(S_Elbow + 3*ND_PltWeir + T_ChannelWall) + 2*(4*ND_PltWeir + 3*S_Elbow + T_ChannelWall))*H_Sed*T_ChannelWall = 1.19589 m^3
A_ExitChannelWalls := L_Channel*(H_ExitChannel + T_ChannelWall) = 9.16858 m^2
A_ExitChannelFloor := L_Channel*(W_ExitChannel + 2*T_ChannelWall) = 10.3978 m^2
Vol_ExitChannelWalls := 2*L_Channel*H_ExitChannel*T_ChannelWall = 2.17683 m^3
Vol_ExitChannelFloor := L_Channel*(W_ExitChannel + 2*T_ChannelWall)*T_ChannelWall = 1.55967 m^3
# **Perhaps replace "T.ExitChannel with T.ChannelWall**
Vol_InletChannelTank := (2*(S_Elbow + 3*ND_PltWeir + T_ChannelWall) + 2*(2*ND_PltWeir + 2*S_Elbow + T_ChannelWall))*H_Sed*T_ChannelWall = 0.896376 m^3
A_InletChannelWalls := L_Channel*(H_InletChannel + T_ChannelWall) = 9.16858 m^2
A_InletChannelFloor := L_Channel*(W_InletChannel + 2*T_ChannelWall) = 13.9624 m^2
Vol_InletChannelWalls := 2*L_Channel*H_InletChannel*T_ChannelWall = 2.17683 m^3
Vol_InletChannelFloor := L_Channel*(W_InletChannel + 2*T_ChannelWall)*T_ChannelWall = 2.09436 m^3
# **Perhaps replace "T.InletChannel with T.ChannelWall**
N_SedInletChimneys := N_SedInletPipes*N_SedBays*N_SedTanks = 24
Vol_SedChimneyPipe := π*(.5*D_SedChimneyPipe)^2*(H_Sed - H_InletChannel - T_ChannelWall - H_SedSludge - T_SedSludge)
Vol_SedInletChimneys := N_SedInletChimneys*(W_SedInletBottom*(W_InletChannel + T_ChannelWall)*(H_Sed - H_InletChannel - T_ChannelWall - H_SedSludge - T_SedSludge) - Vol_SedChimneyPipe)
# Ferrous Cement
Vol_DistributionTunnelCovers := T_SedSlopePlate*L_SedSlopeManifold*W_SedSlopePlate*N_SedPorts
A_DistributionTunnelCovers := Vol_DistributionTunnelCovers/T_SedSlopePlate
Vol_FlocBafflesTotal := W_FlocChannel*T_FlocBaffle*(L_FlocBaffleLower*ceil(N_FlocChannelBaffles/2) + L_FlocBaffleUpper*floor(N_FlocChannelBaffles/2)) = 7.03217 m^3
A_FlocBafflesTotal := Vol_FlocBafflesTotal/T_FlocBaffle = 46.8812 m^2  # **new variable defined here**
# Pipes and Valves
N_PipeSedPlateFrame := W_Sed/B_SedPipe - 1 + L_Sed/B_SedPipe - 1
L_PipeSedPlateFrameTotal := N_SedTanks*((W_Sed/B_SedPipe - 1)*L_Sed + (L_Sed/B_SedPipe - 1)*W_Sed)
# Length of pipe needed for Sedimentation Tank Plate Frame at ND.SedPlateFrame
L_Weir := 2*H_PltWeir = 0.669458 m  # Total length of Weir pipe in Inlet and Exit Channel Tanks at ND.PltWeir
N_Launders := N_SedTanks*N_SedBays*N_SedLaunders
L_LaunderPipeTotal := L_SedLaunder*N_Launders = 88.3741 m  # Total length of launder pipe at ND.SedLaunder
N_LaunderCouplings := N_Launders  # Number of couplings for launder pipe going through concrete wall
N_Valves := N_SedBays*N_SedTanks  # Valves and valve couplings to drain sedimentation tanks
N_ValveCouplings := N_Valves
