# Calculations: LFOM or Rapid Mixer
# requirements for LFOM:
# 1) laminar flow in the dosing tube Re< Re.PipeTransition
# 2) small headloss through doser orifice D.FcmValveOrifice
RapidMixUse :=
    0 if (Q_FcmMax < Q_FcmMaxLaminar)
    1 otherwise
RapidMixUse =  # error: This variable is undefined.
Q_PlantLfomMax := Q_FcmMaxLaminar*C_FcmAlum/C_FcmDoseMax
# Calculations:  Orifice Dimensions
# IMPORTANT NOTE:
# To calculate the headloss at the entrance to the flocculator we must use the velocity at that precice location.  We know that the velocity (before going through the orifice) needs to be increased by 1/korifice (from orifice equa.) to compensate for the  compression of the fliud through the orifice.  Therefore, note that Vjet=Vbulk/kori in the headloss equa.
V_FlocEntryOrifice := (2*ED_FlocEntryOrifice*sqrt(Q_Plant)/K_Exp)^(2/7)
# Minor head loss
HL_FlocEntryOrifice := K_Exp*(V_FlocEntryOrifice/Pi_VenaContractaOrifice)^2/(2*g)
# Areas of entrance (to flocculator):
A_FlocEntry := A_Port(Pi_SedCell, K_Exp, Q_Plant, ED_FlocEntryOrifice, Pi_VenaContractaOrifice)
# If entrance has a circular orifice:
D_FlocEntryOrifice := sqrt(4*A_FlocEntry/π)
# If entrance has a rectangular orifice:
L_FlocEntryOrifice := W_FlocChannel  # Length of orifice must be equal to width of baffles
W_FlocEntryOrifice := A_FlocEntry/L_FlocEntryOrifice  # Height of Orifice
# Calculating: Entrance Tank Orifice
A_EtOrifice := A_orifice(HW_EtMax, Pi_VenaContractaOrifice, Q_Plant)
b := 0 .. 200  # Not included in VNG
W_EtOrifice[b] := (0.1 + b/10)*cm  # Not included in VNG
L_trueET := A_EtOrifice/W_EtOrifice  # Not included in VNG
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# If the flow rate decreased significantly for the height/head to fall from 20cm to WtrueET/2 (this being the minimum height/head allowed) that plant would operate at this percentage of its max capacity:
# Since the orifice has to be submerged at all times,use half of the rectangular orifice's width.
# Talk to Nadia  about what value of W.EtOrifice was chosen
HW_EtMin := W_EtOrifice/2
# This incorporates an array. How is this used?
# Ratio of the minimum flow divided by the maximum flow through the plant.
Pi_EtFlow := Pi_VenaContractaOrifice*A_EtOrifice*sqrt(2*g*HW_EtMin)/Q_Plant
heightratio := W_EtOrifice/HW_EtMax
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# We would like to be able to accurately dose when the flow rate is 20% of the maximum flow.
Pi_EtFlow[15] =  # error
# This corresponds to a height ratio of: | Should this be included in the VNG? Renamed?
heightratio[15] =  # error
# The orifice width is computed:
W_EtOrificeUsed := heightratio[15]*HW_EtMax  # Not added because of above issues
# And the length is found to be:
L_EtOrificeUsed := A_EtOrifice/W_EtOrificeUsed  # Not added because of above issues
# Calculating the upper and lower channel dimenions
# Minor Loss coefficient for the water flowing over the water fall weir, prior to orifice mixing.
# What is this??? Rename to K.rm??
# Has NOT been added to other file
K_RapidMix := 1.3
# Width of Upper Channel equal to spacing of first baffle in the flocculator
W_EtChannel := S_FlocBaffle[0]
# critical depth over water fall
# What is the waterfall?
# Name changed from y.crit
HW_EtCrit := ((Q_Plant/W_EtChannel)^2/g)^(1/3)
A_EtChannelWater := HW_EtCrit*W_EtChannel  # Cross sectional area of upper channel flow at critical depth pt.
V_EtChannel := Q_Plant/A_EtChannelWater
# Height of second waterfall based on critical depth at edge and minor loss coefficient of 1.3
# What is the waterfall?
HW_EtChannel := K_RapidMix*V_EtChannel^2/(2*g)
# Unclear what's going on in this section.
# None of these variables were addded
# Calculating Height at the back of the Upper Channel
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S_f(f, V, R_h) := f*V^2/(8*g*R_h)  # slope of water level in channel
roughness := 0.014 mm  # This is the roughness of concrete and should already be defied as ε...
# DIRECT STEP METHOD- assuming subcritical flow
HW_channel(y, w, Q, L, ε, ν) :=
    dely ← 0.0001 cm
    x_total ← L
    while x_total > 0*cm
        V_Channel1 ← Q/(y*w)
        V_Channel2 ← Q/((y + dely)*w)
        delx ← (-dely + V_Channel1^2/(2*g) - V_Channel2^2/(2*g))/S_f(f_rect(Q, y, w, ν, ε), V_Channel1, R_h(y, w))
        y ← y + dely
        x_total ← x_total + delx
    return y
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HW_EtWaterFall := HW_channel(HW_EtCrit, W_EtChannel, Q_Plant, L_EtOrificeUsed, roughness, Nu_Water)
# Calculating: Height of water at entrance tank
# Assumptions based on master mathCAD file for Gracias Plant:
HW_EtTotal := HW_EtMax + HL_FlocEntryOrifice + HL_Floc + HW_Sed + HW_EtWaterFall + HW_EtChannel
# HW.EtWaterFall not defined in VNG
# Calculating: Size of Entrance Tank
A_Et := Q_Plant/V_EtUp
L_Et := L_Sed
W_Et := max(A_Et/L_Et, W_EtChannel)  # How Wide does this actually have to be?
H_Et := HW_EtTotal + H_PlantFreeboard
# Calculating: Size of Alum Stock Tank
Q_AlumStockMax := Q_Plant*C_FcmDoseMax/C_FcmAlum = L/min
Vol_Stock := Q_AlumStockMax*Ti_StockMin  # Currently defined in VNG as the volume of the stock tank IN the FCM. Is this correct?
