# Sed Tank Functions
# Calculate number of Sed Tanks
Q_SedManifoldMax := Q_PipeED(ED_SedInlet, innerdiameter(ND_SedManifoldMax, PS_Default), Pi_VenaContractaOrifice, Pi_Jet)
Q_SedManifoldMin := Q_PipeED(ED_SedInlet, innerdiameter(ND_SedManifoldMin, PS_Default), Pi_VenaContractaOrifice, Pi_Jet)
N_SedTanks(Q_Plant) := max(min(ceil(Q_Plant/Q_PipeED(ED_SedInlet, innerdiameter(ND_SedManifoldMin, PS_Default), Pi_VenaContractaOrifice, Pi_Jet)), N_SedTanksMin), ceil(Q_Plant/(2*Q_PipeED(ED_SedInlet, innerdiameter(ND_SedManifoldMax, PS_Default), Pi_VenaContractaOrifice, Pi_Jet))))
# All other calculations are based on Plant Flow Rate
Q_Sed(Q_Plant) := Q_Plant/N_SedTanks(Q_Plant)
L_SedUpflowMax := Q_SedManifoldMax/(V_SedUpBod*W_SedBay) = 5.57621 m
N_SedBaysTotal(Q_Plant) := ceil(Q_Plant/(V_SedUpBod*W_SedBay*L_SedUpflowMax))
N_SedBaysMin(Q_Plant) := ceil(ceil(Q_Plant/(V_SedUpBod*W_SedBay*L_SedUpflowMax))/N_SedTanks(Q_Plant))
N_SedBaysEst(Q_Plant) := min(ceil(Q_Plant/(ceil(ceil(Q_Plant/(V_SedUpBod*W_SedBay*L_SedUpflowMax))/N_SedTanks(Q_Plant))*Q_SedManifoldMax)), 2)
N_SedBays(Q_Plant) := max(N_SedBaysMin(Q_Plant), N_SedBaysEst(Q_Plant))
Q_SedBay(Q_Plant) := Q_Plant/N_SedTanks(Q_Plant)/N_SedBays(Q_Plant)
ND_SedManifold(Q_Plant) := NominalDiameter(D_PipeED(ED_SedInlet, Q_SedBay(Q_Plant), Pi_VenaContractaOrifice, Pi_Jet), PS_Default)
A_SedInletChannelED(Q_Plant) := A_Channel(Q_Plant, ED_SedInlet, Pi_VenaContractaOrifice, Pi_Jet)
W_SedInletChannelPlumbing(Q_Plant) := 2*ConRadius(ND_SedManifold(Q_Plant)) + 2*S_Fitting
L_SedUpflowEst(Q_Plant) := Q_SedBay(Q_Plant)/(W_SedBay*V_SedUpBod)
ND_SedLaunder(Q_Plant) := ND_Manifold(Q_SedBay(Q_Plant), HL_SedLaunderBod, L_SedUpflowEst(Q_Plant), Pi_QLaunderOrifices, PS_Default, Nu_Water, E_Pvc, K_PipeExit, 2*floor(L_SedUpflowEst(Q_Plant)/B_SedLaunderOrificesEst))
W_Sed(Q_Plant) := N_SedBays(Q_Plant)*W_SedBay
L_SedChannel(Q_Plant) := N_SedTanks(Q_Plant)*W_Sed(Q_Plant) + (N_SedTanks(Q_Plant) - 1)*T_SedWallDivider + T_PlantWall - T_SedWallDivider
HL_SedWeirExit(Q_Plant) := Headloss_weir(Q_Plant, L_SedChannel(Q_Plant))
HW_SedInletChannelPlumbing(Q_Plant) := HL_SedLaunderBod + 2*ConRadius(ND_SedLaunder(Q_Plant)) + S_Fitting + HL_SedWeirExit(Q_Plant)
W_SedInletChannelPreWeir(Q_Plant) :=
    W ← W_SedInletChannelPlumbing(Q_Plant)
    HW ← HW_SedInletChannelPlumbing(Q_Plant)
    while W*HW < A_SedInletChannelED(Q_Plant)
        HW ← HW + 1 mm if HW < W
        W ← W + 1 mm otherwise
    return W
HW_SedInletChannel(Q_Plant) :=
    W ← W_SedInletChannelPlumbing(Q_Plant)
    HW ← HW_SedInletChannelPlumbing(Q_Plant)
    while W*HW < A_SedInletChannelED(Q_Plant)
        HW ← HW + 1 mm if HW < W
        W ← W + 1 mm otherwise
    return HW
H_SedInletChannel(Q_Plant) := HW_SedInletChannel(Q_Plant) + H_PlantFreeboard
EN_InletChannelGeom(Q_Plant) :=
    hl_weir ← Headloss_weir(Q_Plant, W_SedInletChannelPreWeir(Q_Plant))
    Geom_Channel ← Perpendicular_Weir if (hl_weir ≤ HL_SedWeirMax)
    Geom_Channel ← Parallel_Weir otherwise
    return Geom_Channel
W_SedWeirInlet(Q_Plant) :=
    W_SedInletChannelPreWeir(Q_Plant) if EN_InletChannelGeom(Q_Plant) == Perpendicular_Weir
    L_SedChannel(Q_Plant) otherwise
HL_SedWeirInlet(Q_Plant) := Headloss_weir(Q_Plant, W_SedWeirInlet(Q_Plant))
H_SedWeirInlet(Q_Plant) := HW_SedInletChannel(Q_Plant) - HL_SedWeirInlet(Q_Plant)
W_SedInletChannelPostWeir(Q_Plant) := max(W_ChannelMin, W_HorizChannel(Q_Plant, H_SedWeirInlet(Q_Plant), HL_ChannelMax, L_SedChannel(Q_Plant), Nu_Water, E_Concrete, 1))
W_SedInletChannel(Q_Plant) :=
    W_SedInletChannelPreWeir(Q_Plant) if EN_InletChannelGeom(Q_Plant) == Perpendicular_Weir
    W_SedInletChannelPreWeir(Q_Plant) + T_SedWeir + W_SedInletChannelPostWeir(Q_Plant) if EN_InletChannelGeom(Q_Plant) == Parallel_Weir
L_FiEntrancePipeEst(Q_Plant) := W_DCWalkway + W_SedInletChannel(Q_Plant) + 1 m
ND_FiEntrancePipeMax(Q_Plant) := FloorNearest(Pipesizes[index(FloorNearest(W_SedBay/2 - ConRadius(ND_SedManifold(Q_Plant)) - 2*S_Fitting, Pipesizes[:, 1]), Pipesizes[:, 1]), 0], AvailND)
ND_FiEntrancePipe(Q_Plant) := min(D_pipeschedule(min(Q_Plant, Q_pipetotal(innerdiameter(AvailND[last(AvailND)], PS_Default), HL_FiEntrancePipeMax, L_FiEntrancePipeEst(Q_Plant), Nu_Water, E_Pvc, K_FiEntrancePipe)), PS_Default, HL_FiEntrancePipeMax, L_FiEntrancePipeEst(Q_Plant), Nu_Water, E_Pvc, K_FiEntrancePipe), ND_FiEntrancePipeMax(Q_Plant))
HW_SedExitChannel(Q_Plant) := HW_SedInletChannel(Q_Plant) - HL_SedLaunderBod
W_SedExitChannelPreWeir(Q_Plant) := max(W_HorizChannel(Q_Plant, HW_SedExitChannel(Q_Plant), HL_ChannelMax, L_SedChannel(Q_Plant), Nu_Water, E_Concrete, 1), W_ChannelMin, CapHeight(ND_SedLaunder(Q_Plant)) + 1.05*L_SedLaunderCapExcess)
N_FiEntrancePipes(Q_Plant) := ceil(Q_Plant/Q_pipetotal(innerdiameter(ND_FiEntrancePipe(Q_Plant), PS_Default), HL_FiEntrancePipeMax, L_FiEntrancePipeEst(Q_Plant), Nu_Water, E_Pvc, K_FiEntrancePipe))
W_SedExitChannelPostWeir(Q_Plant) := max(2*ConRadius(ND_FiEntrancePipe(Q_Plant))*(N_FiEntrancePipes(Q_Plant) > 1), W_ChannelMin, W_HorizChannel(Q_Plant, H_SedWeirInlet(Q_Plant), HL_ChannelMax, L_SedChannel(Q_Plant) - W_SedBay/2, Nu_Water, E_Concrete, 1))
W_SedExitChannel(Q_Plant) := W_SedExitChannelPreWeir(Q_Plant) + T_SedWeir + W_SedExitChannelPostWeir(Q_Plant)
L_SedHopper(Q_Plant) := W_SedExitChannel(Q_Plant) + T_SedWeir + W_SedInletChannel(Q_Plant) + T_ChannelWall + 2*T_ConcreteMin
H_SedWeirExit(Q_Plant) := HW_SedExitChannel(Q_Plant) - HL_SedWeirExit(Q_Plant)
H_LamellaToLaunder(Q_Plant) := T_ConcreteMin + CapThickness(ND_SedLaunder(Q_Plant))
L_SedUpflow(Q_Plant) :=
    i ← 0
    L ← 0 m
    while L < L_SedUpflowEst(Q_Plant)
        i ← i + 1
        L ← (H_SedWeirExit(Q_Plant) + T_ChannelWall - outerdiameter(ND_SedLaunder(Q_Plant)) - H_LamellaToLaunder(Q_Plant) - T_SedPlate*cos(AN_SedPlate))/tan(AN_SedPlate) + T_SedPlate/sin(AN_SedPlate) + (PlateIndex[i] - 1)*B_SedPlate/sin(AN_SedPlate) - 2*T_ConcreteMin
    return L
L_Sed(Q_Plant) := L_SedHopper(Q_Plant) + L_SedUpflow(Q_Plant)
