A_pipe := A_pipes(EN_PipeSpec)
Q_pipe := Q_pipes(ED_SedInlet, A_pipe, Pi_VenaContractaOrifice)
# Sedimentation Influent Manifold Program
# The maximum allowable pipe used for the influent manifold
ND_SedManifoldMax =  # error: This variable is undefined.
Manifold_maxindex := findindexID(ND_SedManifoldMax, EN_PipeSpec) = 8
A_SedManifoldPipeMax := A_pipe[Manifold_maxindex]
# This is the maximum possible length of a sedimentation tank for the maximum pipe size
L_SedMax := Q_pipe[Manifold_maxindex]/(V_SedUpBod*W_SedBay) = 18.2279 m
Q_Sed := Q_Plant/N_SedTanks = 25 L/s  # Flow rate through one sed tank
# This is the minimum number of bays required for the entire plant
N_SedBaysTotal := ceil(Q_Plant/(V_SedUpBod*W_SedBay*L_SedMax)) = 4
N_SedBaysMin := ceil(N_SedBaysTotal/N_SedTanks) = 2
# The number of bays per tank is the maximum of the calculated value and the user input
N_SedBays := max(N_SedBaysMin, N_SedBaysEst) = 2
L_SedEst := Q_Sed/(W_SedBay*N_SedBays*V_SedUpBod) = 15.625 m
W_Sed := N_SedBays*W_SedBay = 2 m
Q_SedBay := Q_Sed/N_SedBays = 12.5 L/s
Q_SedManifold := Q_SedBay = 12.5 L/s  # There is one manifold per bay
Manifold_index := findindexQ(Q_SedManifold, Q_pipe)
Q_SedManifoldcapacity := Q_pipe[Manifold_index] = 14.5823 L/s
A_SedManifoldPipe := A_pipe[Manifold_index]
ND_SedManifold := NominalDiameter(2*sqrt(A_SedManifoldPipe/π), EN_PipeSpec)
ID_SedManifoldPipe := innerdiameter(ND_SedManifold, EN_PipeSpec) = 0.211557 m
OD_SedManifoldPipe := outerdiameter(ND_SedManifold) = 0.219075 m
S_SedManifoldBetween := V_SedUpBod*W_SedBay/(2*V_Scour) = 0.4 cm
# Inlet Channel Design
L_Channel := N_SedTanks*W_Sed + (N_SedTanks + 1)*T_PlantWall  # Length of the Inlet Channel
# The area of the inlet channel must be large enough not to break up flocs
A_InletChannel := A_Channel(Q_Plant, ED_SedInlet, Pi_VenaContractaOrifice)
# We want to make both channels the same depth for ease of construction. The exit channel must be deep enough to receive the launders. So we do a good estimate on the size of the launders and make the channel deep enough to receive the launder pipe (without embedding the launder pipe in the concrete channel floor!)
# This is a very slightly conservative estimate on the size of the launder. Close enough that there is no need to recalcualte this diameter.
ND_SedLaunder := ND_Manifold(Q_SedBay/N_SedLaunders, HL_SedLaunderBod, L_SedEst, Pi_QLaunderOrifices, EN_PipeSpec, Nu_Water, E_Pvc, K_PipeExit, 2*floor(L_SedEst/B_SedLaunderOrificesEst)) = 8 in
OD_LaunderCoupling := 2*ConRadius(vlookup(outerdiameter(ND_SedLaunder), Pipesizescoupling, 1)[0])
HW_InletChannel := max(H_Channel(Q_Plant, sqrt(A_InletChannel), Pi_VenaContractaOrifice, ED_SedInlet), HL_SedLaunderBod + OD_LaunderCoupling + T_ConcreteMin) = 0.35289 m
# This is the required width of the inlet channel in order to prevent floc breakup
W_InletChannelED := A_InletChannel/HW_InletChannel = 0.268924 m
ND_SedManifoldEntrance := ND_SedManifold = 8 in  # The inlet pipe is set to be the same as the manifold pipe
D_SedManifoldEntrance := innerdiameter(ND_SedManifoldEntrance, EN_PipeSpec) = 0.211557 m
# This variable shouldn't be needed anymore.
A_SedChimneyPipe := (D_SedManifoldEntrance/2)^2*π = 0.0351514 m^2
# This is the minimum width of the inlet channel in order to fit the coupling of the manifold entrance pipe.  The diameter of a cap is being used as an estimate for the outer diameter of the coupling socket for now
W_InletChannelCoupling := 2*ConRadius(vlookup(OD_SedManifoldPipe, Pipesizescoupling, 1)[0]) + 2*S_SedInletChannelMin = 32.289 cm
W_InletChannelEst := max(W_InletChannelED, W_InletChannelCoupling) = 0.32289 m
# Why is this an estimated value? Is it because the weir will eventually make the channel wider?
Geom_InletChannel :=
    hl_weir ← Headloss_weir(Q_Plant, W_InletChannelEst)
    Geom_Channel ← Perpindicular_Weir if (hl_weir ≤ HL_SedWeirMax)
    Geom_Channel ← Parallel_Weir otherwise
    return Geom_Channel
    = 1
EN_InletChannelGeom := Geom_InletChannel
W_SedWeirInlet :=
    W_InletChannelEst if Geom_InletChannel == Perpindicular_Weir
    L_Channel otherwise
    = 4.45 m
HL_SedWeirInlet := Headloss_weir(Q_Plant, W_SedWeirInlet) = 0.0331683 m
H_SedWeirInlet := HW_InletChannel - HL_SedWeirInlet = 0.319722 m
W_InletChannel :=
    W_SedWeirInlet if Geom_InletChannel == Perpindicular_Weir
    w_minchannelHL(H_SedWeirInlet, HW_InletChannel, Q_Plant, L_Channel, Nu_Water, E_Concrete, 1, HL_SedWeirInlet) + T_SedWeir + W_InletChannelEst if Geom_InletChannel == Parallel_Weir
    = 0.506995 m
H_InletChannel := HW_InletChannel + H_PlantFreeboard = 0.45289 m
V_InletChannel := Q_Plant/(W_InletChannel*HW_InletChannel) = 0.279465 m/s
# Exit Channel Design
L_ExitChannel := L_Channel = 4.45 m
# To ensure uniform distribution of flow between tank bays, head loss in the channel was designed to be twenty times smaller than head loss in the launder. After converting from head loss to flow, the ratio of flow rates in the launders is calculated to be sqrt(20/21)
Π_QSedTanks := sqrt(20/21)
# The exit channel needs to at least be wide enough to fit a cap onto the launders
W_ExitChannelMin := 10 in  # This should be in the expert inputs.
H_ExitChannel := H_InletChannel
HW_ExitChannel := HW_InletChannel - HL_SedLaunderBod
FindSide(Q, L, υ, ε, open) :=
    b ← W_InletChannel
    w ← b
    error ← 1
    while error > 0.001
        h_temp ← h_frect(Q, w, b, L, υ, ε, open)
        b ← b*(h_temp/HL_SedLaunderBod*Π_QSedTanks^2/(1 - Π_QSedTanks^2))^(1/4)
        w ← b
        error ← |h_temp/HL_SedLaunderBod - (1 - Π_QSedTanks^2)/Π_QSedTanks^2|
    return w
# The exit channel is design by assuming the weir geometry is a perpindicular weir, and then the maximum of the the width determined by the headloss in the exit channel and the minimum width to be albe to fit a cap on the launders is chosen
W_ExitChannelEst := max(FindSide(Q_Plant, L_Channel, Nu_Water, E_Concrete, 1), W_ExitChannelMin) = 0.362248 m
Geom_ExitChannel :=
    hl_weir ← Headloss_weir(Q_Plant, W_ExitChannelEst)
    Geom_Channel ← Perpindicular_Weir if (hl_weir ≤ HL_SedWeirMax)
    Geom_Channel ← Parallel_Weir otherwise
    return Geom_Channel
    = 1
W_SedWeirExit :=
    W_ExitChannelEst if Geom_ExitChannel == Perpindicular_Weir
    L_Channel otherwise
    = 4.45 m
HL_SedWeirExit := Headloss_weir(Q_Plant, W_SedWeirExit) = 3.31683 cm
H_SedWeirExit := HW_ExitChannel - HL_SedWeirExit = 27.9722 cm
W_ExitChannel :=
    W_SedWeirExit if Geom_ExitChannel == Perpindicular_Weir
    (W_ExitChannelMin + T_SedWeir + w_minchannelHL(H_SedWeirExit, HW_ExitChannel, Q_Plant, L_Channel, Nu_Water, E_Concrete, 1, HL_SedWeirExit)) otherwise
    = 0.451132 m
# Lamella Design
# S is the distance from the faces of each plate
S_SedPlate := B_SedPlateMin - T_SedPlate = 2.5 cm
# Estimate a length of the lamella based on the estimate of the up velocity and of the height between the top of the the lamella and the bottom of the inlet channel.
L_SedPlateEst :=
    L1 ← (B_SedPlateMin*(V_SedUpBod/V_SedCBod - 1) + T_SedPlate)/(sin(AN_SedPlate)*cos(AN_SedPlate))
    L2 ← 0 m
    L_SedLaunder ← L_SedEst - T_ChannelWall - W_InletChannel - W_ExitChannel
    N_SedLaunderOrifices ← floor(L_SedLaunder/B_SedLaunderOrificesEst)
    H_SedAboveEst ← 15 cm
    H_between ← H_InletChannel + T_ChannelWall - outerdiameter(ND_SedLaunder) - H_SedAboveEst - S_LamellaLaunder
    while |L1 - L2| > 0.01 m
        L_Inactive ← H_between/tan(AN_SedPlate) + W_InletChannel + W_ExitChannel + 2*T_ChannelWall
        V_Up ← Q_Sed/(W_Sed*(L_SedEst - L_Inactive))
        L2 ← L1
        L1 ← (B_SedPlateMin*(V_Up/V_SedCBod - 1) + T_SedPlate)/(sin(AN_SedPlate)*cos(AN_SedPlate))
    return L1
# The actual function L.Sed.Plate does not realize any iteration, it gives the same result as the following equation.
# Calculate the actual length of the lamella
L_SedPlate := L_SedPlateSheet/floor(L_SedPlateSheet/L_SedPlateEst) = 0.4572 m
# Distance from the wall to the vertical pipe of the main plate settler support frame
B_SedPlateFrameVertical := 10 cm  # These parameters go into the expert inputs. They need to be clearly defined.
# Diameter of Flange
D_Flange := 6 in
L_SedInactiveEst := L_SedPlate*cos(AN_SedPlate) + W_InletChannel + W_ExitChannel + 2*T_ChannelWall
L_SedInactiveEst1 :=
    L_SedLaunder ← L_SedEst - T_ChannelWall - W_InletChannel - W_ExitChannel
    N_SedLaunderOrifices ← floor(L_SedLaunder/B_SedLaunderOrificesEst)
    ND_SedLaunder ← ND_Manifold(Q_SedBay/N_SedLaunders, HL_SedLaunderBod, L_SedLaunder, Pi_QLaunderOrifices, EN_PipeSpec, Nu_Water, E_Pvc, K_PipeExit, N_SedLaunderOrifices)
    H_SedAboveEst ← 15 cm
    H_between ← H_InletChannel + T_ChannelWall - outerdiameter(ND_SedLaunder) - H_SedAboveEst - S_LamellaLaunder
    L_Inactive ← H_between/tan(AN_SedPlate) + W_InletChannel + W_ExitChannel + 2*T_ChannelWall
    return L_Inactive
H_SedPlate := L_SedPlate*sin(AN_SedPlate) = 0.395947 m
# Launder Hydraulic Calculations
L_SedLaunderEst := L_SedEst - T_ChannelWall - W_InletChannel - W_ExitChannel = 14.5169 m
# There will be two orifices per row along the active length of the launder
N_SedLaunderOrificesEst := 2*floor((L_SedEst - L_SedInactiveEst)/B_SedLaunderOrificesEst) = 282
Q_SedLaunderOrificesEst := (Q_SedBay/N_SedLaunders)/N_SedLaunderOrificesEst = 44.3262 cm^3/s
# This the HL due to major & minor losses loses
HL_SedLaunderEst := HL_Manifold(Q_SedBay/N_SedLaunders, innerdiameter(ND_SedLaunder, EN_PipeSpec), L_SedEst - L_SedInactiveEst, 0, Nu_Water, E_Pvc, N_SedLaunderOrificesEst) + h_f(Q_SedBay/N_SedLaunders, innerdiameter(ND_SedLaunder, EN_PipeSpec), L_SedInactiveEst, Nu_Water, E_Pvc) = 0.00407518 m
HL_SedLaunderOrifice := HL_SedLaunderBod - HL_SedLaunderEst = 0.0359248 m
D_SedLaunderOrifice := RoundNearest(D_circle(A_orifice(HL_SedLaunderOrifice, Pi_VenaContractaOrifice, Q_SedLaunderOrificesEst)), D_Drill) = 0.01 m
Q_SedLaunderOrifices := Q_orifice(D_SedLaunderOrifice, HL_SedLaunderOrifice, Pi_VenaContractaOrifice) = 4.15339e-5 m^3/s
A_orifice(HL_SedLaunderOrifice, Pi_VenaContractaOrifice, Q_SedLaunderOrificesEst) =  # error
# This is the total headloss through the launder based on the actual diameter of the orifices
HL_SedLaunder := h_orifice(D_SedLaunderOrifice, Pi_VenaContractaOrifice, Q_SedLaunderOrifices) = 0.0359248 m
# H.SedAbove is the height needed above the lamella
H_SedAbove := outerdiameter(ND_SedLaunder) + HL_SedLaunder = 0.255 m
# Adjustment of the plate settlers
L_SedActiveEst := L_SedEst - L_SedInactiveEst + (H_SedPlate + H_SedAbove + H_PlantFreeboard - H_ExitChannel - T_PlantWall)/tan(AN_SedPlate) = 14.2238 m
B_SedPlateHorizontal := B_SedPlateMin/sin(AN_SedPlate)  # The center to center horizontal distance between the lamella sheets
N_SedPlatesEst := floor(L_SedActiveEst/B_SedPlateHorizontal) = 439
# Number of spaces where water is traveling is one less than the number of plates used to create those spaces
# This part of the code serves to draw the module pipe for the plate settlers.
ND_SedModulePipe =  # error  # This is the diameter of the pipe used to hold the lamina together
ND_SedModulePipeSpace =  # error  # This is the diameter of the ledge that serves as a ledge for the plate setter to lie on.
# In order to understand the meaning of each value please refer to the autocad drawing Lamina.Explanation
S_SedModulePipesMin := 2/3*L_SedPlate = 0.3048 m
N_SedModulePlates := floor(((L_SedPlate - 2*outerdiameter(ND_SedModulePipe) - S_SedModulePipesMin - 2*S_SedPlateModuleMin)*tan(AN_SedPlate) + S_SedPlate)/(T_SedPlate + S_SedPlate)) = 5
# This is the number of plates per module.
L_SedModulePipe := (N_SedModulePlates*(T_SedPlate + S_SedPlate) - S_SedPlate) = 0.115 m  # This is the length of a sed module pipe.
S_SedModulePipes := L_SedPlate - 2*outerdiameter(ND_SedModulePipe) - 2*S_SedPlateModuleMin - L_SedModulePipe/tan(AN_SedPlate) = 0.308133 m
# This is the actual spacing between the pipes.
N_SedModules := ceil(N_SedPlatesEst/N_SedModulePlates) = 88
N_SedPlates := N_SedModules*N_SedModulePlates = 440
L_Sed := L_SedEst + (N_SedPlates - N_SedPlatesEst)*B_SedPlateHorizontal = 15.6573 m
L_SedActive := (N_SedPlates - 1)*B_SedPlateHorizontal = 14.1936 m
L_SedInactive := L_Sed - L_SedActive = 1.46375 m
# The length of the active sed tank where water actually flow
L_SedActive1 := L_SedActive - N_SedPlates*T_SedPlate/sin(AN_SedPlate) = 12.6694 m
V_SedUp := Q_Sed/(L_Sed*W_Sed) = 68.9773 m/day
V_SedUpActive := Q_Sed/(L_SedActive1*W_Sed) = 85.2449 m/day
V_SedC := V_SedUpActive/(1 + L_SedPlate/S_SedPlate*cos(AN_SedPlate)*sin(AN_SedPlate)) = 9.55775 m/day
# Thickness of Flange | What is this? Appears to be an error.
T_Flange := -1 cm
ND_SedFrameStub := 1/2*in
# Height of stub supporting plate settler modules
H_SedFrameStub := (B_SedPlateHorizontal - outerdiameter(ND_SedFrameStub))*tan(AN_SedPlate)
B_SedFrameStub := B_SedPlateHorizontal*N_SedModulePlates
# Design paramaters for orifices in launder
# This is the number of rows of orifices.  There are two orifices per row
N_SedLaunderOrificesRow := ceil((Q_SedBay/N_SedLaunders)/(2*Q_SedLaunderOrifices)) = 151
# Total number of orifices on the launder
N_SedLaunderOrifices := N_SedLaunderOrificesRow*2 = 302
B_SedLaunderOrifices := 2*L_SedActive/N_SedLaunderOrifices = 9.39972 cm
L_SedLaunder := L_Sed - 2*T_ChannelWall - CapHeight(ND_SedLaunder) - W_InletChannel - W_ExitChannel = 14.2373 m
# Design paramaters for orifices in inlet manifold
# This portion of the code helps us calculate the number of ports in the inlet manifold. The basis is that there is no ports under the elbow socket depth and the first port is spaced B.SedManifoldPorts/2 from the socket depth. Hence the available length for the ports is L.Pipe-SocketDepth-B/2
# It might be better to add ports in the elbow! We want flow in that end of the sed tank too.
L_SedManifoldPipe := L_Sed - W_InletChannelEst/2 - CapHeight(ND_SedManifold) = 15.334 m
# The number of ports per manifold calculated from the actual sed length
N_SedManifoldPorts := floor(((L_SedManifoldPipe - ElbowRadius(ND_SedManifold) - SocketDepth(ND_SedManifold)) - B_SedManifoldPortEst)/B_SedManifoldPortEst) = 148
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Q_SedManifoldPort := Q_SedBay/N_SedManifoldPorts = 0.0844595 L/s
D_SedManifoldPortEst := (Q_SedManifoldPort/(ED_SedInlet^(1/3)*Pi_VenaContractaOrifice^(7/6))*4*0.34/π)^(3/7) = 3.28232 cm
D_SedManifoldPort := CeilNearest(D_SedManifoldPortEst, D_Drill) = 3.4 cm  # The diameter of a single port
A_SedManifoldPort := A_circle(D_SedManifoldPort)  # The area of a single port
# Calculate the energy dissipation rate created by the port. We will use this to evaluate this design.
ED_SedManifoldPort := ED(Q_SedManifoldPort, A_SedManifoldPort, Pi_VenaContractaOrifice) = 5.34228 mW/kg
B_SedManifoldPort := B_SedManifoldPortEst = 10 cm
# Sludge Drain Program
# Here we are assuming that we are willing to use up to 50% of the available energy to get the flow through the valve and discharge it to atmosphere.
HL_Valve := 0.5*HW_SedEst
# This is the initial drain rate
# The factor of two is because the flow rate decreases linearly as the tank drain (for a constant cross section tank). Thus the average drain rate is 1/2 the initial drain rate.
Q_SedSludgeDrain := 2*W_SedBay*L_Sed*HW_SedEst/Ti_SludgeDrain = 0.0347941 m^3/s
# There will be a drain orifice in between each manifold port
B_SedSludgeOrifices := B_SedManifoldPort
N_SedSludgeOrifices := floor(L_Sed/B_SedSludgeOrifices) = 156  # per bay
Q_SedSludgeOrifices := Q_SedSludgeDrain/N_SedSludgeOrifices
ND_SedSludgeValve := D_pipeschedule(Q_SedSludgeDrain, EN_PipeSpec, HL_Valve, 0.01 m, Nu_Water, E_Pvc, K_PipeExit + K_GateValve) = 6 in
# The pipe length in this equation is irrelevant. Minor losses dominate
# This is the actual head loss through the valve given its diameter
HL_SedDrainValve := h_e(Q_SedSludgeDrain, innerdiameter(ND_SedSludgeValve, EN_PipeSpec), K_GateValve + K_PipeExit) = 0.204621 m
HL_SludgeDrain := HW_SedEst - HL_SedDrainValve = 1.79538 m
# This is the required diameter of the sludge drain if it were circular
D_SedSludge := D_Manifold(Q_SedSludgeDrain, HL_SludgeDrain, L_Sed, Pi_QSludgeOrifices, Nu_Water, E_Concrete, 0, N_SedSludgeOrifices) = 5.88862 in
HL_SedSludgeEst := HL_Manifold(Q_SedSludgeDrain, D_SedSludge, L_Sed, 0, Nu_Water, E_Concrete, N_SedSludgeOrifices) = 29.7264 cm
HL_SedSludgeOrificeEst := HL_SludgeDrain - HL_SedSludgeEst = 149.811 cm
D_SedSludgeOrifice := RoundNearest(D_circle(A_orifice(HL_SedSludgeOrificeEst, Pi_VenaContractaOrifice, Q_SedSludgeOrifices)), D_Drill) = 9 mm
# The cross sectional area of the drain if it were circular
A_SedSludge := π/4*D_SedSludge^2
# Assume sludge drain is twice as wide as it is high (to save depth in the sed tank)
W_SedSludge := sqrt(2*A_SedSludge) = 18.746 cm
H_SedSludge := A_SedSludge/W_SedSludge = 9.37298 cm
# The width of the drain cover needs to rest on the ledge created by the drain
W_SedDrainCover := W_SedSludge + 2*T_ConcreteMin
T_SedSludge := T_ConcreteMin
# The elevation of the top of the sludge drain and drain cover
Z_SedSludge := T_SedSludge + H_SedSludge = 0.14373 m
# Sedimentation Components
# This is the width of the sloped part of the sed tank wall.  It will be used to calculate the elevation of the bay walls
W_SedSlope := (W_SedBay - W_SedDrainCover)/2 - T_ConcreteMin/2
W_SedInletBottom := (W_SedBay - W_SedDrainCover)/2 = 0.35627 m
H_SedSlopeTriangle := tan(AN_SedSlope)*W_SedSlope = 0.573777 m
# The elevation of the center of the manifold includes the minimum space between the outside of the manifold pipe and the drain cover
H_SedBetween := max(H_SedSlopeTriangle, ConRadius(ND_SedManifold) + 2*SocketDepth(ND_SedManifold) + ElbowRadius(ND_SedManifold)) - H_SedSlopeTriangle
Z_SedManifoldPipe := Z_SedSludge + (ConRadius(ND_SedManifold) + S_SedManifoldBetween) = 0.279175 m
# This variable should be renamed, but it may be used later by other code and so that needs to be fixed too.
Z_SedManifold := Z_SedManifoldPipe
# The elevation of the top of the sloped walls
Z_SedSlopes := Z_SedSludge + H_SedSlopeTriangle = 0.717507 m
# H.SedBetween is a user specified distance between the top of the sloped walls and the bottom of the pipefram (i.e. additional distance wanted for a floc blanket. The height of water in the sed tank is the sum of all of the heights of the components plus the additional specified space
HW_Sed := Z_SedSlopes + H_SedBetween + outerdiameter(ND_SedPlateFrame) + H_SedPlate + H_SedAbove + T_ConcreteMin + S_LamellaLaunder = 1.50671 m
H_Sed := HW_Sed + H_PlantFreeboard = 1.60671 m
# This was for the height of the "main platform". Is this still used?
Z_Mp := HW_Sed - HW_InletChannel = 1.15382 m
# The elevation of the launder
Z_SedLaunder := HW_Sed - HL_SedLaunder - outerradius(ND_SedLaunder) = 1.36125 m
H_SedBayDivider := Z_SedSlopes + H_SedBetween
Z_SedWeirExit := H_Sed - H_ExitChannel + H_SedWeirExit = 1.43354 m
# Launder Cap
# The size of the opening in the cap to allow the inflow of water into the sedimentation tank is determined by the Orifice Equation Q=A*K*(2*g*h)^.5 so that the flow rate through the cap is at most the flow rate out of the other sedimentation tanks.
HW_LaunderCap := H_Sed - H_ExitChannel + HW_ExitChannel = 1.46671 m
A_LaunderCapOrifice := Q_Sed/(Pi_VenaContractaOrifice*sqrt(2*g*HW_LaunderCap)) = 73.9863 cm^2
D_CapOrifice := RoundNearest(D_circle(A_orifice(h_orifice(sqrt(A_LaunderCapOrifice/(π/4)), Pi_VenaContractaOrifice, Q_SedBay/N_SedLaunders), Pi_VenaContractaOrifice, Q_SedBay/N_SedLaunders)), D_Drill) = 0.05 m
L_LaunderCouplingPipe := T_PlantWall + CapHeight(ND_SedLaunder)
# Using the pipe database file, and given the schedule of the pipe, the nominal diameter of the inlet and exit tank pipes are determined.  The headloss through the pipe is asumed to be the height of the sed tank.  The headloss is halved to be conservative. The inlet tank pipe is assumed to be the same as the exit tank pipe.
ND_PltWeir := D_pipeschedule(Q_Plant, EN_PipeSpec, H_Sed/2, H_Sed + L_Sed, Nu_Water, E_Pvc, 2*K_90 + 2*K_PipeExit) = 8 in
Del_PltWeirH := (3*Q_Plant/(2*Cd_PltWeir*sqrt(2*g)*π*ND_PltWeir))^(2/3) = 4.86879 in
H_PltWeir := HW_ExitChannel + H_PlantFreeboard/2 = 0.36289 m
# Sedimentation Drain Design
# This ensures that the coupling will not be larger than the drain channel
ND_SedDrainAdapter :=
    NominalDiameter(sqrt(1/Ti_SludgeDrain*(16*W_SedBay^1.5*tan(AN_SedPlate)^0.5*L_Sed/(π*3*sqrt(2*g)) + (sqrt(HW_Sed) - sqrt(W_SedBay/2*tan(AN_SedPlate)))/((π/(8*L_Sed*W_SedBay))*sqrt(2*g/(K_GateValve + K_Exp))))), EN_PipeSpec) if NominalDiameter(sqrt(1/Ti_SludgeDrain*(16*W_SedBay^1.5*tan(AN_SedPlate)^0.5*L_Sed/(π*3*sqrt(2*g)) + (sqrt(HW_Sed) - sqrt(W_SedBay/2*tan(AN_SedPlate)))/((π/(8*L_Sed*W_SedBay))*sqrt(2*g/(K_GateValve + K_Exp))))), EN_PipeSpec) ≤ W_SedSludge
    NominalDiameter(2*outerradius(W_SedSludge), EN_PipeSpec) otherwise
D_SedDrainValve := 2*outerradius(ND_SedDrainAdapter) = 3.5 in
# Uses the nominal valve size to calculate the actual valve size for drawing purposes.  D.SedValve is the OD of the coupling and ID of the valve.
H_SedSlope := D_SedDrainValve/2 = 0.04445 m
D_SedScale := D_SedDrainValve/(1.16 m) = 0.0766379
# This scale is due to the size of the orignal valve block that is being inserted and is based on the OUTER radius
