# Stacked Rapid Sand Filter
## Constraints and comments (not necessarily updated)
# Max head loss through inlet piping during filtration
# Max head loss through inlet piping during backwash
# Max head loss through outlet piping during filtration
# Max head loss through outlet piping during backwash (siphon)
# Max ratio of head loss in manifold to head loss through filter layer during filtration
# Max ratio of head loss in manifold to head loss through filter layer during filtration
# The head loss across each layer of the filter must be large compared to losses in the plumbing that distributes water into the sand bed, in order for the water to be distributed uniformly to each layer.  At the beginning of a filtration cycle when the sand bed is clean, the head loss is the smallest.  This minimum head loss during filtration is estimated by the Carman-Kozeny equation.
# Filtration mode constraints
# The inlet manifolds need to have a small piezometric head variation relative to the head loss through a clean sand bed. Given that both the trunk lines and the branches are short manifolds (fL/d < 1), the piezometric head variability is dominated by pressure recovery which is given by V^2/(2*g)*.  where the velocity is the initial velocity in the manifold. Thus the velocity in the trunk and branch lines is limited by this constraint. If we want to relax this constraint we could add head loss through the slots. But we need to be careful to not cause a flow imbalance between the inlets that carry flow for two layers and the inlets that carry flow for only one layer. Perhaps top inlet and bottom inlet should have only one line of slots per pipe instead of two lines. We are currently assuming that the backwash branches will have 1/2 the slot area of the branches in the other layers.
#
# Slot head loss issues
# If we use the slots to generate head loss in an effort to improve flow distribution, we need to account for sand blocking (1-ε) of the slots during filtration. The slots are not blocked during backwash (except perhaps during backwash initiation).
#
# Backwash mode constraints
# The  constraint on the design of the backwash manifold branches is that the flow rate from each slot must be close to the average (perhaps within 20%). We cannot rely on head loss through the filter media to help create uniform flow from the manifold during backwash because the filter bed will be fluidized. Thus we must design the backwash manifold to have uniform flow distribution without any external assistance. We can improve uniformity of flow distribution by decreasing head loss and pressure recovery in the manifold branches and in the trunk line and/or by increasing the head loss through the slots. The backwash system will also be used during filtration and the flow rate in the backwash manifold system will vary by a factor of 6 between those two states. Thus head loss through the slots will vary by a factor of 36 between the two states. We could use a relatively high slot head loss to get uniform flow distribution. The slot head loss must be small enough during filtration mode to not cause a flow inbalance between filter layers. That suggests that the slot head loss must be less than 10% of the clean bed head loss during filtration and thus less than 36 times that amount during backwash.
#
# Flow distribution in a short manifold is quite uniform for the case when the total port area is equal to or less than the manifold area. We have two manifold systems operating in series with trunk line distributing flow to branches and branches distributing flow to slots. Head loss through the slots effectively helps distribute flow between branches as well as between slots. Thus the constraints on both trunk and branch sizes are that they have pressure recovery terms that are small compared with the head loss through the slots.
# Algorithm for trunk, branch, slot design
# Head loss through the slots in the backwash manifold are directly related to the head loss throught the slots during filtration. The flow area during filtration will be reduced due to sand blocking. This results in a factor of ε_FiSand
# Calculate slot area for backwash assuming this head loss.
# Note that the slot area for backwash analysis should not be adjusted for sand porosity.
# Calculate size of branch lines using the rule that their area must exceed the port area.
# Given the area of the branch lines, recalculate the slot area by setting it equal to the branch area.
# Recalculate the actual head loss through the slots given this new slot area.
#
# Calculate the size of the trunk lines using the rule that their area must exceed the port area. Thus branches must have more area than the slots in a branch. Trunk must have more area than the branches.
# Sand layer thickness as function of trunk diameter
# round up to the nearest cm to make construction easier
H_FiLayerF(ND_Trunk) := max(H_FiLayerMin, Ceil(OD(ND_Trunk) + S_FiTrunkMin, 1 cm), Ceil(OD_Fitting(ND_Trunk), 1 cm), Ceil(FerncoOuterDiameter(ND_Trunk), 1 cm))
H_FiBottomLayerF(ND_Trunk, ND_BwTrunk) := max(H_FiLayerMin, Ceil(OR(ND_Trunk) + OR(ND_BwTrunk) + S_FiTrunkMin, 1 cm), Ceil(OR_Fitting(ND_Trunk) + OR_Fitting(ND_BwTrunk), 1 cm), Ceil(FerncoOuterDiameter(ND_Trunk)/2 + FerncoOuterDiameter(ND_BwTrunk)/2, 1 cm))
# Flow distribution constraint: ratio of pressure recovery to clean bed head loss
# There are three flow distribution problems in the filter design: distribution between the slots along a manifold branch, distribution between branches along a trunk, and distribution between filter layers. The first two are both addressed by making pressure recovery in the manifold (both trunks and branches) small relative to the short path head loss (head loss through the clean bed, since slot head loss in forward filtration is small). In backwash mode where there is no bed head loss, the pressure recovery in the manifold plumbing must be small relative to slot head loss.
#
# Head loss through the inlet and outlet plumbing differs for different layers both because the number of elbows varies and because the top and bottom inlets have 1/2 the flow of the middle two. Therefore good flow distribution between layers would be addressed by making head loss through the inlet and outlet plumbing small for all layers relative to clean bed head loss. We do not have an explicit constraint set for this, but the constraint on trunk diameter which gives good flow distribution within the manifolds seems to be sufficient to take care of it. As a check, see the analysis under the section "Path Head Loss Calculations and Flow Distribution Between Layers" below.
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Pi_FiManifoldQ := 0.85  # Ratio of long path flow to short path flow
Pi_FiManifoldHeadLoss := 1 - Pi_FiManifoldQ^2 = 0.2775
# Ratio of pressure recovery in the slotted pipes to the head loss through the clean bed (or through the slots in backwash mode)
# Even though the piezometric head profiles for the inlet and outlet manifolds on the middle layers may be parallel meaning that pressure recovery there need not be small for good distribution between sand bed flow paths, we still need pressure recovery to be small in the outlet manifolds in order to get good flow distribution in the top and bottom layers where the velocity in the manifolds is 1/2 and the pressure recovery 1/4 that of other layers (even smaller in the larger-diameter bottom manifold where velocity head is tiny).
# Numbers of filters
PR_FiManBranchEst := 0.8 cm
ND_FiBwTrunkMax := 8 in
HL_FiBwSlotsEst := 10 cm
PR_FiBwManifoldMax := HL_FiBwSlotsEst*Pi_FiManifoldHeadLoss
# First constraint: pressure recovery in trunks during forward filtration
HL_FiCleanLayerMin := h_lKozeny(H_FiLayerMin, D_FiSand60, V_FiLayer, ε_FiSand, Nu_Water)
V_FiManTrunkMaxPR := sqrt(2*g*(HL_FiCleanLayerMin*Pi_FiManifoldHeadLoss - PR_FiManBranchEst))
Q_FiPRTrunk := Round(π*IR(ND_FiTrunkMax, SDR_26)^2*V_FiManTrunkMaxPR*N_FiLayer/2, 1*L/s)
# Second constraint: pressure recovery in lowest trunk during backwash
V_FiBwManTrunkMaxPR := sqrt(2*g*(HL_FiBwSlotsEst*Pi_FiManifoldHeadLoss - PR_FiManBranchEst))
Q_FiPRBwTrunk := Round(π*IR(ND_FiBwTrunkMax, SDR_26)^2*V_FiBwManTrunkMaxPR, 1*L/s)
Q_FiMaxPR := min(Q_FiPRTrunk, Q_FiPRBwTrunk)
# The multiplier is 2 if the plant flow is less than the max filter flow (would result in one filter) but greater than two times the min filter flow. Two or more filters is preferred whenever possible for ease of achieving desired backwash flow rate through one at a time.
N_Fi := ceil(Q_Plant/Q_FiMaxPR)*(1 + (2*Q_FiMin < Q_Plant ≤ Q_FiMaxPR))
Q_Fi := Q_Plant/N_Fi
Q_FiLayer := Q_Fi/N_FiLayer
ND_FiTrunk := min(ND_FiTrunkMax, ND(CeilNearest(D_circle(2*Q_FiLayer/V_FiManTrunkMaxPR), AvailID(SDR_26)), SDR_26))
# Design assuming SDR 26 to be conservative and avoid looping
# Use the min function because the rounding in the previous step of selecting the max flow rate for pressure recovery can result in a filter flow rate slightly larger than the maximum for the max trunk diameter, but the max trunk diameter is still used in this case although it just barely violates the pressure recovery constraint.
ND_FiBwTrunk := min(ND_FiBwTrunkMax, ND(CeilNearest(D_circle(Q_Fi/V_FiBwManTrunkMaxPR), AvailID(SDR_26)), SDR_26))
PS_FiTrunk := SDR_26
PS_FiTrunkStr := PSToString(PS_FiTrunk)
PS_FiInletOutlet := PS_Decision(ND_FiTrunk)
PS_FiInletOutletStr := PSToString(PS_FiInletOutlet)
PS_FiBwInlet := SDR_41
PS_FiBwInletStr := PSToString(PS_FiBwInlet)
PR_FiForwardTrunk := (2*Q_FiLayer/(π*IR(ND_FiTrunk, PS_FiTrunk)^2))^2/(2*g)
PR_FiBwTrunk := (Q_Fi/(π*IR(ND_FiBwTrunk, PS_FiTrunk)^2))^2/(2*g)
H_FiLayer := H_FiLayerF(ND_FiTrunk)
H_FiBottomLayer := H_FiBottomLayerF(ND_FiTrunk, ND_FiBwTrunk)
# Clean bed head loss
HL_FiCleanLayer := h_lKozeny(H_FiLayer, D_FiSand60, V_FiLayer, ε_FiSand, Nu_Water)
HL_FiCleanBottomLayer := h_lKozeny(H_FiBottomLayer, D_FiSand60, V_FiLayer, ε_FiSand, Nu_Water)
# Auxilliary box widths and plumbing
# Plumbing
HL_FiBoxDrainMax := 1.5 m
ND_FiExitWaste := ND_PipeFlow(Q_Fi, SDR_26, HL_FiBoxDrainMax, 1 m, Nu_Water, E_Pvc, K_PipeEnt + K_El90 + K_PipeExit)
ND_FiEntOverflow := ND_PipeFlow(2*Q_Fi, SDR_26, HL_FiBoxDrainMax, 1 m, Nu_Water, E_Pvc, K_PipeEnt + K_El90 + K_PipeExit)
ND_FiBypass := ND_PipeFlow(2*Q_Fi, SDR_41, 20 cm, T_FiBoxWall + 5 cm, Nu_Water, E_Pvc, K_PipeEnt + K_PipeExit)
ND_DistPipe := ND_PipeFlow(Q_Plant, SDR_41, HL_FiBoxDrainMax, 100 m, Nu_Water, E_Pvc, K_PipeEnt + 3*K_El90 + K_PipeExit)
PS_FiExitWaste := PS_Decision(ND_FiExitWaste)
PS_FiExitWasteStr := PSToString(PS_FiExitWaste)
PS_FiEntOverflow := PS_Decision(ND_FiEntOverflow)
PS_FiEntOverflowStr := PSToString(PS_FiEntOverflow)
PS_FiBypass := SDR_41
PS_FiBypassStr := PSToString(PS_FiBypass)
PS_DistPipe := SDR_41
PS_DistPipeStr := PSToString(PS_DistPipe)
HL_FiExitWaste := h_l(Q_Fi, ID(ND_FiExitWaste, PS_FiExitWaste), 1 m, K_PipeEnt + K_El90 + K_PipeExit, Nu_Water, E_Pvc)
HL_FiEntOverflow := h_l(2*Q_Fi, ID(ND_FiEntOverflow, PS_FiEntOverflow), 1 m, K_PipeEnt + K_El90 + K_PipeExit, Nu_Water, E_Pvc)
HL_FiBypass := h_l(2*Q_Fi, ID(ND_FiBypass, PS_FiBypass), T_FiBoxWall + 5 cm, K_PipeEnt + K_PipeExit, Nu_Water, E_Pvc)
HL_DistPipe := h_l(Q_Plant, ID(ND_DistPipe, PS_DistPipe), 100 m, K_PipeEnt + 3*K_El90 + K_PipeExit, Nu_Water, E_Pvc)
H_FiEntOverflowDrop := max(HL_FiEntOverflow + H_DrainOutletSafety, CouplingLength(ND_FiEntOverflow) + SocketDepth(ND_FiEntOverflow) + ElbowRadius(ND_FiEntOverflow))
H_FiExitWasteDrop := max(HL_FiExitWaste + H_DrainOutletSafety, CouplingLength(ND_FiExitWaste) + SocketDepth(ND_FiExitWaste) + ElbowRadius(ND_FiExitWaste))
H_FiDistDrop := max(HL_DistPipe + H_DrainOutletSafety, max(CouplingLength(ND_DistPipe), T_FiBoxWall) + SocketDepth(ND_DistPipe) + ElbowRadius(ND_DistPipe))
# The combined width of the overflow/distribution and entrance/exit boxes must match the filter width so that the boxes fit when adjacent filters are put side-by-side
W_FiEntranceMin := max(3*S_Fitting + OR_Fitting(ND_FiBwTrunk) + 3*OR_Fitting(ND_FiTrunk) + 2*(SocketDepth(ND_FiTrunk) + ElbowRadius(ND_FiTrunk)), W_HumanMin, W_rectweir(Q_Fi, HL_FiInletWeirMax))
W_FiOverflowMin := OD_Fitting(ND_DistPipe) + 2*S_Fitting
# The actual width of the overflow/distribution boxes will be defined once the actual filter width is determined based on the number of manifold branches.
W_FiMin := W_FiEntranceMin + W_FiOverflowMin + 2*T_FiBoxWall - T_FiWall
W_FiActiveMin := W_FiMin - OD(ND_FiBwTrunk)  # For one filter make the dimensions closer to square
A_FiActive := Q_FiLayer/V_FiLayer
W_FiSingleEst := (OD(ND_FiTrunk) + sqrt(OD(ND_FiTrunk)^2 + 4*A_FiActive))/2
L_FiSingleEst := W_FiSingleEst
S_FiWeirsEst := 10 cm
# Just used below to get an estimate of total siphon pipe length. Actual box length is calculated after flow distribution weir design.
L_FiEntranceEst := OD_Fitting(ND_FiTrunk) + OD_Fitting(ND_FiBwTrunk) + 2*S_Fitting + 3*S_FiWeirsEst + T_Acrylic + T_FiWeir
L_FiExit := max(3*S_Fitting + 2*OD_Fitting(ND_FiTrunk), W_HumanMin)
L_FiDist := L_FiExit
# Overflow weir
L_FiOverflowWeir := OD_Fitting(ND_FiBwTrunk) + OD_Fitting(ND_FiTrunk) + 3*S_Fitting
HL_FiOverflowWeir := Headloss_weir(Q_Fi, L_FiOverflowWeir)
# Walkway between the filter box and exit box
W_MpWalkway := max(W_MpWalkwayMin, ShortTeeLength(ND_DistPipe) + OR_Fitting(ND_DistPipe) + S_Fitting + OR_Fitting(ND_DistPipe) + ElbowRadius(ND_DistPipe) + 2*SocketDepth(ND_DistPipe) + ElbowRadius(ND_DistPipe) - L_FiExit/2 - T_FiBoxWall)
# Number of manifold branches
PS_FiBranch := Sch40
PS_FiBranchStr := PSToString(PS_FiBranch)
# Min number of manifold branches for backwash flow distribution
PR_FiBwManBranchMax := HL_FiBwSlotsEst*Pi_FiManifoldHeadLoss - PR_FiBwTrunk
Pi_Q == Q_min/Q_max
V_FiBwManBranchMax := sqrt(2*g*PR_FiBwManBranchMax)
# Assume linear flow distribution between branches.
# Then the average branch flow is:
Q_FiBwBranchMaxPR := V_FiBwManBranchMax*π*IR(ND_FiBwManBranch, PS_FiBranch)^2
# Maximum allowable flow through the backwash manifold branch that receives the highest flow.
Q_ave == (Q_max + Q_min)/2
Q_ave == (Q_max + Pi_Q*Q_max)/2
# Maximum allowable AVERAGE flow through the backwash manifold branches in order to not exceed pressure recovery constraint for flow distribution. Derivation to the right.
Q_FiBwBranchAveMaxPR := Q_FiBwBranchMaxPR*((1 + sqrt(1 - PR_FiBwTrunk/HL_FiBwSlotsEst))/2)
Q_ave == Q_max*((1 + Pi_Q)/2)
Pi_Q == sqrt(1 - Pi_HL)
N_FiBwManBranchMin := Ceil(Q_Fi/Q_FiBwBranchAveMaxPR, 2)  # branches are coming out of both sides of the manifold, need even number
Q_ave == Q_max((1 + sqrt(1 - Pi_HL))/2)
# Min number of manifold branches for forward filtration flow distribution
PR_FiManBranchMax := HL_FiCleanLayerMin*Pi_FiManifoldHeadLoss - PR_FiForwardTrunk
V_FiManBranchMax := sqrt(2*g*PR_FiManBranchMax)
Q_FiForwardBranchMaxPR := V_FiManBranchMax*π*IR(ND_FiManBranch, PS_FiBranch)^2
# Maximum allowable AVERAGE flow through the upper manifold branches during forward filtration in order to not exceed pressure recovery constraint for flow distribution.
Q_FiForwardBranchAveMaxPR := Q_FiForwardBranchMaxPR*((1 + sqrt(1 - PR_FiForwardTrunk/HL_FiCleanLayer))/2)
N_FiForwardManBranchMin := Ceil(2*Q_FiLayer/Q_FiForwardBranchAveMaxPR, 2)  # branches are coming out of both sides of the manifold, need even number
N_FiManBranchMinPR := max(N_FiBwManBranchMin, N_FiForwardManBranchMin)
# Minimum number of branches in each manifold in order to not violate a pressure recovery constraint for flow distribution.
# Maximum number of manifold branches for filter geometry constraint
# Maximum number of manifold branches which allows the filter box width to match the auxiliary box width (only relevant for more than one filter):
N_FiManSideBranchMaxMult := floor((A_FiActive/W_FiActiveMin - (OD(ND_FiBwManBranch) + FerncoCouplingLength(ND_FiBwManBranch) + S_FiBranchToWall))/B_FiManifoldBranch)
N_FiManBranchMaxMult := 2*N_FiManSideBranchMaxMult
# Max number of branches for square filter if there is only one filter
N_FiManSideBranchSquare := round((L_FiSingleEst - FerncoCouplingLength(ND_FiBwManBranch) - OD(ND_FiBwManBranch) - S_FiBranchToWall)/B_FiManifoldBranch)
N_FiManBranchSquare := 2*N_FiManSideBranchSquare
# Set number of branches based on geometry
N_FiManBranch :=
    N_FiManBranchSquare if N_Fi == 1
    N_FiManBranchMaxMult otherwise
# mse53 3-16-17 deleted N_FiManBranchOld := N_FiManBranchMaxMult
# Error variable equal to 1 when number of branches based on geometry does not satisfy flow distribution constraint
Error_FiManBranchPR := N_FiManBranch < N_FiManBranchMinPR
Q_FiForwardManBranchMax := 2*Q_FiLayer/N_FiManBranch
Q_FiBwManBranch := Q_Fi/N_FiManBranch
PR_FiBwManBranch := (Q_FiBwManBranch/(π*IR(ND_FiBwManBranch, PS_FiBranch)^2))^2/(2*g)
PR_FiForwardManBranch := (Q_FiForwardManBranchMax/(π*IR(ND_FiManBranch, PS_FiBranch)^2))^2/(2*g)
PR_FiBwManTotal := PR_FiBwTrunk + PR_FiBwManBranch
PR_FiForwardManTotal := PR_FiForwardTrunk + PR_FiForwardManBranch
# Filter box dimensions and manifold pipe lengths
L_Fi := (N_FiManBranch/2 - 1)*B_FiManifoldBranch + OD(ND_FiBwManBranch) + FerncoCouplingLength(ND_FiBwManBranch) + S_FiBranchToWall
# This is only the active filtration width (does not include the projected area of the trunk lines, but we assume the space between the branch holders and beyond contributes to active area)
W_FiActive := A_FiActive/L_Fi
W_Fi := W_FiActive + OD(ND_FiBwTrunk)
W_FiEntrance := W_Fi/2 + OR_Fitting(ND_FiBwTrunk) + S_Fitting + T_FiWall - T_FiBoxWall
W_FiOverflow :=
    W_Fi + T_FiWall - W_FiEntrance - 2*T_FiBoxWall if N_Fi > 1
    W_FiOverflowMin otherwise
L_FiManBranch := W_Fi/2 - OR(ND_FiTrunk) - OR_Fitting(ND_FiBwBranchHolder) - OR(ND_FiBranchHolder) + 2*L_FiManBranchExt - S_FiManAssembly
L_FiManBranchTot := L_FiManBranch*N_FiManBranch
L_FiBwManBranch := W_Fi/2 - OR(ND_FiBwTrunk) - OR_Fitting(ND_FiBwBranchHolder) - OR(ND_FiBwBranchHolder) + 2*L_FiManBranchExt - S_FiManAssembly
L_FiBwManBranchTot := L_FiBwManBranch*N_FiManBranch
L_FiTrunk := L_Fi - FerncoCouplingLength(ND_FiTrunk)/2 - CapThickness(ND_FiTrunk) - S_FiManAssembly
L_FiBwTrunk := L_Fi - FerncoCouplingLength(ND_FiBwTrunk)/2 - CapThickness(ND_FiBwTrunk) - S_FiManAssembly
L_FiBranchHolder := L_Fi - 2*CapThickness(ND_FiBranchHolder) - 2*S_FiManAssembly
L_FiBwBranchHolder := L_Fi - 2*CapThickness(ND_FiBwBranchHolder) - 2*S_FiManAssembly
# Manifold slot/orifice design
# mse53 3/16/17 modified inlets/outlets to how they are being built in Honduras.
# NOTE: Previously all manifold branches were slotted, and the middle two inlets and the three outlets had identical slotted pipes. The top and bottom inlets were different because they only received half the flow but we wanted the same slot head loss through all manifolds.
#
# Now the design has changed to having inlet branches with orifices instead of slots to avoid clogging. Sand is kept out with downward-facing U-channels around the pipes that create gravity exclusion zones. The outlet manifolds are still slotted because we don't yet have a design that would keep sand out of the orifices during normal filtration.
#
# The basis of the design of the orifices is the head loss through the bottom manifold orifices during backwash in order to get good flow distribution along the manifold.
HL_FiBwOrificeEst := PR_FiBwManTotal/Pi_FiManifoldHeadLoss
A_FiBwManOrificesEst := A_orifice(HL_FiBwOrificeEst, Pi_VCOrifice, Q_Fi)
A_FiInletManOrificesEst := 2*A_FiBwManOrificesEst
A_FiTopManOrificesEst := A_FiBwManOrificesEst
A_FiOutletManSlots := A_FiInletManOrificesEst  # Should the outlet slot area have its own design?
# Outlet Design
B_FiManSlot := 1/8*in = 3.175 mm
N_FiSlotRows := 2
L_FiOutletManSlotBranchTotal := A_FiOutletManSlots/(W_FiManSlots*N_FiManBranch)
L_FiBwManSlotBranchTotal := A_FiBwManSlots/(W_FiManSlots*N_FiManBranch)
L_FiOutletBranchSlotted := L_FiManBranch - 2*L_FiManBranchExt - B_FiManSlot
N_FiOutletManSlotsPerRow := floor(L_FiOutletBranchSlotted/B_FiManSlot)
L_FiTopManSlotBranchTotal := A_FiTopManSlots/(W_FiManSlots*N_FiManBranch)
N_FiOutletManSlotsPerBranch := N_FiOutletManSlotsPerRow*N_FiSlotRows
L_FiOutletManSlotCurvedInner := L_FiOutletManSlotBranchTotal/N_FiOutletManSlotsPerBranch
# Check that this total length does not exceed what is possible
# given 1/2 the inner circumference of the branch.
# Inlet Design
B_FiManOrificeEst := 1 cm
B_FiBwManSlot := 3/16*in = 4.7625 mm
N_FiBwSlotRows := 2
N_FiBwManBranchOrificesMax := floor((L_FiBwManBranch - 2*L_FiManBranchExt - B_FiManOrificeEst)/B_FiManOrificeEst)
B_FiTopManSlot := 3/16*in
N_FiTopSlotRows := 2
N_FiBwManOrificesMax := N_FiManBranch*N_FiBwManBranchOrificesMax
N_FiBwManSlotsPerBranch := N_FiBwManSlotsPerRow*N_FiBwSlotRows
N_FiTopManSlotsPerBranch := N_FiTopManSlotsPerRow*N_FiTopSlotRows
N_FiManBranchOrificesMax := floor((L_FiManBranch - 2*L_FiManBranchExt - B_FiManOrificeEst)/B_FiManOrificeEst)
N_FiManOrificesMax := N_FiManBranch*N_FiManBranchOrificesMax
D_DrillFiOrifice := [1/8; 1/4]*in
D_FiBwManOrifice := CeilNearest(2*sqrt(A_FiBwManOrificesEst/(π*N_FiBwManBranchOrificesMax)), D_DrillFiOrifice)
L_FiBwManSlotCurvedInner := L_FiBwManSlotBranchTotal/N_FiBwManSlotsPerBranch
D_FiInletManOrifice := CeilNearest(2*sqrt(A_FiInletManOrificesEst/(π*N_FiManOrificesMax)), D_DrillFiOrifice)
L_FiTopManSlotCurvedInner := L_FiTopManSlotBranchTotal/N_FiTopManSlotsPerBranch
D_FiTopManOrifice := CeilNearest(2*sqrt(A_FiTopManOrificesEst/(π*N_FiManOrificesMax)), D_DrillFiOrifice)
N_FiBwManOrifices := min(N_FiBwManOrificesMax, Floor(A_FiBwManOrificesEst/(π/4*D_FiBwManOrifice^2), N_FiManBranch))
N_FiInletManOrifices := min(N_FiManOrificesMax, Floor(A_FiInletManOrificesEst/(π/4*D_FiInletManOrifice^2), N_FiManBranch))
N_FiTopManOrifices := min(N_FiManOrificesMax, Floor(A_FiTopManOrificesEst/(π/4*D_FiTopManOrifice^2), N_FiManBranch))
A_FiBwManOrifices := π/4*D_FiBwManOrifice^2*N_FiBwManOrifices
A_FiInletManOrifices := π/4*D_FiInletManOrifice^2*N_FiInletManOrifices
A_FiTopManOrifices := π/4*D_FiTopManOrifice^2*N_FiTopManOrifices
# A conservative estimate of the head loss through the slots of the  manifold during forward filtration given sand blockage (CURRENTLY NOT INCLUDED in total path head loss below. unclear if this applies).
HL_FiOutletSlotForward := (2*Q_FiLayer/(A_FiOutletManSlots*ε_FiSand*Pi_VCOrifice))^2/(2*g)
HL_FiBwManOrifice := (Q_Fi/(Pi_VCOrifice*A_FiBwManOrifices))^2/(2*g)
HL_FiBwManOrificeForward := (Q_FiLayer/(A_FiBwManOrifices*Pi_VCOrifice*ε_FiSand))^2/(2*g)
HL_FiBwSlotForward := (Q_FiLayer/(A_FiBwManSlots*ε_FiSand*Pi_VCOrifice))^2/(2*g)
HL_FiInletManOrificeForward := (2*Q_FiLayer/(A_FiInletManOrifices*Pi_VCOrifice*ε_FiSand))^2/(2*g)
HL_FiTopSlotForward := (Q_FiLayer/(A_FiTopManSlots*ε_FiSand*Pi_VCOrifice))^2/(2*g)
HL_FiTopManOrificeForward := (Q_FiLayer/(A_FiTopManOrifices*Pi_VCOrifice*ε_FiSand))^2/(2*g)
# Plumbing head loss
HL_FiBwInletManifold := 1/3*h_f(Q_Fi, ID(ND_FiBwTrunk, PS_FiTrunk), L_Fi, Nu_Water, E_Pvc) + h_e(Q_Fi/N_FiManBranch, ID(ND_FiBwManBranch, PS_FiBranch), K_PipeEnt) + 1/3*h_f(Q_Fi/N_FiManBranch, ID(ND_FiBwManBranch, PS_FiBranch), L_FiBwManBranch, Nu_Water, E_Pvc) + HL_FiBwManOrifice
HL_FiInletManifold(Q_Layer) := 1/3*h_f(2*Q_Layer, ID(ND_FiTrunk, PS_FiTrunk), L_Fi, Nu_Water, E_Pvc) + h_e(2*Q_Layer/N_FiManBranch, ID(ND_FiManBranch, PS_FiBranch), K_PipeEnt) + 1/3*h_f(2*Q_Layer/N_FiManBranch, ID(ND_FiManBranch, PS_FiBranch), L_FiManBranch, Nu_Water, E_Pvc) + HL_FiInletManOrificeForward
HL_FiInletManifoldTop(Q_Layer) := 1/3*h_f(Q_Layer, ID(ND_FiTrunk, PS_FiTrunk), L_Fi, Nu_Water, E_Pvc) + h_e(Q_Layer/N_FiManBranch, ID(ND_FiManBranch, PS_FiBranch), K_PipeEnt) + 1/3*h_f(Q_Layer/N_FiManBranch, ID(ND_FiManBranch, PS_FiBranch), L_FiManBranch, Nu_Water, E_Pvc) + HL_FiTopManOrificeForward
HL_FiInletManifoldBottom(Q_Layer) := 1/3*h_f(Q_Layer, ID(ND_FiBwTrunk, PS_FiTrunk), L_Fi, Nu_Water, E_Pvc) + h_e(Q_Layer/N_FiManBranch, ID(ND_FiBwManBranch, PS_FiBranch), K_PipeEnt) + 1/3*h_f(Q_Layer/N_FiManBranch, ID(ND_FiBwManBranch, PS_FiBranch), L_FiManBranch, Nu_Water, E_Pvc) + HL_FiBwManOrificeForward
HL_FiOutletManifold(Q_Layer) := 1/3*h_f(2*Q_Layer, ID(ND_FiTrunk, PS_FiTrunk), L_Fi, Nu_Water, E_Pvc) + h_e(2*Q_Layer/N_FiManBranch, ID(ND_FiManBranch, PS_FiBranch), K_PipeExit) + 1/3*h_f(2*Q_Layer/N_FiManBranch, ID(ND_FiManBranch, PS_FiBranch), L_FiManBranch, Nu_Water, E_Pvc)
# For the head loss through the outlet manifold:
# Does it make sense to have a pipe exit loss included?
# Also, is it worth coming up with an estimate for head loss through the slots entering the branch?
SF_MiddleOfPipe := 1.2
# This safety factor is an approximation which accounts for the extra elevation of the water in the center of the pipe stub before spilling towards the weir (or the pipe edge)
HL_FiOutletStubs(Q_Layer) := SF_MiddleOfPipe*Headloss_weir(Q_Layer, π*ID(ND_FiTrunk, PS_FiInletOutlet))
HL_FiInletPlumbing1(Q_Layer) := h_l(Q_Layer, ID(ND_FiTrunk, PS_FiInletOutlet), 3 m, 3*K_El90 + K_PipeEnt, Nu_Water, E_Pvc) + HL_FiInletManifoldTop(Q_Layer)
HL_FiInletPlumbing2(Q_Layer) := h_l(2*Q_Layer, ID(ND_FiTrunk, PS_FiInletOutlet), 3 m, 3*K_El90 + K_PipeEnt, Nu_Water, E_Pvc) + HL_FiInletManifold(Q_Layer)
HL_FiInletPlumbing3(Q_Layer) := h_l(2*Q_Layer, ID(ND_FiTrunk, PS_FiInletOutlet), 3 m, K_El90 + K_PipeEnt, Nu_Water, E_Pvc) + HL_FiInletManifold(Q_Layer)
# These are numbered from the top of the filter bed down. The top and bottom inlets have half the flow rate (only serve the layers below and above, respectively). The bottom inlet has the diameter of the backwash trunk.
HL_FiInletPlumbing4(Q_Layer) := h_l(Q_Layer, ID(ND_FiBwTrunk, PS_FiBwInlet), 3 m, K_El90 + K_PipeEnt, Nu_Water, E_Pvc) + HL_FiInletManifoldBottom(Q_Layer)
HL_FiInletPlumbingMax(Q_1, Q_2, Q_3, Q_4) := max(HL_FiInletPlumbing1(Q_1), HL_FiInletPlumbing2(Q_2), HL_FiInletPlumbing3(Q_3), HL_FiInletPlumbing4(Q_4))
HL_FiInletPlumbingMin(Q_1, Q_2, Q_3, Q_4) := min(HL_FiInletPlumbing1(Q_1), HL_FiInletPlumbing2(Q_2), HL_FiInletPlumbing3(Q_3), HL_FiInletPlumbing4(Q_4))
HL_FiInletPlumbingAve(Q_1, Q_2, Q_3, Q_4) := (HL_FiInletPlumbing1(Q_1) + HL_FiInletPlumbing2(Q_2) + HL_FiInletPlumbing3(Q_3) + HL_FiInletPlumbing4(Q_4))/4
HL_FiBwInletPlumbing := h_l(Q_Fi, ID(ND_FiBwTrunk, PS_FiBwInlet), 3 m, K_El90 + K_PipeEnt, Nu_Water, E_Pvc) + HL_FiBwInletManifold
HL_FiOutletPlumbing1(Q_Layer) := h_l(2*Q_Layer, ID(ND_FiTrunk, PS_FiInletOutlet), 3 m, K_El90 + K_PipeExit, Nu_Water, E_Pvc) + HL_FiOutletManifold(Q_Layer) + HL_FiOutletStubs(Q_Layer)
HL_FiOutletPlumbing2(Q_Layer) := HL_FiOutletPlumbing1(Q_Layer)
HL_FiOutletPlumbing3(Q_Layer) := h_l(2*Q_Layer, ID(ND_FiTrunk, PS_FiInletOutlet), 3 m, 2*K_El90 + K_PipeExit, Nu_Water, E_Pvc) + HL_FiOutletManifold(Q_Layer) + HL_FiOutletStubs(Q_Layer)
HL_FiOutletPlumbingMax(Q_1, Q_3) := max(HL_FiOutletPlumbing1(Q_1), HL_FiOutletPlumbing2(Q_1), HL_FiOutletPlumbing3(Q_3))
HL_FiOutletPlumbingMin(Q_1, Q_3) := min(HL_FiOutletPlumbing1(Q_1), HL_FiOutletPlumbing2(Q_1), HL_FiOutletPlumbing3(Q_3))
HL_FiOutletPlumbingAve(Q_1, Q_3) := (HL_FiOutletPlumbing1(Q_1) + HL_FiOutletPlumbing2(Q_1) + HL_FiOutletPlumbing3(Q_3))/3
# Total sand depth and backwash head loss
H_FiSand := (N_FiLayer - 1)*H_FiLayer + H_FiBottomLayer + OR_Fitting(ND_FiBwManBranch) + OR(ND_FiManBranch)
H_FiSandActive := H_FiSand - OR(ND_FiBwManBranch) - OR(ND_FiManBranch)
H_FiFluidizedBed := Pi_FiFluidized*H_FiSand
# Note that HL.FiDirty was moved to expert inputs 12/4/16
# Sand bed head loss during steady state backwash.
HL_FiBwSandSS := H_FiSand*(Rho_FiSand - Rho_H2O)*(1 - ε_FiSand)/Rho_H2O
# The backwash head loss is almost exactly equal  to the sand bed depth. Note that this ignores losses in the plumbing.
HL_FiTerminal := HL_FiCleanLayer + HL_FiDirty
HL_FiBwInitiation := HL_FiBwSF + HL_FiBwSandSS
# How much does the filter bed over fluidize when the entrance box level lowers after backwash initiation?
H_FiFluidizedBedVariation := (HL_FiBwInitiation - HL_FiBwSandSS)*(W_FiEntrance*L_FiEntranceEst - 3*π*OR(ND_FiTrunk)^2 - π*OR(ND_FiBwTrunk)^2)/A_FiActive
# Path head loss calculations and flow distribution between layers
HL_FiCleanLyr(Q) := h_lKozeny(H_FiLayer, D_FiSand60, Q/A_FiActive, ε_FiSand, Nu_Water)
HL_FiCleanBottomLyr(Q) := h_lKozeny(H_FiBottomLayer, D_FiSand60, Q/A_FiActive, ε_FiSand, Nu_Water)
HL_FiPathClean1(Q_Path) := HL_FiInletPlumbing1(Q_Path) + HL_FiCleanLyr(Q_Path) + HL_FiOutletPlumbing1(Q_Path)
HL_FiPathClean2(Q_Path) := HL_FiInletPlumbing2(Q_Path) + HL_FiCleanLyr(Q_Path) + HL_FiOutletPlumbing1(Q_Path)
HL_FiPathClean3(Q_Path) := HL_FiInletPlumbing2(Q_Path) + HL_FiCleanLyr(Q_Path) + HL_FiOutletPlumbing2(Q_Path)
HL_FiPathClean4(Q_Path) := HL_FiInletPlumbing3(Q_Path) + HL_FiCleanLyr(Q_Path) + HL_FiOutletPlumbing2(Q_Path)
HL_FiPathClean5(Q_Path) := HL_FiInletPlumbing3(Q_Path) + HL_FiCleanLyr(Q_Path) + HL_FiOutletPlumbing3(Q_Path)
HL_FiPathClean6(Q_Path) := HL_FiInletPlumbing4(Q_Path) + HL_FiCleanBottomLyr(Q_Path) + HL_FiOutletPlumbing3(Q_Path)
HL_FiPathCleanMax(Q_1, Q_2, Q_3, Q_4, Q_5, Q_6) := max(HL_FiPathClean1(Q_1), HL_FiPathClean2(Q_2), HL_FiPathClean3(Q_3), HL_FiPathClean4(Q_4), HL_FiPathClean5(Q_5), HL_FiPathClean6(Q_6))
HL_FiPathCleanMin(Q_1, Q_2, Q_3, Q_4, Q_5, Q_6) := min(HL_FiPathClean1(Q_1), HL_FiPathClean2(Q_2), HL_FiPathClean3(Q_3), HL_FiPathClean4(Q_4), HL_FiPathClean5(Q_5), HL_FiPathClean6(Q_6))
# In reality the flow will distribute itself such that all paths have the same head loss. We will treat the average of all of the calculated path head losses as the actual complete head loss accross all paths.
HL_FiPathCleanAve(Q_1, Q_2, Q_3, Q_4, Q_5, Q_6) := (HL_FiPathClean1(Q_1) + HL_FiPathClean2(Q_2) + HL_FiPathClean3(Q_3) + HL_FiPathClean4(Q_4) + HL_FiPathClean5(Q_5) + HL_FiPathClean6(Q_6))/6
Pi_QFiLayer(Q_1, Q_2, Q_3, Q_4, Q_5, Q_6) := sqrt(HL_FiPathCleanMin(Q_1, Q_2, Q_3, Q_4, Q_5, Q_6)/HL_FiPathCleanMax(Q_1, Q_2, Q_3, Q_4, Q_5, Q_6))
# This estimate is reasonable as long as the answer is close to 1
# Guess:
Q_2 := Q_FiLayer
Q_3 := Q_FiLayer
Q_4 := Q_FiLayer
Q_5 := Q_FiLayer
Q_6 := Q_FiLayer
Q_1 := Q_FiLayer
Given
HL_FiPathClean1(Q_1) == HL_FiPathClean2(Q_2)
HL_FiPathClean2(Q_2) == HL_FiPathClean3(Q_3)
Q_1 + Q_2 + Q_3 + Q_4 + Q_5 + Q_6 == Q_Fi
HL_FiPathClean3(Q_3) == HL_FiPathClean4(Q_4)
HL_FiPathClean4(Q_4) == HL_FiPathClean5(Q_5)
HL_FiPathClean5(Q_5) == HL_FiPathClean6(Q_6)
HL_FiPath(Q) := Find(Q_1, Q_2, Q_3, Q_4, Q_5, Q_6)
Q_FiPath := HL_FiPath(Q_Fi)
Q_FiLayer1 := Q_FiPath[0]
HL_FiPathClean1(Q_FiPath[0]) =  # error: This variable is undefined.
Q_FiLayer2 := Q_FiPath[1]
HL_FiPathClean2(Q_FiPath[1]) =  # error
Q_FiLayer3 := Q_FiPath[2]
HL_FiPathClean3(Q_FiPath[2]) =  # error
Q_FiLayer4 := Q_FiPath[3]
HL_FiCleanPath := HL_FiPathClean1(Q_FiPath[0])
HL_FiPathClean4(Q_FiPath[3]) =  # error
Q_FiLayer5 := Q_FiPath[4]
HL_FiPathClean5(Q_FiPath[4]) =  # error
Q_FiLayer6 := Q_FiPath[5]
HL_FiPathClean6(Q_FiPath[5]) =  # error
# Siphon design
L_FiSiphonEst := 2*(HL_FiBwInletPlumbing + HL_FiBwSandSS + HL_FiSiphonMax) + 2*(H_FiFluidizedBed + H_FiFluidizedBedToSiphon) + L_Fi/2 + T_FiWall + W_MpWalkway + 4*T_FiBoxWall + L_FiExit + L_FiEntranceEst + W_ChannelMin + W_DCWalkway/2
K_FiSiphon := 5*K_El90 + K_PipeEnt + K_PipeExit  # Minor loss coefficients for flow through the siphon. The tee is treated as an extra elbow
# Siphon has to handle the entire flow into the filter plus drain the terminal head in Ti.FiBwInitiation.  This is approximately a "hole in a bucket problem" so the average flow rate is half the max flow (hence the factor of 2).  The HL sum corresponds to the height of water that needs to be drained. Use maximum head loss through the siphon for conservative estimate.
Q_FiSiphonInitiation := Q_Fi + 2*A_FiActive*(HL_FiBwSF + H_FiForwardNoSuckAir + HL_FiDirty + HL_FiBwInletPlumbing + HL_FiBwSandSS + HL_FiSiphonMax - H_FiSiphonNoSuckAir)/Ti_FiBwInitiationBod
PS_FiSiphon := SDR_41
PS_FiSiphonStr := PSToString(PS_FiSiphon)
ND_FiSiphon :=
    i ← 0
    HL_SiphonEst ← 10 m
    while HL_SiphonEst > HL_FiSiphonMax
        i ← i + 1
        ID_Siphon ← AvailID(PS_FiSiphon)[i]
        HL_SiphonPipeEst ← h_l(Q_Fi, ID_Siphon, L_FiSiphonEst, K_FiSiphon, Nu_Water, E_Pvc)
        HL_SiphonOutlet ← Headloss_weir(Q_Fi, π*ID_Siphon)
        HL_SiphonOrifice ← h_orifice(ID_Siphon, Pi_VCOrifice, Q_Fi)
        HL_SiphonEst ← HL_SiphonPipeEst + HL_SiphonOutlet + HL_SiphonOrifice
    return ND(ID_Siphon, PS_FiSiphon)
# these two functions must be changed if the available pipes are changed in the pipe database!!!!
ND_FiSiphon =  # error
HL_FiSiphonPipe := h_l(Q_Fi, ID(ND_FiSiphon, PS_FiSiphon), L_FiSiphonEst, K_FiSiphon, Nu_Water, E_Pvc)
HL_FiSiphonOutlet := Headloss_weir(Q_Fi, π*ID(ND_FiSiphon, PS_FiSiphon))
S_FiSiphonOrificeMin := 1 cm
B_FiSiphonManOrificesEst := max(D_Drill) + S_FiSiphonOrificeMin
N_FiSiphonManOrifices := 2*floor((L_Fi - OD_Fitting(ND_FiSiphon))/(2*B_FiSiphonManOrificesEst))
D_FiSiphonManOrifices := CeilNearest(ID(ND_FiSiphon, SDR_41)/sqrt(N_FiSiphonManOrifices), D_Drill)
# This keeps the area of the orifices similar to the siphon pipe area. Max drill size currently 2"
B_FiSiphonManOrifices := (L_Fi - OD_Fitting(ND_FiSiphon))/N_FiSiphonManOrifices
HL_FiSiphonOrifice := h_orifice(D_FiSiphonManOrifices, Pi_VCOrifice, Q_Fi/N_FiSiphonManOrifices)
HL_FiBwTotalSS := HL_FiBwInletPlumbing + HL_FiBwSandSS + HL_FiSiphonOrifice + HL_FiSiphonPipe + HL_FiSiphonOutlet
Pi_FiSiphonManArea := ID(ND_FiSiphon, PS_FiSiphon)^2/(D_FiSiphonManOrifices^2*N_FiSiphonManOrifices)
Rho_FiFluidized := Rho_H2O*ε_FiSand*Pi_FiFluidized + Rho_FiSand*(1 - ε_FiSand)/Pi_FiFluidized
# Inlet channel and Elevations
# Drain in the inlet channel needs to be able to accomodate the flow from the entire plant.
ND_FiInletChannelDrain := ND_PipeFlow(Q_Plant, PS_FiSiphon, 1 m, 20 cm, Nu_Water, E_Pvc, 3)
H_FiInletChannelMax := 50 cm
L_FiInletChannel := N_Fi*(W_FiEntrance + T_FiBoxWall) + (N_Fi - (mod(N_Fi, 2) ≠ 1 or N_Fi == 3))*(W_FiOverflow + T_FiBoxWall) - T_FiBoxWall
Pi_QFi := 0.95
# Pi_QFi should be in expert inputs. This is the ratio of flow through two filters based on head loss in the inlet channel and flow over the weirs into each filter.
W_FiEntranceWeir := W_FiEntrance
HL_FiInletWeir := Headloss_weir(Q_Fi, W_FiEntranceWeir)
HL_FiInletChannel := Headloss_weir(Q_Fi, W_FiEntranceWeir) - Headloss_weir(Q_Fi*Pi_QFi, W_FiEntranceWeir)
# Aux box water, weir, and pipe levels
ZW_FiInletChannel =  # error
L_SedToFiEff := W_Sed*N_SedTanks + 2*W_DCWalkway
HL_SedToFiChannel := h_lrect(Q_Train, W_SedExitChannel, HW_SedWeirExit, L_SedToFiEff, 1, Nu_Water, E_Concrete, 1)
ZW_FiInletChannel :=
    (Z_SedChannelBottom + HW_SedWeirExit - HL_FiEntrancePipe) if N_Train < 2
    Z_SedChannelBottom + HW_SedWeirExit - HL_SedToFiChannel otherwise  # modified 12/5/16 mrf222
# This assumed that the water level went to zero in the sed tank exit channel.
# This is no longer a pipe for high flow. It is a channel!
Z_FiEntranceWeir := ZW_FiInletChannel - HL_FiInletWeir
ZW_FiEntranceMax := Z_FiEntranceWeir - H_FiWeirFreefall
ZW_FiEntranceTerminal := ZW_FiEntranceMax - HL_FiOverflowWeir
Z_FiOverflowWeir := ZW_FiEntranceTerminal
ZW_FiEntranceCleanForward := ZW_FiEntranceTerminal - HL_FiDirty
Z_FiEntranceStub := ZW_FiEntranceTerminal - HL_FiDirty - H_FiForwardNoSuckAir
Z_FiExitStub := ZW_FiEntranceCleanForward - HL_FiCleanPath
ZW_FiEntranceBwSS := Z_FiEntranceStub - HL_FiBwSF
Z_FiTop := max(ZW_FiInletChannel + H_PlantFreeboard, Z_Walkway + H_FiWallToPlantFloorMin)
H_FiInletChannelMaxhigh := Z_FiTop - (ZW_FiEntranceBwSS - H_FiBwNoSuckAir)
H_FiInletChannelMax :=
    local ← H_FiInletChannelMax if N_Train < 2
    local ← H_FiInletChannelMaxhigh otherwise
    return local
HW_FiInletChannelMax := H_FiInletChannelMax - H_PlantFreeboard
Q_FiInlet :=
    Q_Plant if N_Train > 1
    Q_Fi otherwise  # changed by mrf222 11/3/16
W_FiInletChannelFlowDist := W_HorizChannel(Q_FiInlet, HW_FiInletChannelMax, HL_FiInletChannel, W_FiEntrance + W_FiOverflow + 2*T_FiBoxWall, Nu_Water, E_Concrete, 0, 0)
W_FiInletChannelElbow := SocketDepth(ND_SedToFiPipe) + ElbowRadius(ND_SedToFiPipe) + OR_Fitting(ND_SedToFiPipe) + S_Fitting
W_FiInletChannel := max(W_FiInletChannelFlowDist, W_ChannelMinProposed(H_FiInletChannelMax), W_FiInletChannelElbow)
# Elevations
# The logic sequence for the design of filter elevations begins with the water level in the inlet channel, from which you get all entrance box elevations. Exit box elevations are calculated based on path head loss. The elevation of the siphon outlet is below the minimum water level in the entrance box by a height equal to the total backwash head loss (through all plumbing, sand bed, and siphon outlet). The siphon inlet elevation is then set such that air will not be pulled in during low-flow backwash operation. Finally, the elevation of the bottom of the filter box is set such that the fluidized sand bed does not reach the siphon inlet orifices.
# Aux box masonry levels
Z_FiInletChannelBottom := ZW_FiInletChannel - HW_FiInletChannelMax
Z_FiEntranceBottom := ZW_FiEntranceBwSS - H_FiBwNoSuckAir
Z_FiExitBottom := Z_FiEntranceBottom
Z_FiOverflowBottom := Z_FiEntranceBottom
Z_FiOverflowWeir - HL_FiBypass - OD(ND_FiBypass) - S_Fitting =  # error
H_FiInletChannel := Z_FiTop - Z_FiInletChannelBottom
# mse53 3-16-17 Changed Z.Overflow Bottom from
# to make fabrication easier with only one level for this entrance/exit box
H_FiEntrance := Z_FiTop - Z_FiEntranceBottom
H_FiExit := H_FiEntrance
H_FiOverflow := Z_FiTop - Z_FiOverflowBottom  # This is the height of the overflow box for the drawing code
H_FiOverflowTop := ZW_FiEntranceTerminal - Z_FiEntranceBottom  # This is the depth of the box, the drawing code does not use this value
H_FiBypassPipe := 1.5*H_FiDistBarrier + OR_Fitting(ND_FiBypass)  # This is the height of the bypass pipe off the floor of the bypass box
# Siphon and filter box water levels
Z_FiSiphonOutlet := ZW_FiEntranceBwSS - HL_FiBwTotalSS
# The top of the pipe stub on the siphon where it discharges into the drain channel. The stubs here should be longer than designed for at first and cut shorter until the water level in the entrance box during backwash is approximately H_FiBwNoSuckAir =
Z_FiSiphonInlet := Z_FiSiphonOutlet - H_FiSiphonNoSuckAir
Z_PlantDrainChannelBottom := Z_FiSiphonOutlet - L_FiSiphonChannelStubMin
ZW_FiBwSS := Z_FiSiphonOutlet + HL_FiSiphonOrifice + HL_FiSiphonPipe + HL_FiSiphonOutlet
ZW_FiClean := Z_FiExitStub + HL_FiOutletStubs(max(Q_FiPath)) + HL_FiOutletPlumbingAve(Q_FiLayer1, Q_FiLayer3) + HL_FiCleanLayer
ZW_FiMax := Z_FiExitStub + HL_FiOutletStubs(max(Q_FiPath)) + HL_FiOutletPlumbingAve(Q_FiLayer1, Q_FiLayer3) + HL_FiTerminal
Z_FiSiphonThroughWallMax := Z_FiExitStub - OR(ND_FiSiphon)
# This is the center line of the pipe through the wall.  This is a maximum based on zero flow and the goal of wanting to be able to initiate backwash at the beginning of filtration. This constraint could be relaxed if needed.
H_FiSiphonMax := ZW_FiMax - Z_FiSiphonOutlet
L_FiSiphonTop := L_Fi/2 - ElbowRadius(ND_FiSiphon) + ShortTeeLength(ND_FiBwManBranch) + SocketDepth(ND_FiSiphon) + T_FiWall + OR(ND_FiSiphon)
# The following is the minimum elevation of the top of the siphon where it goes through the filter wall so that it will not overflow when the air is compressed in forward filtration mode. See Monroe's filtration notes for a derivation of the following in terms of simple variables. This expression was derived for the variables defined here.
Z_FiSiphonThroughWallMin := (P_Atm*(ZW_FiMax + ZW_FiBwSS) + Rho_H2O*g*(ZW_FiMax^2 + ZW_FiMax*L_FiSiphonTop - ZW_FiMax*Z_FiSiphonOutlet))/(2*P_Atm + Rho_H2O*g*(L_FiSiphonTop + ZW_FiMax - Z_FiSiphonOutlet)) + OR(ND_FiSiphon)
Z_FiSiphonThroughWallMax - Z_FiSiphonThroughWallMin =  # error
# Not much room to spare here! We need to always check this and somehow report an error if this is negative!!!!
Z_FiSiphonThroughWall := Z_FiSiphonThroughWallMax
# Total filter box height
Z_FiBottom := Z_FiSiphonInlet - H_FiFluidizedBed - H_FiFluidizedBedToSiphon
H_Fi := Z_FiTop - Z_FiBottom
# Distribution pipe
Z_FiDistPipe := Z_FiExitBottom - H_FiDistDrop
Z_FiExitDrainOutlet := Z_FiExitBottom - H_FiExitWasteDrop
H_FiSiphonPressure := ZW_FiMax - Z_FiSiphonThroughWallMin  # This cannot be greater than Z_FiSiphonOutlet - Z_FiBottom =
# Inlet weir design
# Slotted flow control weir design
Pi_QFiBw := 1.15
# Ratio of max backwash flow rate (when plant flow is Q.Plant) to desired backwash flow rate Q.Fi. This is saying the flow rate into the filter being backwashed will never exceed 115% of the desired backwash flow rate (assuming plant flow rate doesn't exceed the design flow rate).
# Inlet channel water level is this high above the filtration flow control weir at max plant flow. When N.Fi = 1 this design is not real and there will not be a slotted flow control weir, but the variables need to be defined for the drawing script.
Pi_QFiBw == Q_FiMax/Q_Fi
HL_FiEntranceWeirOthers := Headloss_weir(Q_Plant - Pi_QFiBw*Q_Fi, W_FiEntranceWeir*(N_Fi - (N_Fi > 1)))
# HL_FiBFlowControlSlot is measured from the top of the filtration flow control weir downwards. If the filter being backwashed receives exactly Q_Fi then the water level behind the slot will just reach the filtration flow control weir and no water will be distributed to other filters. Any additional flow will cause the water level to rise above the filtration flow control weir and be distributed.
Pi_QFiBw == 2/3*Pi_VCOrifice*sqrt(2*g)*W_Slot*H_SlotMax^(3/2)/(2/3*Pi_VCOrifice*sqrt(2*g)*W_Slot*H_Slot^(3/2))
HL_FiBwFlowControlSlot := HL_FiEntranceWeirOthers/(Pi_QFiBw^(2/3) - 1)
W_FiBwFlowControl := W_rectweir(Q_Fi, HL_FiBwFlowControlSlot)  # This is the backwash flow control slot width.
Pi_QFiBw == (H_SlotMax/H_Slot)^(3/2)
Z_FiBwFlowControl := Z_FiEntranceWeir - HL_FiBwFlowControlSlot
# This is the elevation of the bottom of the backwash flow control slot based on the ideal design. However the slot will be built lower so that it can be calibrated with stoppers
# The max water level on the slot is the normal slot head loss when receiving Q_FiBw plus the head loss over the
# other filters' inlet weirs when receiving the remaining water.
H_FiBwSlotFreefallMin := ZW_FiInletChannel - ZW_FiEntranceMax
H_SlotMax == H_Slot + (3*(Q_Plant - Q_Fi*Pi_QFiBw)/(2*Pi_VCOrifice*sqrt(2*g)*L_FiEntranceWeir*(N_Fi - 1)))^(2/3)
S_FiFlowControlWeirs := W_HorizChannel(Q_Fi/2, HW_FiInletChannelMax, HL_FiInletChannel, W_FiEntranceWeir/2, Nu_Water, E_Concrete, 0, 0)
# Substituting in to the previous equation for Pi_QFiBw
Pi_QFiBw == ((H_Slot + (3*(Q_Plant - Q_Fi*Pi_QFiBw)/(2*Pi_VCOrifice*sqrt(2*g)*L_FiEntranceWeir*(N_Fi - 1)))^(2/3))/H_Slot)^(3/2)
# Now calculate the flow through the backwash flow control weir that is partly a weir with free fall and partly submerged and acting like an orifice.
Q_FiSlotSubmerged(HL) := Q_RectWeir(Z_FiEntranceWeir - max(ZW_FiEntranceCleanForward + HL, Z_FiBwFlowControl), W_FiBwFlowControl) + max(ZW_FiEntranceCleanForward + HL - Z_FiBwFlowControl, 0 m)*W_FiBwFlowControl*Pi_VCOrifice*sqrt(2*g*H_FiBwSlotFreefallMin)
H_Slot == (3*(Q_Plant - Q_Fi*Pi_QFiBw)/(2*Pi_VCOrifice*sqrt(2*g)*L_FiEntranceWeir*(N_Fi - 1)))^(2/3)/(Pi_QFiBw^(2/3) - 1)
Pi_QFiBwSubmergedSlot(HL) := Q_FiSlotSubmerged(HL)/Q_Fi
HL_FiEntranceBoxBuildup := 0 cm, 4 cm .. 40 cm
H_Slot == Headloss_weir(Q_Plant - Pi_QFiBw*Q_Fi, L_FiEntranceWeir*(N_Fi - 1))/(Pi_QFiBw^(2/3) - 1)
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# In reality the filter will receive more flow as head loss builds up than shown in this analysis because this assumes the water level behind the slot cannot rise above the entrance weir. The water level will actually rise several centimeters higher.
# Stop gate design
HL_FiOpenWeirMax := 0.2 cm
H_FiStopGate := 20 cm
W_FiStopGate := Q_Fi/(Pi_VCOrifice*H_FiStopGate*sqrt(2*g*HL_FiOpenWeirMax))
# Model opening like orifice flow and calculate W based on area to give the max head loss
# Extra stoppers for backwash slot
# In order to be able to calibrate the size of the backwash flow control slot when beginning plant operation so that Q_FiBw really enters the entrance box when the stop gate is removed, the slot will be constructed deeper than calculated previously, and removable stoppers can be placed or removed to adjust the elevation of the bottom of the slot. Each stopper will represent on the order of 10% of the desired backwash flow rate. The drawing will show the slot drawn deeper by a height of N_FiSlotStopper stoppers with the stoppers placed such that the height of the slot is the height calculated above.
Q_FiSlotStopperIncrementEst := 0.1*Q_Fi
H_FiSlotStopper := Ceil((3*(Q_Fi + Q_FiSlotStopperIncrementEst)/(2*Pi_VCOrifice*sqrt(2*g)*W_FiBwFlowControl))^(2/3) - HL_FiBwFlowControlSlot, 1 cm)
Q_FiSlotStopperIncrement := 2/3*Pi_VCOrifice*sqrt(2*g)*W_FiBwFlowControl*((HL_FiBwFlowControlSlot + H_FiSlotStopper)^(3/2) - HL_FiBwFlowControlSlot^(3/2))
N_FiSlotStopper := 3
Z_FiWeirSpaceBottom := Z_FiBwFlowControl - N_FiSlotStopper*H_FiSlotStopper
H_FiFlowControlSlotTotal := Z_FiTop - Z_FiWeirSpaceBottom
# Air removal baffle
# Use the same head loss criteria used for the height of the removable stop gate weir, modeling the space as a sluice gate
H_FiAirRemovalGap := Ceil(Q_Fi/(Pi_VCOrifice*W_FiEntrance*sqrt(2*g*HL_FiOpenWeirMax)), 1 cm)
# Entrance and overflow box lengths (X dimension)
L_FiEntrance :=
    OD_Fitting(ND_FiTrunk) + OD_Fitting(ND_FiBwTrunk) + 2*S_Fitting + 3*S_FiFlowControlWeirs + T_Acrylic + T_FiWeir if N_Fi > 1
    OD_Fitting(ND_FiTrunk) + OD_Fitting(ND_FiBwTrunk) + 2*S_Fitting + 2*S_FiFlowControlWeirs + T_Acrylic otherwise
# If there is only one filter there will be no slotted flow control weir.
L_FiOverflow := L_FiEntrance - (T_FiBoxWall - T_FiWeir)
# Siphon valve size
HL_FiSiphonValveWater := (Z_FiSiphonThroughWall - ND_FiSiphon/2) - (Z_FiSiphonOutlet + HL_FiSiphonPipe + HL_FiSiphonOutlet)
# The available head is equal to the difference between the bottom of the siphon pipe and the steady state water level in the filter.  This is a head available in terms of water.
Vol_FiSiphonAir := (L_Fi/2 + T_FiWall + SocketDepth(ND_FiSiphon) + ShortTeeLength(ND_FiSiphon) + 2*(Z_FiSiphonThroughWall - Z_FiSiphonOutlet))*π*ID(ND_FiSiphon, SDR_41)^2/4
# Goal is to fill siphon tube with air in 10 seconds. To account for the diminishing head as the siphon tube fills with air we will use 0.5 seconds. This rapid fill is desirable so that the operator can open and then immediately close the valve without having to wait. This is important because the operator won't be able to see the air filling up the siphon tube.
Ti_FiSiphonBreak := 10 s
# Monroe increased this to 1 s (from 0.5 s) because the video of starting backwash showed the operator moving the valve slowly. This indicatess that it wasn't necessary to have such a large valve at Tamara.
# changed to 10s 1/7/2012
Q_FiSiphonAir := Vol_FiSiphonAir/Ti_FiSiphonBreak
HL_FiSiphonValveAir := HL_FiSiphonValveWater*Rho_H2O/Rho_Air  # This is the head available in terms of air.
K_FiSiphonValve := 3  # Entrance and Exit loses and ball valve losses
L_FiSiphonBreak := Z_FiTop - Z_FiBottom  # Estimated length of the pipe that will be connected to the air valve. Air valve will be at the very top of the filter.
ND_FiSiphonAirValve := ND_PipeFlow(Q_FiSiphonAir, SDR_17, HL_FiSiphonValveAir, L_FiSiphonBreak, Nu_Air, E_Pvc, K_FiSiphonValve)
ND_FiSiphonAirValve := 3/4*in
# Override this analysis because 3/4" siphon air valves have worked well in Honduras with 8" siphon pipes.
# abh35 21jul15
# Sand removal pipe
PS_FiSandOutlet := SDR_26
PS_FiSandOutletStr := PSToString(PS_FiSandOutlet)
H_FiSandOutlet := 1 m
# This can't be set any higher because the available head will be insufficient to pump sand unless we figure out a way to maintain a higher water level in the filter during the sand dump. See the small head loss available at the finish of pumping the sand below.
# to be high enough to dump into a 55 gal drum?
Z_FiSandOutlet := Z_FiBottom + H_FiSandOutlet  # 7/9/2014: We want the outlet to exit between the 6th and 7th sand layers in the filter. mrf222
# This is higher than the sed tank drain channel. Thus the backwash water can easily discharge into the drain channel
HL_FiSandOutlet := Z_FiSiphonOutlet - Z_FiSandOutlet  # This isn't quite right because of the different densities.
# Calculating head loss and density for this problem is a bit complicated. The sand bed has a density of
Rho_FiFluidized =  # error
# This ends up changing Nu.Water, but that doesn't change the results because we are in the very turbulent domain of the Moody diagram. The available head has to take into account the different densities of the fluidized bed and the water above the bed. As the fluidized bed is drained the available head will decrease. Would it be possible to drain the sand out of the bed at the very beginning of the backwash cycle while the water depth above the bed is gradually decreasing? This extra bed depth would provide more head to push the sand through the sand outlet.
# At the beginning of sand pumping the filter box has fluidized sand (and thus a high fluid density) and thus the pressure at the entrance to the sand dump is high. At the end of the sand dump the filter is filled with water and thus the pressure at the entrance to the sand dump is much lower and yet the sand dump pipe is still filled with the high density fluidized sand.
HL_FiSandOutletStart := ((Z_FiSiphonOutlet - Z_FiBottom - H_FiSand*Pi_FiFluidized)*Rho_H2O + H_FiSand*Pi_FiFluidized*Rho_FiFluidized + (-H_FiSandOutlet*Rho_FiFluidized))/Rho_FiFluidized
HL_FiSandOutletFinish := ((Z_FiSiphonOutlet - Z_FiBottom)*Rho_H2O + (-H_FiSandOutlet*Rho_FiFluidized))/Rho_FiFluidized
V_FiSand := W_Fi*L_Fi*H_FiSand*Pi_FiFluidized  # Total volume of the fluidized bed
# Use the largest pipe that will fit between the branch lines (but not between the backwash branch lines)
Q_FiSandOutletStart := Q_pipetotal(ID(ND_FiSandOutlet, PS_FiSandOutlet), HL_FiSandOutletStart, H_FiSandOutlet, Nu_Water*Rho_H2O/Rho_FiFluidized, E_Pvc, K_PipeExit + K_PipeEnt + 2*K_El90)
Q_FiSandOutletFinish := Q_pipetotal(ID(ND_FiSandOutlet, PS_FiSandOutlet), HL_FiSandOutletFinish, H_FiSandOutlet, Nu_Water*Rho_H2O/Rho_FiFluidized, E_Pvc, K_PipeExit + K_PipeEnt + 2*K_El90)
Q_FiSandOutlet := (Q_FiSandOutletStart + Q_FiSandOutletFinish)/2  # This isn't quite right, but it is close.
Ti_FiSand := V_FiSand/Q_FiSandOutlet  # This is the time required to empty the filter of the sand.
Ti_FiSandDrum := 220 L/Q_FiSandOutlet
Q_FiSandOutletFinish/(π*IR(ND_FiSandOutlet, PS_FiSandOutlet)^2) =  # error  # The velocity in the pipe is far greater than the backwash velocity
# Estimate of the flow rate that would allow sand to settle within the vertical pipe. This flow rate is really low and so the valve will need to be almost closed before the sand stops flowing.
Q_Settle := 5*mm/s*π*IR(ND_FiSandOutlet, PS_FiSandOutlet)^2
# Trunk line purge valves
# Here we design for a certain scour velocity in the trunk lines BEYOND the manifold (outside of the filter box). We likely won't get sufficient scour velocities within the manifold where there is only a fraction of the total flow rate in the lines (particularly at the ends of the manifolds). Therefore these valves will probably not be all that effective if there is a serious solids accumulation problem. Hopefully accumulation of solids in the inlet plumbing will not be a problem when our manifold is constructed such that there is no sand leakage.
# For operation, the line which is being purged must be plugged from the entrance box so that the valve does not need to handle both the full filter flow and the trunk flush flow. For best operation, the other pipe stubs in the entrance box should be pulled out so that the entrance box water can contribute to the flow for a longer run at scour velocity.
# Decide on a reasonable scour velocity for compacted sludge
V_Scour(Rho_Particle, D_Particle, θ) := sqrt(2*sqrt(500000)/(3*0.332)*(Rho_Particle - Rho_H2O)/Rho_H2O*g*D_Particle*tan(θ))
V_FiTrunkFlush := V_Scour(Rho_FiSand, D_FiSand60, 5 deg)
# We won't be able to flush sand out of the line - the scour velocity is too high no matter how big a valve we choose.
# Head loss calculations and valve sizes
V_FiTrunkFlush := 0.3*m/s
Q_FiBwTrunkFlush := π*IR(ND_FiBwTrunk, PS_FiTrunk)^2*V_FiTrunkFlush
HL_FiSandBedBwTrunkFlush := h_lKozeny(H_FiSandActive, D_FiSand60, Q_FiBwTrunkFlush/A_FiActive, ε_FiSand, Nu_Water)
HL_FiBwSlotsTrunkFlush := h_orifice(D_circle(A_FiBwManOrifices*ε_FiSand), Pi_VCOrifice, Q_FiBwTrunkFlush)
H_FiBwTrunkFlushAvail := ZW_FiClean - Z_FiBottom - OR(ND_FiBwManBranch) - HL_FiSandBedBwTrunkFlush - HL_FiBwSlotsTrunkFlush
ND_FiBwTrunkFlushValve := ND_PipeFlow(Q_FiBwTrunkFlush, PS_FiTrunk, H_FiBwTrunkFlushAvail, 5 cm, Nu_Water, E_Pvc, K_PipeEnt + K_GateValve + K_PipeExit)
Q_FiTrunkFlush := π*IR(ND_FiTrunk, PS_FiTrunk)^2*V_FiTrunkFlush
HL_FiSlotsTrunkFlush := h_orifice(D_circle(A_FiInletManOrifices*ε_FiSand), Pi_VCOrifice, Q_FiTrunkFlush)
HL_FiElbowTrunkFlush := h_e(Q_FiTrunkFlush, ID(ND_FiTrunk, PS_FiTrunk), K_El90)
HL_FiSandBedTrunk2Flush := h_lKozeny(H_FiSandActive - 2*H_FiLayer, D_FiSand60, Q_FiTrunkFlush/A_FiActive, ε_FiSand, Nu_Water)
HL_FiSandBedTrunk3Flush := h_lKozeny(H_FiSandActive - 4*H_FiLayer, D_FiSand60, Q_FiTrunkFlush/A_FiActive, ε_FiSand, Nu_Water)
H_FiTrunk2FlushAvail := ZW_FiClean - Z_FiBottom - OR(ND_FiBwManBranch) - 2*H_FiLayer - HL_FiSandBedTrunk2Flush - HL_FiSlotsTrunkFlush - HL_FiElbowTrunkFlush
H_FiTrunk3FlushAvail := ZW_FiClean - Z_FiBottom - OR(ND_FiBwManBranch) - 4*H_FiLayer - HL_FiSandBedTrunk3Flush - HL_FiSlotsTrunkFlush - HL_FiElbowTrunkFlush
H_FiTrunk4FlushAvail := ZW_FiClean - Z_FiBottom - OR(ND_FiBwManBranch) - 6*H_FiLayer - HL_FiSlotsTrunkFlush - HL_FiElbowTrunkFlush
ND_FiTrunk2FlushValve := ND_PipeFlow(Q_FiTrunkFlush, PS_FiTrunk, H_FiTrunk2FlushAvail, 5 cm, Nu_Water, E_Pvc, K_PipeEnt + K_GateValve + K_PipeExit)
ND_FiTrunk3FlushValve := ND_PipeFlow(Q_FiTrunkFlush, PS_FiTrunk, H_FiTrunk3FlushAvail, 5 cm, Nu_Water, E_Pvc, K_PipeEnt + K_GateValve + K_PipeExit)
ND_FiTrunk4FlushValve := ND_PipeFlow(Q_FiTrunkFlush, PS_FiTrunk, H_FiTrunk4FlushAvail, 5 cm, Nu_Water, E_Pvc, K_PipeEnt + K_GateValve + K_PipeExit)
ND_FiTrunkFlushValve := max(ND_FiTrunk2FlushValve, ND_FiTrunk3FlushValve, ND_FiTrunk4FlushValve)
# Main plant drain channel
# To calculate the maximum possible flow through the drainchannel, all tanks are assumed to be initially full and emptying in the same time
# Note that the tank heights are used instead of the water levels in the calculation of maximum flow to have a conservative design.
Q_TankDrainMax := Q_Plant + N_FlocChannels*Q_pipeminor(ID(ND_FlocDrain, PS_FlocDrain), HW_FlocEnd, K_PipeEnt + K_PipeExit + K_El90) + Q_pipeminor(ID(ND_SedJetReverser, PS_SedJetReverser), H_Sed, K_PipeEnt + K_PipeExit + K_GateValve + K_El90)*N_SedTanks
L_PlantDC := T_SedWall + N_SedTanks*W_Sed + (N_SedTanks - 1)*T_SedDividingWall + max(T_SedWall, T_FlocWall) + N_FlocChannels*W_FlocChannel + (N_FlocChannels - 1)*T_FlocDividingWall + T_FlocWall
W_PlantDC := W_DCWalkway
HW_PlantDCMax := H_HorizChannelMin(Q_TankDrainMax, W_PlantDC, L_PlantDC, Nu_Water, E_Concrete, 1)
Z_PlantLowerDCBottom := min(Plant_Origin[2] - OR(ND_SedJetReverser) - ElbowRadius(ND_SedJetReverser) - HW_PlantDCMax, Z_FiSiphonOutlet - L_FiSiphonChannelStubMin, Z_Walkway - T_PlantFloor - H_HumanAccess)
Z_PlantUpperDCBottom := min(Z_FlocBottom - OD_Fitting(ND_FlocDrain) - HW_PlantDCMax, Z_Walkway - T_PlantFloor - H_HumanAccess)
# Sand volume
Vol_FiSand := N_Fi*(H_FiSand*W_Fi*L_Fi - N_FiLayer*π/4*OD(ND_FiTrunk)^2*L_Fi - N_FiLayer*N_FiManBranch*π/4*OD(ND_FiManBranch)^2*(L_FiManBranch - 2*L_FiManBranchExt) - (N_FiLayer + 1)*2*π/4*OD(ND_FiBranchHolder)^2*L_Fi - π/4*OD(ND_FiBwTrunk)^2*L_Fi - N_FiManBranch*π/4*OD(ND_FiBwManBranch)^2*(L_FiBwManBranch - 2*L_FiManBranchExt))
# Backwash Lagoon
SpaceForLagoon := Z_PlantLowerDCBottom - Z_FiBottom
