# [reference: FluidsFunctions.xmcd]
# Test Assumptions
# [reference: PipeDatabase.xmcd]
i := 0 .. 100
Q_plant := 50*L/s
PipeSpecification := 4
innerDiameters_PipeSpec4 := [0.013; 0.023; 0.037; 0.048; 0.071; 0.092; 0.14; 0.183; 0.273; 0.345; 0.432; 0.518]
L_pipe := 20 m
K_total := 0.8
h_lossmax := 50 cm
# This function is imported from FluidsFunctions to calculate pipe size based on flow rate.
ν := 1*10^-6*m^2/s
Q_plant := 100*L/s
# This is the inner diameter of the pipe
# Sizing the Macromixing Orifice
d_pipe := D_pipe(Q_plant, innerDiameters_PipeSpec4*m, h_lossmax, L_pipe, ν, 0, K_total) = 10.748 in
# Sizing the Macromixing Orifice
d_pipe = 0.273 m
# We want a minor loss coefficient of 1.3
K_e := 1.3
K_vc := 0.62
# So we use the equation for minor loss coefficient for a submerged orifice given in the notes on Flow Control and Measurement to determine d.or
d_macromixorificeFunction(K_vc, K_e, d_pipe) := d_pipe*(1/(K_vc*(K_e^0.5 + 1)))^0.5
d_macromixorifice := d_pipe*(1/(K_vc*(K_e^0.5 + 1)))^0.5
d_macromixorifice = 9.33057 in
# We are assuming a circular orifice here.  The resulting area of the orifice and velocity through the orifice are given below.
A_xsection(d) := π*d^2/4  # This calculates the area of a pipe or orifice cross-section
A_macromixorifice := π*d_macromixorifice^2/4 = 0.0441138 m^2
A_out := π*d_pipe^2/4
V_pipe(Q, A) := Q/A  # This calculates the velocity based on volumetric flow rate and cross-sectional area
V_macromixorifice := Q_plant/A_macromixorifice = 2.26687 m/s
V_out := Q_plant/A_out = 1.70838 m/s
# The resulting head loss through the orifice is given as:
h_minorloss(K_e, V) := K_e*V_out^2/(2*g)
h_emacromixorifice := K_e*V_out^2/(2*g) = 19.3447 cm
# Sizing the Micromixing Orifice
# Sizing the Micromixing Orifice
# There are two conditions that must be met here.  First of all the energy disspation rate must be 1 W/kg and there must be a head loss of 20 to 50 cm.
h_emicromixorificeFunction(h_total, h_emacromixorifice) := h_total - h_emacromixorifice
ε := 1*W/kg
h_total := 50 cm
A_micromixorificeFunction(d_pipe, K_vc, h_emicromixorifice, Q) := (A_xsection(d_pipe)/K_vc)/(((2*g*h_emicromixorifice)/V_pipe(Q, A_xsection(d_pipe)))^0.5 + 1)
h_emicromixorifice := h_total - h_emacromixorifice = 30.6553 cm
A_micromixorifice := (A_out/K_vc)/(((2*g*h_emicromixorifice)/(V_out^2))^0.5 + 1) = 0.0387678 m^2
d_micromixorifice := (4*A_micromixorifice)^0.5/π^0.5 = 8.74695 in
d_micromixorificeFunction(A_micromixorifice) := (4*A_micromixorifice)^0.5/π^0.5
# The largest smallest dimension is calculated below.
Q := 1*L/s
W := (2*g*h_emicromixorifice)^(3/2)/(20*ε) = 29.0215 in
# There is more coding needed.  We have the largest smallest dimension and the area needed.  We have to determine whether to use squares, rectangles, circles, and if more than one is needed.
d_micromixorificeFunction(A_micromixorificeFunction(d_pipe, K_vc, h_emicromixorificeFunction(h_total, h_minorloss(K_e, V_pipe(Q, A_xsection(d_pipe)))), Q*m/s)) = 0.0779959 m
