# [reference: DesignAssumptions.xmcd]
uturnhole(baffle_spacing, FlocTank_width, FlocTank_length, n_baffle) :=
    uturnhole_area ← baffle_spacing[2]*m*FlocTank_width
    uturnhole_width ← baffle_spacing[1]*m - uturnhole_unusedspace if FlocTank_length/n_channels > baffle_spacing[0]*m*n_baffle[0]
    uturnhole_width ← baffle_spacing[0]*m - uturnhole_unusedspace otherwise
    uturnhole_height ← uturnhole_area/uturnhole_width
    return [uturnhole_width; uturnhole_height]
uturnhole([.1; .3; .5], .5*m, 15*m, [30; 20; 5]) = [0.27; 0.925926] m
shortcircuit(baffle_spacing, FlocTank_enddepth) :=
    gap ← spacingratio*baffle_spacing*m
    baffle_length ← FlocTank_enddepth - gap
    baffle_overlap ← FlocTank_enddepth - 2*gap
    spacingratio_new ← (FlocTank_enddepth - overlap_min)/(2*baffle_spacing*m)
    i ← 0
    while i < length(baffle_spacing)
        baffle_length[i] ← FlocTank_enddepth - spacingratio_new[i]*baffle_spacing[i]*m if baffle_overlap[i] ≤ 0
        i ← i + 1
    return baffle_length
shortcircuit([.1; .3; .5], 2.1*m) = [1.95; 1.65; 1.35] m
# NEED TO CHECK GTHETA AT THE END
bafflepositions(flocDim, n_baffles, b_lengths, b_spacings) :=
    n ← 0
    k ← 0
    j ← 0
    firstchannel ← 1
    length_perchannel ← flocDim[0]/n_channels
    return "2 channels not needed. Design Fails" if n_baffles*b_spacings < length_perchannel
    while n < (sum(n_baffles) - 1)
        if j > n_baffles[k] - 1
            k ← k + 1
            j ← 0
        bafflelength[n, 0] ← b_lengths[k]
        if firstchannel == 1
            baffle_xposition1[n] ← b_spacings[k] if n == 0
            baffle_xposition1[n] ← baffle_xposition1[n - 1] + b_spacings[k] otherwise
            if baffle_xposition1[n] > length_perchannel - b_spacings[k]
                baffle_xposition1 ← submatrix(baffle_xposition1, 0, n - 1, 0, 0)
                firstchannel ← 0
                m ← 0
        if firstchannel == 0
            baffle_xposition2[m] ← length_perchannel - b_spacings[k] if m == 0
            baffle_xposition2[m] ← baffle_xposition2[m - 1] - b_spacings[k] otherwise
        m ← m + 1
        n ← n + 1
        j ← j + 1
    if baffle_xposition2[m - 1] > (2*b_spacings)[k]
        while baffle_xposition2[m - 1] > (2*b_spacings)[k]
            baffle_xposition2[m] ← flocDim[0]/n_channels - ((m + 1)*b_spacings[k])
            m ← m + 1
    otherwise
        while baffle_xposition2[m - 1] < b_spacings[k]
            baffle_xposition2 ← submatrix(baffle_xposition2, 0, m - 2, 0, 0)
            m ← m - 1
    numbaffles ← length(baffle_xposition2) + length(baffle_xposition1)
    p ← 0
    y ← 0
    t ← 0
    while t < numbaffles
        if p > n_baffles[y]
            y ← y + 1
            p ← 0
        bafflelength[t, 0] ← b_lengths[y]
        p ← p + 1
        t ← t + 1
    firstchannel ← 1
    m ← 0
    i ← 0
    while i < length(baffle_xposition1)
        j ← 0
        if mod(i + 1, 2) ≠ 0
            while j < 3
                baffleposition1[i, j] ← baffle_xposition1[i] if j == 0
                baffleposition1[i, j] ← 0 if j == 1
                baffleposition1[i, j] ← bafflelength[i] if j == 2
                j ← j + 1
            i ← i + 1
        otherwise
            while j < 3
                baffleposition1[i, j] ← baffle_xposition1[i] if j == 0
                baffleposition1[i, j] ← flocDim[2] if j == 1
                baffleposition1[i, j] ← flocDim[2] - bafflelength[i] if j == 2
                j ← j + 1
            i ← i + 1
    while m < length(baffle_xposition2)
        j ← 0
        if mod(i + 1, 2) == 0
            while j < 3
                baffleposition2[m, j] ← baffle_xposition2[m] if j == 0
                baffleposition2[m, j] ← flocDim[2] if j == 1
                baffleposition2[m, j] ← flocDim[2] - bafflelength[i] if j == 2
                j ← j + 1
            i ← i + 1
            m ← m + 1
        otherwise
            while j < 3
                baffleposition2[m, j] ← baffle_xposition2[m] if j == 0
                baffleposition2[m, j] ← 0 if j == 1
                baffleposition2[m, j] ← bafflelength[i] if j == 2
                j ← j + 1
            i ← i + 1
            m ← m + 1
    return [baffleposition1, baffleposition2]
# the length of each channel is equal to the length of one sed tank
# what do we do in this case? code should not just fail...
# this loops finds the x position of each baffle (x=0 at start of tank)
# this if statement determines what baffle spacing shuld be used to find the position
# of the next baffle.
# x position of baffles in first channel
# if first baffle, x position is equal to the baffle spacing
# if not the firxt baffle, x position is equal to the x position of
# the previous baffle plus baffle spacing
# makes sure that the final baffle in the first channel is not too close to the wall,
# and skips to next channel
# x position of baffles in 2nd channel
# find the position of th last baffle in the 2nd channel
# finds the position of the other baffles (working from
# where the water enters back to where the water exits)
# taking out extra baffles if length calcualted by b*n is longer than the channel length
# adding extra baffles if length calculated by b*n is shorter than the length of the channel
# this loop is putting in the y positions for the baffle, starting in channel 1 (right now the first
# baffle always starts at the top of the tank and extends downward)
# any even numbered baffle gets these y positions
if p > n_baffles[y] - 1
    y ← y + 1
    p ← 0
# any odd numbered baffle gets these y positions
57 - 44 = 13
bafflepositions([15; .5; 2.5], [30; 20; 5], [1.6; 1.3; 1.1], [.1; .3; .5]) = [[
    0.1, 0, 1.6;
    0.2, 2.5, 0.9;
    0.3, 0, 1.6;
    0.4, 2.5, 0.9;
    0.5, 0, 1.6;
    0.6, 2.5, 0.9;
    0.7, 0, 1.6;
    0.8, 2.5, 0.9;
    0.9, 0, 1.6;
    1, 2.5, 0.9
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], [
    7.2, 0, 1.3;
    6.9, 2.5, 1.2;
    6.6, 0, 1.3;
    6.3, 2.5, 1.2;
    6, 0, 1.3;
    5.7, 2.5, 1.2;
    5.2, 0, 1.3;
    4.7, 2.5, 1.2;
    4.2, 0, 1.1;
    3.7, 2.5, 1.4;
    2, 0, 1.1;
    1.5, 2.5, 1.4;
    1, 0, 1.1
]]
flocculator(Q_plant, SedDim) :=
    FlocTank_length ← SedDim[0]*n_channels*m
    FlocTank_width ← SedDim[1]/n_channels*m
    FlocTank_enddepth ← SedDim[2]*m - freeboard_sed
    baffle_spacing ← (1/G)^(1/2)*(k_b*Q_plant^3/(2*Π_cell*ν*FlocTank_width^3))^(1/4)
    G_min ← G*flowratio_hightolowflow^(3/2)
    θ_min ← Π_cell*FlocTank_width*baffle_spacing^2/Q_plant
    Gθ_minpersection ← Gθ_min*G_min/sum(G_min)
    n_baffle ← ceil(vectorize(Gθ_minpersection/(G_min*θ_min)))
    uturnhole_dim ← uturnhole(baffle_spacing/m, FlocTank_width, FlocTank_length, n_baffle)
    baffle_length ← shortcircuit(baffle_spacing/m, FlocTank_enddepth)
    v ← Q_plant/(FlocTank_width*baffle_spacing)
    h_l ← vectorize(n_baffle*(k_b*v^2/(2*g)))
    total_hl ← sum(h_l)
    d_start ← FlocTank_enddepth + total_hl
    FlocTank_height ← d_start + freeboard_floc
    gap ← spacingratio*baffle_spacing
    floc_dim ← [FlocTank_length; FlocTank_width; FlocTank_height]
    baffle_positions ← bafflepositions(floc_dim/m, n_baffle, baffle_length/m, baffle_spacing/m)
    floc_inleth ← 1.5*m
    return [floc_dim/m, baffle_spacing/m, floc_inleth/m, n_baffle, total_hl/m, uturnhole_dim/m, baffle_length/m, baffle_positions]
newGθ_totalpersection ← G_min*θ_min*n_baffle
newGθ_total ← sum(newGθ_totalpersection)
lowGθ ← "Failure: Your Gθ for the flocculator is too low. It should not fall below 4500. Consider increasing the length."
return lowGθ if newGθ_total < Gθ_absmin
flocculator(400*gpm, [5; .5; 2.5]) = [[10; 0.25; 2.611], [0.409047; 0.854939; 1.20907], 1.5, [11; 3; 2], 0.110996, [0.824939; 0.366411], [1.78643; 1.21; 1.21], [[
    0.409047, 0, 1.78643;
    0.818093, 2.611, 0.824566;
    1.22714, 0, 1.78643;
    1.63619, 2.611, 0.824566;
    2.04523, 0, 1.78643;
    2.45428, 2.611, 0.824566;
    2.86333, 0, 1.78643;
    3.27237, 2.611, 0.824566;
    3.68142, 0, 1.78643;
    4.09047, 2.611, 0.824566;
    4.49951, 0, 1.78643
], [4.14506, 2.611, 0.824566; 3.29012, 0, 1.21; 2.43518, 2.611, 1.401; 1.22612, 0, 1.21]]]
