n
# Hydraulic Design
# References
# Fluids Functions
# [reference: FluidsFunctions.xmcd]
# Pipe Database
# [reference: PipeDatabase.xmcd]
# Pipes and Orifices
PipeSize(Q_plant, PipeSpecification, h_lmax, K_sum, L_pipe) :=
    Pipe_size ← D_pipe(Q_plant, PipeSpecification, h_lmax, L_pipe, ν, ε_pvc, K_sum)
    return Pipe_size  # error: This variable is undefined.
K_sum(N_elbow45, K_el45, N_elbow90, K_el90, K_Tflowrun, N_teerun, K_Tflowbr, N_teebr, K_gatevalve, K_globevalve, K_anglevalve, K_chkvalveconv, K_chkvalveball, GateValve, GlobeValve, AngleValve, CheckValveConv, CheckValveBall, diamratio_exp0.75, K_exp0.75, diamratio_exp0.5, K_exp0.5, diamratio_exp0.25, K_exp0.25, diamratio_cont0.75, K_cont0.75, diamratio_cont0.5, K_cont0.5, diamratio_cont0.25, K_cont0.25) :=
    K_2 ← N_elbow45*K_el45 + N_elbow90*K_el90
    K_3 ← K_Tflowrun*N_teerun + K_Tflowbr*N_teebr
    K_4 ← GateValve*K_gatevalve + GlobeValve*K_globevalve + AngleValve*K_anglevalve + CheckValveConv*K_chkvalveconv + CheckValveBall*K_chkvalveball
    K_5 ← diamratio_exp0.75*K_exp0.75 + diamratio_exp0.5*K_exp0.5 + diamratio_exp0.25*K_exp0.25 + diamratio_cont0.75*K_cont0.75 + diamratio_cont0.5*K_cont0.5 + diamratio_cont0.25*K_cont0.25
    K_sum ← K_2 + K_3 + K_4 + K_5
    return K_sum
# Plant Leveling Tank
PlantLevelingTank(Q_plant, D_avail) :=
    lvltank_waterlvl ← 3 m
    wall_disp ← 3 m
    depth ← 2 m
    width ← 2 m
    length ← 2 m
    lvltank_dim ← [length; width; depth]
    return (lvltank_waterlvl, wall_disp, lvltank_dim)
# Plant Elevation Design
PlantElevationDesign(Q_plant, n_sedtanks, sedtank_dim, FlocTank_width) := 3
# Hydraulic Design Function
HydraulicDesign(Q_plant, FlocTank_width, PipeSpecification, n_sedtanks, sedtank_dim, lamella_spacing, tank_thick, channel_thick) :=
    D_avail ← AvailPipeSizes(PipeSpecification)
    waterlevel ← 1
    manifold_depth ← 1
    D_orifice ← 2 cm
    grit_holes ← FlowMeasurementDesign(Q_plant, D_avail)
    lvltank_dim ← [1; 1; 1]
    waste_inr ← 5
    effluent_inr ← 5
    SedPipe_length ← 2
    lvltank_waterlvl ← 5
    wall_disp ← 3
    channel_dim ← 2
    orifice_dist ← 23 cm
    return [waterlevel, manifold_depth, D_orifice/m, grit_holes, lvltank_dim, waste_inr, effluent_inr, SedPipe_length, lvltank_waterlvl, wall_disp, channel_dim, orifice_dist/m]  # error: This variable is undefined.
