# [reference: DesignAssumptions.xmcd]
# [reference: PipeDatabase.xmcd]
# [reference: FluidsFunctions.xmcd]
# [reference: Sedimentation Function.xmcd]
# Launderer Design
# Diameter iteration program:
D_manifold(Q, h, L, Q_ratio, D_available, ν, ε, K, n) :=
    D_new ← D_available[0]
    D_old ← 0 in
    error ← 1
    while error > 0.01
        D_old ← D_new
        D_new ← (8*Q^2/(g*π^2*h)*(1 + (f(Q, D_old, ν, ε)*L/D_old + K)*(1/3 + 1/(2*n) + 1/(6*n^2)))/(1 - Q_ratio^2))^(1/4)
        error ← |D_old - D_new|/mean(D_old, D_new)
    D_new ← Dnextlargest(D_new, D_available)
    return D_new
# This loop determines the diameter for a manifold through an iteration process, given an initial estimate diameter of 0, and an error margin of 0.01
# Why do you take the mean when you calculate error?
D_orifices(h_losslaunder, Q_plant, D_launder, n_orifices, HW_sedtank, n_sedtanks) := D_circle(A_orifice(HW_sedtank - h_losslaunder - (Q_plant/n_sedtanks)^2/(2*g*A_circle(D_launder)^2), K_orifice, Q_plant/n_sedtanks/n_orifices))
# To determine the orifices' diameter, the orifice equation is used
# A.orifice and A.circle are functions.
# In the above function, it would be helpful to explain why for Q we need to divide by 2. How do you calculate the head loss? More explanation would be great here.
Launder(Q_plant, PipeSpecification, L_sedtank, lamella_spacing, Q_ratioLaunderOrf, spacebelow, n_sedtanks, HW_sedtank) :=
    Q_tank ← Q_plant/n_sedtanks
    n_orifices ← floor(L_sedtank/(2*lamella_spacing))
    manifold_depth ← spacebelow/2
    D_avail ← AvailPipeSizes1(PipeSpecification)
    D_launder ← D_manifold(Q_tank, manifold_depth, 2*L_sedtank, Q_ratioLaunderOrf, D_avail, ν, ε_pvc, 0, n_orifices)
    h_losslaunder ← h_lmanifold(Q_tank, D_launder, 2*L_sedtank, 0, ν, ε_pvc, n_orifices)
    D_orifice ← D_orifices(h_losslaunder, Q_plant, D_launder, n_orifices, HW_sedtank, n_sedtanks)
    SedPipe_length ← L_sedtank
    orifice_dist ← 2*lamella_spacing
    return [SedPipe_length/m, D_orifice/m, orifice_dist/m, manifold_depth/m, D_launder/m, n_orifices]
# The orifices will be located on the sides of the launder and will be spaced at twice the lamella spacing
# The launder will be located between the top of the lamella and the surface of the water in the sedimentation tank, the orifices will be at the center of the launders
# Using the iterative program from above, and the available pipe sizes from the pipe database, the launder diameter is determined
LaunderHL(Q_plant, n_sedtanks, D_launder, n_orifices, L_sedtank, D_orifice) :=
    Q_tank ← Q_plant/n_sedtanks
    h_losslaunder ← h_lmanifold(Q_tank, D_launder, 2*L_sedtank, 0, ν, ε_pvc, n_orifices)
    Q_orifice ← Q_tank/n_orifices
    h_orifice ← (Q_orifice/(K_orifice*A_circle(D_orifice)))^2*(1/(2*g))
    HL_laundorif ← h_orifice*n_orifices*n_sedtanks
    HL_launder ← h_losslaunder*n_sedtanks
    HL_laundertotal ← HL_launder + HL_laundorif
    return HL_launder
# The head loss through the launder is calculated by usng the orifice equation, and the manifold head loss equation found the Fluids Functions file. By multiplying by the number of sedtanks, the total head loss is determined, and the water level in the plant leveling tank can be determined.
# This file is a little too difficult for me to follow. I think it needs to be documented more - and explain at the top what this file is used for. A graphic would be good too!
