# Unit Processes Design
# References
# Fluids Functions
# [reference: FluidsFunctions.xmcd]
# Sedimentation Tank Design
SedTankDesign(Q_plant, SedTank_width, lamella_spacing, L_lamella) :=
    W_tank ← SedTank_width
    α ← 60 deg
    β ← 45 deg
    v_up ← 100*m/day
    n_sedtanks ← 3
    Q_tank ← Q_plant/n_sedtanks
    spacebelow ← (W_tank/2)*tan(β)
    spaceabove ← .25*W_tank
    H_lamella ← L_lamella*sin(α)
    freeboard_sed ← 10 cm
    H_tank ← H_lamella + spaceabove + spacebelow + freeboard_sed
    width_toobig ← "Failure: Width is too large or length of lamella is too small "
    width_toosmall ← "Failure: Width is too small of length of lamella is too long"
    return width_toobig if L_lamella < H_tank/3
    return width_toosmall if L_lamella > 2*H_tank/3
    v_c ← v_up/(1 + L_lamella/lamella_spacing*cos(α)*sin(α))
    vc_toobig ← "Failure: Critical velocity is greater than the suggested value"
    return vc_toobig if v_c > 20*m/day
    A_active ← Q_tank/v_up
    L_active ← A_active/W_tank
    L_tank ← (L_lamella*cos(α) + L_active)
    N_lamella ← L_active/(lamella_spacing/sin(α))
    sedtank_vol ← 3*((W_tank*(H_tank - spacebelow)*L_tank) + .5*(W_tank*spacebelow*L_tank))
    sedtank_dim ← [L_tank; W_tank; H_tank + freeboard_sed]
    return [sedtank_dim/m, N_lamella]  # ASSUMPTIONS:
# lamella must be at an angle that will allow flocs to slide down
# walls sloped toward drain must be steep enough to allow flocs to slide down
# upward velocity which allows for the formation of a sludge blanket
# use multiple sed tanks to ensure tanks are not too large
# calculated so tank comes to a point at the drain pipe
# ratio between water depth above the plate settles and launder spacing (assuming 1 launder per tank)
# free space above water surface
# sum of the space below the lamella, space above the lamella,
# and the length of the lamella
# minimum and maximum lamella spacing based on tamara design
# Critical velocity must be low enough to allow for almost all
# of the particles to settle out
# puts the dimensions of the sed tank in a 3 x 1 vector
# returns the sed tank dimensions and the number of lamella
# Flocculator Design
# same equations as in the fluids function, but inputs and outputs
# vectors because baffle spacing is a vector
max_v(ν, k_b, f, w, b, G_max) := vectorize(G_max^(2/3)*(2*ν*b/(k_b + f*b/(4*R.h(w, b))))^(1/3))
R.h(b, w) := vectorize(w*b/(2*(w + b)))
Reynolds(v, R_h, ν) := vectorize(v*4*R_h/ν)
friction(R_h, epsilon, Re_max, ReTransition) :=
    for i ∈ 0 .. last(Re_max)
        f[i] ← 1.325/vectorize(ln(epsilon/(4*R_h[i]*3.7) + 5.74/Re_max[i]^0.9))^2 if Re_max[i] ≥ ReTransition
        f[i] ← 64/Re_max[i] otherwise
    f
flocculator(Q_plant, FlocTank_width) :=
    ν ← 10^-6*m^2/s
    ε ← 1 mm
    ReTransition ← 2100
    b_old ← [.1; .1; .1]*m
    depth ← 2 m
    G_max ← [15; 45; 75]*1/s
    Gθ_mintot ← 2000
    k_b ← 3
    Flow_ratio ← .5
    b ← [200; 200; 200]*m
    v_max ← Q_plant/(b*FlocTank_width)
    while max(|vectorize((b_old - b)/b)|) > .01
        b_old ← b
        R_h ← R.h(b_old, FlocTank_width)
        Re_max ← Reynolds(v_max, R_h, ν)
        f ← friction(R_h, ε, Re_max, ReTransition)
        v_max ← max_v(ν, k_b, f, FlocTank_width, b, G_max)
        area ← Q_plant/v_max
        b ← area/FlocTank_width
    gap ← 1.5*b
    v_min ← Flow_ratio*v_max
    Re_min ← Reynolds(v_min, R_h, ν)
    f_min ← friction(R_h, ε, Re_max, ReTransition)
    G_min ← G_max*Flow_ratio^(3/2)
    Gθ_min ← Gθ_mintot*G_min/sum(G_min)
    n ← ceil(vectorize(Gθ_min/G_min*v_min/depth))
    n[0] ← mod(sum(n) + 1, 2) + n[0]
    baffle_length ← depth - gap
    h_lmax ← vectorize(n*vectorize((k_b + vectorize(f*baffle_length/(4*R_h)))*v_max^2/(2*g)))
    h_lmin ← vectorize(n*vectorize((k_b + vectorize(f_min*baffle_length/(4*R_h)))*v_min^2/(2*g)))
    total_hl ← sum(h_lmax)
    d_start ← depth + total_hl
    Length ← vectorize(b*n)
    floc_dim ← [2 m; FlocTank_width; depth]
    baffle_spacing ← b
    floc_inleth ← 1.5 m
    n_baffle ← n
    return [floc_dim/m, baffle_spacing/m, floc_inleth/m, n_baffle]
# Chemical Feed Design
ChemicalFeed(Q_plant, Dose_Alum, r_drum, h_drum) :=
    t_supply ← 2 day
    Concentration_Alum ← 5*mg/L
    Q_Alum ← r_drum*2*π*h_drum/t_supply
    Alum_TubeD ← 2 cm
    Re_tube ← 5
    return [Q_Alum, Alum_TubeD]
# T.supply is the length of time your supply should last.
#
# I made up values/equations for all of these.
